<?xml version="1.0"?>
<?xml-stylesheet type="text/xsl" href="http://jsbsim.sourceforge.net/JSBSim.xsl"?>

<fdm_config name="A-6E" version="2.0" release="ALPHA"
	    xmlns:xsi="http://www.w3.org/2001/XMLSchema-instance"
	    xsi:noNamespaceSchemaLocation="http://jsbsim.sourceforge.net/JSBSim.xsd">

    <fileheader>
	<author> Aeromatic v 3.3.0 </author>
	<filecreationdate> 03 Apr 2019 </filecreationdate>
	<version>$Revision: 1.68 $</version>
	<description> Models a A-6E. </description>
    </fileheader>

    <!--
	File:     A-6E.xml
	Inputs:
	name:          A-6E
	type:          2 engine transonic/supersonic fighter
	stall speed:   145.00kts
	max weight:    60000.00 lb
	length:        54.50 ft
	wing:
	span:         53.00 ft
	area:         528.90 sq-ft
	mean chord:   10.90 ft
	aspect ratio: 5.31:1
	taper ratio:  0.31:1
	incidence:    2.00 degrees
	dihedral:     -1.00 degrees
	sweep:        25.00 degrees

        no. engines:   2
        engine type:   Turbine Engine
        engine layout: middle fuselage

        control type:   Conventional with Yaw Damper

        gear type:     tricycle
        steering type: steering
        retractable?:  yes

        Outputs:
        wing loading:  113.44 lb/sq-ft
        payload:       21600.00 lbs
        CL-alpha:      4.50 per radian
        CL-0:          0.32
        CL-max:        1.59
        CD-0:          0.01
        K:             0.12
        Mcrit:         0.81
    -->

    <metrics>
	<wingarea  unit="M2">49.14</wingarea> <!-- 528.9 sqft -->
	<wingspan  unit="M" >15.54</wingspan>
	<wing_incidence>           2.00 </wing_incidence>
	<chord     unit="M" >   3.2569 </chord>
	<htailarea unit="FT2">   117.00 </htailarea>
	<htailarm  unit="FT" >    24.90 </htailarm>
	<vtailarea  unit="FT2">   79.25 </vtailarea>
	<vtailarm  unit="FT" >    24.90 </vtailarm>
	<location name="AERORP" unit="M">
	    <x> 1.808 </x>
	    <y> 0.000 </y>
	    <z> 0.000 </z>
	</location>
	<location name="EYEPOINT" unit="IN">
	    <x>   130.80 </x>
	    <y>     0.00 </y>
	    <z>    38.00 </z>
	</location>
	<location name="VRP" unit="IN">
	    <x>     0.0 </x>
	    <y>     0.0 </y>
	    <z>     0.0 </z>
	</location>
    </metrics>

    <mass_balance>
	<ixx unit="SLUG*FT2">  53320.00 </ixx>
	<iyy unit="SLUG*FT2">  87273.00 </iyy>
	<izz unit="SLUG*FT2">  139927.00 </izz>
	<emptywt unit="LBS">29600</emptywt>
	<location name="CG" unit="M">
	    <x> 1.81 </x>
	    <y> 0.00 </y>
	    <z> 0.00 </z>
	</location>

	<pointmass name="Pylon 1">
	    <description>left outboard pylon</description>
	    <weight unit="LBS"> 0 </weight>
	    <location name="POINTMASS" unit="M">
		<x> 1.56</x>
		<y>-3.66</y>
		<z>-0.73</z>
	    </location>
	</pointmass>
	<pointmass name="Pylon 2">
	    <description>left inboard pylon</description>
	    <weight unit="LBS"> 0 </weight>
	    <location name="POINTMASS" unit="M">
		<x> 1.56</x>
		<y>-2.48</y>
		<z>-0.73</z>
	    </location>
	</pointmass>

	<pointmass name="Pylon 3">
	    <description>center pylon</description>
	    <weight unit="LBS"> 0 </weight>
	    <location name="POINTMASS" unit="M">
		<x> 1.03</x>
		<y> 0.00</y>
		<z>-1.29</z>
	    </location>
	</pointmass>

	<pointmass name="Pylon 4">
	    <description>right inboard pylon</description>
	    <weight unit="LBS"> 0 </weight>
	    <location name="POINTMASS" unit="M">
		<x> 1.56</x>
		<y> 2.48</y>
		<z>-0.73</z>
	    </location>
	</pointmass>

	<pointmass name="Pylon 5">
	    <description>right outboard pylon</description>
	    <weight unit="LBS"> 0 </weight>
	    <location name="POINTMASS" unit="M">
		<x> 1.90</x>
		<y> 3.66</y>
		<z>-0.73</z>
	    </location>
	</pointmass>
    </mass_balance>

    <propulsion file="Systems/jsb-propulsion.xml"/>
    <ground_reactions file="Systems/ground_reactions.xml"/>
    <system file="Propulsion"/>
    <system file="Catapult"/>
    <system file="jsb-instruments"/>
    <system file="jsb-hook"/>
    <system file="jsb-holdback"/>
    <system file="jsb-electrical"/>
    <system file="jsb-bleed_air"/>
    <system file="jsb-J52-P8"/>
    <!-- <system file="jsb-strutlock.xml"/> -->

    <flight_control file="Systems/fcs.xml"/>

    <aerodynamics file="A-6E_vspaero.xml"/>

    <output name="/tmp/JSBout.csv" type="CSV" rate="10">
	<property caption="Mach">velocities/mach</property>
	<property caption="alpha">aero/alpha-deg</property>
	<property caption="beta">aero/beta-deg</property>
	<property caption="pdot_rad_sec2">accelerations/pdot-rad_sec2</property>
	<property caption="qdot_rad_sec2">accelerations/qdot-rad_sec2</property>
	<property caption="rdot_rad_sec2">accelerations/rdot-rad_sec2</property>
	<property caption="p_rad_sec">velocities/p-rad_sec</property>
	<property caption="q_rad_sec">velocities/q-rad_sec</property>
	<property caption="r_rad_sec">velocities/r-rad_sec</property>
	<property caption="CMz_base">aero/CMz_base</property>
	<property caption="CMz">aero/moment/CMz</property>
	<!-- <property caption="cmnr">aero/s/cmnr</property> -->
	<property caption="cmnp">aero/s/cmnp</property>
	<property caption="CMz_rudder">aero/CMz_rudder</property>
	<property caption="rudder">fcs/rudder-cmd-norm</property>
	<property caption="elevator">fcs/elevator-cmd-norm</property>
	<!-- <property caption="flaperon">fcs/aileron-cmd-norm</property> -->
    </output>

    <external_reactions>

	<force name="hook" frame="BODY">
	    <location unit="M">
		<x>1.5</x>
		<y>0</y>
		<z>0</z>
	    </location>
	    <direction>
		<x>-0.9995</x>
		<y> 0 </y>
		<z> 0.01 </z>
	    </direction>
	</force>

	<force name="catapult" frame="BODY">
	    <location unit="M">
		<x>-2.84</x>
		<y> 0.00</y>
		<z> 0.00</z>
	    </location>
	    <direction>
		<x>1</x>
		<y>0</y>
		<z>0</z>
	    </direction>
	</force>

	<force name="catapult_vertical" frame="BODY">
	    <location unit="M">
		<x>-2.84</x>
		<y> 0.00</y>
		<z> 0.00</z>
	    </location>
	    <direction>
		<x>0</x>
		<y>0</y>
		<z>1</z>
	    </direction>
	</force>

	<force name="holdback" frame="BODY">
	    <location unit="M">
		<x>-2.84</x>
		<y> 0.00</y>
		<z>-2.44</z>
	    </location>
	    <direction>
		<x>-1</x>
		<y>0</y>
		<z>0</z>
	    </direction>
	</force>

	<force name="strut-lock" frame="BODY" unit="N">
	    <location unit="M">
		<x>-2.84</x>
		<y> 0.00</y>
		<z> 0.00</z>
	    </location>
	    <direction>
		<x>0</x>
		<y>0</y>
		<z>1</z>
	    </direction>
	</force>

    </external_reactions>

</fdm_config>
