<!--
Generated by vsp2jsbsim.py
Author: Jüttner Domokos
-->
<aerodynamics>

  <function name="aero/beta-deg-abs">
    <description>Beta absolute value</description>
    <abs>
      <property>aero/beta-deg</property>
    </abs>
  </function>

  <function name="aero/pb">
    <description>PB Denormalization</description>
    <product>
      <property>aero/bi2vel</property>
      <property>velocities/p-aero-rad_sec</property>
    </product>
  </function>

  <function name="aero/qb">
    <description>For denormalization</description>
    <product>
      <property>aero/ci2vel</property>
      <property>velocities/q-aero-rad_sec</property>
    </product>
  </function>

  <function name="aero/rb">
    <description>For denormalization</description>
    <product>
      <property>aero/bi2vel</property>
      <property>velocities/r-aero-rad_sec</property>
    </product>

  </function>
  <!-- CL -->
  <!-- base -->
  <function name="aero/CL_base">
    <table>
      <independentVar lookup="row">velocities/mach</independentVar>
      <independentVar lookup="column">aero/alpha-deg</independentVar>
      <independentVar lookup="table">aero/beta-deg</independentVar>
      <tableData breakPoint="-10.00000">
                -10.00     -5.00      0.00      5.00     10.00     12.00     13.00     14.00     15.00     20.00     25.00     30.00     40.00     50.00     60.00
        0.20000  -0.46714  -0.13825   0.20110   0.57730   0.85943   0.95625   1.00119   1.03077   1.04664   1.12366   1.15127   1.19223   1.20371   1.17135   1.00462
        0.50000  -0.49271  -0.14639   0.21517   0.54887   0.89836   0.98780   1.02798   1.05179   1.07534   1.15558   1.20025   1.21377   1.21879   1.18184   1.00026
        0.90000  -0.62082  -0.18229   0.29216   0.75764   0.96938   1.03109   1.06829   1.09848   1.14335   1.19122   1.32765   1.30182   1.31924   1.28994   1.06363
      </tableData>

      <tableData breakPoint="0.00000">
                -10.00     -5.00      0.00      5.00     10.00     12.00     13.00     14.00     15.00     20.00     25.00     30.00     40.00     50.00     60.00
        0.20000  -0.48465  -0.14048   0.19488   0.55014   0.87760   0.96659   0.99869   1.02737   1.05240   1.14767   1.20130   1.22950   1.23679   1.19121   1.04512
        0.50000  -0.51073  -0.14765   0.20610   0.58217   0.91585   0.99599   1.02669   1.05391   1.07862   1.17254   1.22622   1.24677   1.25500   1.21244   1.07313
        0.90000  -0.63844  -0.18213   0.24778   0.73297   1.03707   1.10959   1.14033   1.16889   1.19601   1.28328   1.33477   1.36169   1.35992   1.30329   1.16793
      </tableData>

      <tableData breakPoint="10.00000">
                -10.00     -5.00      0.00      5.00     10.00     12.00     13.00     14.00     15.00     20.00     25.00     30.00     40.00     50.00     60.00
        0.20000  -0.46718  -0.13837   0.20109   0.58715   0.85750   0.95534   1.00045   1.02900   1.04724   1.12644   1.15065   1.19107   1.20271   1.16986   1.00461
        0.50000  -0.49273  -0.14657   0.21523   0.55767   0.89564   0.98716   1.02724   1.05033   1.07476   1.15464   1.20118   1.21266   1.21807   1.18115   1.01309
        0.90000  -0.62151  -0.18249   0.29204   0.76136   0.96973   1.02782   1.06974   1.10006   1.14415   1.19257   1.32780   1.30391   1.31986   1.29048   1.06197
      </tableData>

    </table>
  </function>

  <!-- elevator -->
  <function name="aero/CL_elevator_-24">
    <table>
      <independentVar lookup="row">velocities/mach</independentVar>
      <independentVar lookup="column">aero/alpha-deg</independentVar>
      <independentVar lookup="table">aero/beta-deg</independentVar>
      <tableData breakPoint="-10.00000">
                -10.00     -5.00      0.00      5.00     10.00     12.00     13.00     14.00     15.00     20.00     25.00     30.00     40.00     50.00     60.00
        0.20000   0.00000   0.00000   0.00000   0.00000   0.00000   0.00000   0.00000  -0.00011   0.00000   0.00000   0.00000   0.00000   0.00000   0.00030   0.00289
        0.50000   0.00000   0.00000   0.00000   0.00000   0.00000  -0.00010   0.00000   0.00000   0.00000   0.00000  -0.00022   0.00000   0.00000   0.00000   0.00152
        0.90000   0.00000   0.00000   0.00000   0.00000  -0.00061   0.00061   0.00000   0.00000   0.00032  -0.00077   0.00034   0.00012   0.00000  -0.00024  -0.00016
      </tableData>

      <tableData breakPoint="0.00000">
                -10.00     -5.00      0.00      5.00     10.00     12.00     13.00     14.00     15.00     20.00     25.00     30.00     40.00     50.00     60.00
        0.20000   0.00000   0.00000   0.00000   0.00000   0.00000   0.00000   0.00000   0.00000   0.00000   0.00000   0.00000   0.00000   0.00000   0.00000   0.00000
        0.50000   0.00000   0.00000   0.00000   0.00000   0.00000   0.00000   0.00000   0.00000   0.00000   0.00000   0.00000   0.00000   0.00000   0.00000   0.00000
        0.90000   0.00000   0.00000   0.00000   0.00000   0.00000   0.00000   0.00000   0.00000   0.00000   0.00000   0.00000   0.00000   0.00000   0.00000   0.00000
      </tableData>

      <tableData breakPoint="10.00000">
                -10.00     -5.00      0.00      5.00     10.00     12.00     13.00     14.00     15.00     20.00     25.00     30.00     40.00     50.00     60.00
        0.20000   0.00000   0.00000   0.00000   0.00000   0.00000   0.00000   0.00000   0.00000   0.00000  -0.00099   0.00000   0.00000   0.00000   0.00040  -0.00128
        0.50000   0.00000   0.00000   0.00000   0.00000   0.00000   0.00000   0.00000   0.00000   0.00000   0.00000   0.00000   0.00000   0.00000  -0.00010  -0.00823
        0.90000   0.00000   0.00000   0.00000   0.00000   0.00071   0.00155   0.00000   0.00018   0.00000   0.00039   0.00025   0.00000   0.00000   0.00000   0.00000
      </tableData>

    </table>
  </function>

  <function name="aero/CL_elevator_-9.5">
    <table>
      <independentVar lookup="row">velocities/mach</independentVar>
      <independentVar lookup="column">aero/alpha-deg</independentVar>
      <independentVar lookup="table">aero/beta-deg</independentVar>
      <tableData breakPoint="-10.00000">
                -10.00     -5.00      0.00      5.00     10.00     12.00     13.00     14.00     15.00     20.00     25.00     30.00     40.00     50.00     60.00
        0.20000   0.00000   0.00000   0.00000   0.00000   0.00000   0.00000   0.00000  -0.00012   0.00000   0.00165   0.00000   0.00000   0.00000   0.00029   0.00087
        0.50000   0.00000   0.00000   0.00000   0.00000   0.00000  -0.00010   0.00000  -0.00021   0.00000   0.00000   0.00000   0.00000   0.00000   0.00014   0.00132
        0.90000   0.00000   0.00000   0.00000   0.00000  -0.00030   0.00063   0.00000  -0.00017   0.00045  -0.00034   0.00010   0.00000   0.00000  -0.00023   0.00000
      </tableData>

      <tableData breakPoint="0.00000">
                -10.00     -5.00      0.00      5.00     10.00     12.00     13.00     14.00     15.00     20.00     25.00     30.00     40.00     50.00     60.00
        0.20000   0.00000   0.00000   0.00000   0.00000   0.00000   0.00000   0.00000   0.00000   0.00000   0.00000   0.00000   0.00000   0.00000   0.00011  -0.00011
        0.50000   0.00000   0.00000   0.00000   0.00000   0.00000   0.00000   0.00000   0.00000   0.00000   0.00000   0.00000   0.00000   0.00000   0.00000   0.00000
        0.90000   0.00000   0.00000   0.00000   0.00000   0.00000   0.00000   0.00000   0.00000   0.00000   0.00000   0.00000   0.00000   0.00000   0.00000   0.00000
      </tableData>

      <tableData breakPoint="10.00000">
                -10.00     -5.00      0.00      5.00     10.00     12.00     13.00     14.00     15.00     20.00     25.00     30.00     40.00     50.00     60.00
        0.20000   0.00000   0.00000   0.00000   0.00000   0.00000   0.00000   0.00000   0.00000   0.00000  -0.00112   0.00000   0.00000   0.00000   0.00102  -0.00137
        0.50000   0.00000   0.00000   0.00000   0.00000   0.00000   0.00000   0.00000  -0.00020   0.00000   0.00000   0.00000   0.00000   0.00000  -0.00018  -0.01003
        0.90000   0.00000   0.00000   0.00000   0.00000   0.00012   0.00068   0.00000   0.00000   0.00000   0.00058   0.00025   0.00000   0.00000  -0.00041  -0.00017
      </tableData>

    </table>
  </function>

  <function name="aero/CL_elevator_1.5">
    <table>
      <independentVar lookup="row">velocities/mach</independentVar>
      <independentVar lookup="column">aero/alpha-deg</independentVar>
      <independentVar lookup="table">aero/beta-deg</independentVar>
      <tableData breakPoint="-10.00000">
                -10.00     -5.00      0.00      5.00     10.00     12.00     13.00     14.00     15.00     20.00     25.00     30.00     40.00     50.00     60.00
        0.20000   0.00000   0.00000   0.00000   0.00000   0.00000   0.00000  -0.00011   0.00000   0.00000   0.00116   0.00000   0.00000   0.00000   0.00011   0.00303
        0.50000   0.00000   0.00000   0.00000  -0.00097   0.00000   0.00000   0.00000  -0.00010   0.00000   0.00000   0.00000   0.00000   0.00000   0.00020   0.00160
        0.90000   0.00000   0.00000   0.00000   0.00000  -0.00047   0.00082   0.00000   0.00000   0.00047  -0.00028   0.00018   0.00013   0.00000  -0.00042   0.00000
      </tableData>

      <tableData breakPoint="0.00000">
                -10.00     -5.00      0.00      5.00     10.00     12.00     13.00     14.00     15.00     20.00     25.00     30.00     40.00     50.00     60.00
        0.20000   0.00000   0.00000   0.00000   0.00000   0.00000   0.00000   0.00000   0.00000   0.00000   0.00000   0.00000   0.00000   0.00000   0.00000   0.00000
        0.50000   0.00000   0.00000   0.00000   0.00000   0.00000   0.00000   0.00000   0.00000   0.00000   0.00000   0.00000   0.00000   0.00000   0.00000   0.00000
        0.90000   0.00000   0.00000   0.00000   0.00000   0.00000   0.00000   0.00000   0.00000   0.00000   0.00000   0.00000   0.00000   0.00000   0.00000   0.00000
      </tableData>

      <tableData breakPoint="10.00000">
                -10.00     -5.00      0.00      5.00     10.00     12.00     13.00     14.00     15.00     20.00     25.00     30.00     40.00     50.00     60.00
        0.20000   0.00000   0.00000   0.00000   0.00000   0.00000   0.00000   0.00000   0.00000   0.00000   0.00011   0.00000   0.00000   0.00000   0.00036  -0.00195
        0.50000   0.00000   0.00000   0.00000   0.00000   0.00000   0.00000   0.00000  -0.00020   0.00000   0.00000   0.00000   0.00000   0.00000  -0.00014  -0.00841
        0.90000   0.00000   0.00000   0.00000   0.00000   0.00042   0.00169   0.00000   0.00019   0.00066   0.00064   0.00056   0.00000   0.00000   0.00000  -0.00025
      </tableData>

    </table>
  </function>

  <function name="aero/CL_elevator">
    <interpolate1d>
      <property>fcs/surfaces/elevator-pos-deg</property>
      <value>-24</value> <property>aero/CL_elevator_-24</property>
      <value>-9.5</value> <property>aero/CL_elevator_-9.5</property>
      <value>0</value> <value>0</value>
      <value>1.5</value> <property>aero/CL_elevator_1.5</property>
    </interpolate1d>
  </function>

  <!-- flaps -->
  <function name="aero/CL_flaps_30">
    <table>
      <independentVar lookup="row">velocities/mach</independentVar>
      <independentVar lookup="column">aero/alpha-deg</independentVar>
      <independentVar lookup="table">aero/beta-deg</independentVar>
      <tableData breakPoint="-10.00000">
                -10.00     -5.00      0.00      5.00     10.00     12.00     13.00     14.00     15.00     20.00     25.00     30.00     40.00     50.00     60.00
        0.20000   0.70994   0.66820   0.66032   0.68755   0.47096   0.37565   0.37316   0.31194   0.32758   0.25994   0.20708   0.18765   0.17932   0.14452   0.07338
        0.50000   0.76253   0.71453   0.70426   0.74626   0.43462   0.40104   0.38796   0.35985   0.31791   0.29108   0.18434   0.19457   0.18991   0.15235   0.06846
        0.90000   1.09549   0.93699   0.53787  -0.41379   0.35376   0.34417   0.34529   0.32080   0.31659   0.38675   0.28906   0.27835   0.23273   0.11845   0.11050
      </tableData>

      <tableData breakPoint="0.00000">
                -10.00     -5.00      0.00      5.00     10.00     12.00     13.00     14.00     15.00     20.00     25.00     30.00     40.00     50.00     60.00
        0.20000   0.73668   0.67447   0.70140   0.57161   0.36662   0.30920   0.29266   0.27788   0.26548   0.22826   0.20877   0.20290   0.18646   0.15332   0.07662
        0.50000   0.78990   0.71977   0.72318   0.56306   0.36188   0.31991   0.29920   0.28715   0.27536   0.23481   0.22552   0.22002   0.19496   0.15739   0.08544
        0.90000   1.11357   0.91483   0.67012   0.41981   0.35196   0.35513   0.35463   0.36569   0.36728   0.35987   0.34973   0.32058   0.24562   0.18872   0.12002
      </tableData>

      <tableData breakPoint="10.00000">
                -10.00     -5.00      0.00      5.00     10.00     12.00     13.00     14.00     15.00     20.00     25.00     30.00     40.00     50.00     60.00
        0.20000   0.70929   0.66934   0.66068   0.67632   0.48019   0.37061   0.37360   0.31103   0.32671   0.25623   0.20632   0.18753   0.17946   0.14427   0.07051
        0.50000   0.76183   0.71540   0.69937   0.74177   0.43955   0.40790   0.38898   0.36819   0.31792   0.29212   0.18335   0.19391   0.18981   0.15182   0.05459
        0.90000   1.09593   0.93739   0.50974  -0.41160   0.37920   0.34611   0.34261   0.32128   0.31983   0.38852   0.29590   0.28057   0.23347   0.11711   0.11015
      </tableData>

    </table>
  </function>

  <function name="aero/CL_flaps_40">
    <table>
      <independentVar lookup="row">velocities/mach</independentVar>
      <independentVar lookup="column">aero/alpha-deg</independentVar>
      <independentVar lookup="table">aero/beta-deg</independentVar>
      <tableData breakPoint="-10.00000">
                -10.00     -5.00      0.00      5.00     10.00     12.00     13.00     14.00     15.00     20.00     25.00     30.00     40.00     50.00     60.00
        0.20000   0.00000   0.00000   0.00000   0.00000   0.00368   0.02252   0.03589   0.05517   0.06588   0.10110   0.11385   0.11538   0.12141   0.10216   0.04446
        0.50000   0.00000   0.00000   0.00000  -0.00492   0.01170   0.03884   0.05568   0.07193   0.08124   0.10716   0.11868   0.11823   0.12475   0.10893   0.06285
        0.90000   0.00000   0.00000   0.00320   0.00000   0.06735   0.09624   0.10209   0.10645   0.10998   0.12039   0.13695   0.13341   0.13683   0.12738   0.07148
      </tableData>

      <tableData breakPoint="0.00000">
                -10.00     -5.00      0.00      5.00     10.00     12.00     13.00     14.00     15.00     20.00     25.00     30.00     40.00     50.00     60.00
        0.20000   0.00000   0.00000   0.00000   0.00000   0.00249   0.03355   0.04992   0.06169   0.06999   0.09456   0.10887   0.12169   0.12447   0.10922   0.04360
        0.50000   0.00000   0.00000   0.00000   0.00000   0.01487   0.05158   0.06296   0.07078   0.07749   0.09814   0.11525   0.12633   0.12888   0.11248   0.05498
        0.90000   0.00000   0.00000   0.00000   0.00000   0.07046   0.08597   0.09205   0.09688   0.09981   0.12346   0.13800   0.13965   0.13890   0.12790   0.08461
      </tableData>

      <tableData breakPoint="10.00000">
                -10.00     -5.00      0.00      5.00     10.00     12.00     13.00     14.00     15.00     20.00     25.00     30.00     40.00     50.00     60.00
        0.20000   0.00000   0.00000   0.00000   0.00000   0.00379   0.02265   0.03592   0.05495   0.06593   0.09815   0.11399   0.11533   0.12130   0.10204   0.04295
        0.50000   0.00000   0.00000   0.00000   0.00000   0.01177   0.03886   0.05543   0.07193   0.08133   0.10704   0.11887   0.11813   0.12469   0.10900   0.04300
        0.90000   0.00000   0.00000   0.00308   0.00000   0.06762   0.09753   0.10196   0.10657   0.10916   0.12110   0.13704   0.13314   0.13687   0.12746   0.07172
      </tableData>

    </table>
  </function>

  <function name="aero/CL_flaps">
    <interpolate1d>
      <property>fcs/surfaces/flaps-pos-deg</property>
      <value>0</value> <value>0</value>
      <value>30</value> <property>aero/CL_flaps_30</property>
      <value>40</value> <property>aero/CL_flaps_40</property>
    </interpolate1d>
  </function>

  <!-- left-flaperon -->
  <function name="aero/CL_left-flaperon_-51">
    <table>
      <independentVar lookup="row">velocities/mach</independentVar>
      <independentVar lookup="column">aero/alpha-deg</independentVar>
      <independentVar lookup="table">aero/beta-deg</independentVar>
      <tableData breakPoint="-10.00000">
                -10.00     -5.00      0.00      5.00     10.00     12.00     13.00     14.00     15.00     20.00     25.00     30.00     40.00     50.00     60.00
        0.20000  -0.21195  -0.25475  -0.23112  -0.23875  -0.27159  -0.25679  -0.24780  -0.22726  -0.19931  -0.11596  -0.05961  -0.04850  -0.04337  -0.04597  -0.04274
        0.50000  -0.21670  -0.27852  -0.25008  -0.26276  -0.28266  -0.25911  -0.24647  -0.22147  -0.20209  -0.12640  -0.09447  -0.05510  -0.04396  -0.04033  -0.04380
        0.90000  -0.22918  -0.35796  -0.36471  -0.45105  -0.27038  -0.23189  -0.22385  -0.21115  -0.21589  -0.08681  -0.14785  -0.08928  -0.07192  -0.13155  -0.05794
      </tableData>

      <tableData breakPoint="0.00000">
                -10.00     -5.00      0.00      5.00     10.00     12.00     13.00     14.00     15.00     20.00     25.00     30.00     40.00     50.00     60.00
        0.20000  -0.23411  -0.26642  -0.24903  -0.27461  -0.27765  -0.25616  -0.24052  -0.22448  -0.20742  -0.14335  -0.09148  -0.06776  -0.04842  -0.04451  -0.05410
        0.50000  -0.24058  -0.28814  -0.26627  -0.29671  -0.29230  -0.26313  -0.24562  -0.22686  -0.21080  -0.14558  -0.09450  -0.06753  -0.04998  -0.04620  -0.05416
        0.90000  -0.25833  -0.38691  -0.33460  -0.43435  -0.36332  -0.31751  -0.29921  -0.28265  -0.26785  -0.17523  -0.12425  -0.10002  -0.07262  -0.05947  -0.06849
      </tableData>

      <tableData breakPoint="10.00000">
                -10.00     -5.00      0.00      5.00     10.00     12.00     13.00     14.00     15.00     20.00     25.00     30.00     40.00     50.00     60.00
        0.20000  -0.24542  -0.26691  -0.27106  -0.30907  -0.28152  -0.27523  -0.27343  -0.26368  -0.23776  -0.15898  -0.10504  -0.08224  -0.05346  -0.05186  -0.06250
        0.50000  -0.25596  -0.28909  -0.29754  -0.28078  -0.29620  -0.29152  -0.28310  -0.26345  -0.24930  -0.17914  -0.09967  -0.07805  -0.05787  -0.05194  -0.04212
        0.90000  -0.29910  -0.41950  -0.45868  -0.48214  -0.35225  -0.31929  -0.27909  -0.29677  -0.30591  -0.20672  -0.17223  -0.09867  -0.06693  -0.04468  -0.08864
      </tableData>

    </table>
  </function>

  <function name="aero/CL_left-flaperon">
    <interpolate1d>
      <property>fcs/surfaces/left-flaperon-pos-deg</property>
      <value>-51</value> <property>aero/CL_left-flaperon_-51</property>
      <value>0</value> <value>0</value>
    </interpolate1d>
  </function>

  <!-- right-flaperon -->
  <function name="aero/CL_right-flaperon_-51">
    <table>
      <independentVar lookup="row">velocities/mach</independentVar>
      <independentVar lookup="column">aero/alpha-deg</independentVar>
      <independentVar lookup="table">aero/beta-deg</independentVar>
      <tableData breakPoint="-10.00000">
                -10.00     -5.00      0.00      5.00     10.00     12.00     13.00     14.00     15.00     20.00     25.00     30.00     40.00     50.00     60.00
        0.20000  -0.24569  -0.26716  -0.27182  -0.30009  -0.28250  -0.27538  -0.27391  -0.26531  -0.23688  -0.15551  -0.10420  -0.08230  -0.05299  -0.05247  -0.05890
        0.50000  -0.25617  -0.28936  -0.29603  -0.27335  -0.29849  -0.29159  -0.28349  -0.26490  -0.24958  -0.17984  -0.09521  -0.07937  -0.05742  -0.05143  -0.02367
        0.90000  -0.29892  -0.41948  -0.45973  -0.47855  -0.35370  -0.32353  -0.27844  -0.29555  -0.30816  -0.20653  -0.17532  -0.09711  -0.06679  -0.04394  -0.08923
      </tableData>

      <tableData breakPoint="0.00000">
                -10.00     -5.00      0.00      5.00     10.00     12.00     13.00     14.00     15.00     20.00     25.00     30.00     40.00     50.00     60.00
        0.20000  -0.23387  -0.26628  -0.24963  -0.27469  -0.27772  -0.25611  -0.24043  -0.22435  -0.20726  -0.14326  -0.09119  -0.06765  -0.04826  -0.04412  -0.05370
        0.50000  -0.24040  -0.28799  -0.26690  -0.29683  -0.29238  -0.26310  -0.24553  -0.22676  -0.21071  -0.14455  -0.09445  -0.06749  -0.04992  -0.04587  -0.05394
        0.90000  -0.25831  -0.38692  -0.33409  -0.43435  -0.36338  -0.31739  -0.29905  -0.28239  -0.26763  -0.17486  -0.12383  -0.10018  -0.07293  -0.05988  -0.06857
      </tableData>

      <tableData breakPoint="10.00000">
                -10.00     -5.00      0.00      5.00     10.00     12.00     13.00     14.00     15.00     20.00     25.00     30.00     40.00     50.00     60.00
        0.20000  -0.21066  -0.25386  -0.23205  -0.36260  -0.26947  -0.25512  -0.24738  -0.22508  -0.19972  -0.11926  -0.05986  -0.04860  -0.04308  -0.04378  -0.04090
        0.50000  -0.21562  -0.27822  -0.24666  -0.26953  -0.28033  -0.25755  -0.24438  -0.21992  -0.20114  -0.12638  -0.09605  -0.05497  -0.04383  -0.04040  -0.05669
        0.90000  -0.23043  -0.36120  -0.36345  -0.44984  -0.27069  -0.22770  -0.22482  -0.21190  -0.21523  -0.08817  -0.14710  -0.09068  -0.07243  -0.13358  -0.05761
      </tableData>

    </table>
  </function>

  <function name="aero/CL_right-flaperon">
    <interpolate1d>
      <property>fcs/surfaces/right-flaperon-pos-deg</property>
      <value>-51</value> <property>aero/CL_right-flaperon_-51</property>
      <value>0</value> <value>0</value>
    </interpolate1d>
  </function>

  <!-- rudder -->
  <function name="aero/CL_rudder_-35">
    <table>
      <independentVar lookup="row">velocities/mach</independentVar>
      <independentVar lookup="column">aero/alpha-deg</independentVar>
      <independentVar lookup="table">aero/beta-deg</independentVar>
      <tableData breakPoint="-10.00000">
                -10.00     -5.00      0.00      5.00     10.00     12.00     13.00     14.00     15.00     20.00     25.00     30.00     40.00     50.00     60.00
        0.20000   0.00747   0.00306   0.00781  -0.03538   0.00683   0.00229   0.00000   0.00521  -0.00578   0.01049  -0.00711  -0.00340  -0.13371  -0.04411  -0.02139
        0.50000   0.00946  -0.00180   0.00731   0.07277   0.01097  -0.00112   0.00334   0.01429   0.02054  -0.00185  -0.04999  -0.00816  -0.04723  -0.05407   0.01081
        0.90000   0.01729   0.00991  -0.00746  -0.00059  -0.00697   0.05322   0.05003   0.02978  -0.00536  -0.00511  -0.07439  -0.02572  -0.04185  -0.04228  -0.02102
      </tableData>

      <tableData breakPoint="0.00000">
                -10.00     -5.00      0.00      5.00     10.00     12.00     13.00     14.00     15.00     20.00     25.00     30.00     40.00     50.00     60.00
        0.20000   0.01308   0.01277   0.01204   0.01209   0.01099   0.01148   0.01091   0.01081   0.01030   0.00422  -0.00383  -0.00038  -0.00993  -0.00040  -0.01734
        0.50000   0.01426   0.01387   0.01326   0.01256   0.01088   0.01061   0.01048   0.01039   0.00953  -0.00079  -0.00495  -0.00217  -0.00997  -0.00368  -0.00793
        0.90000   0.02117   0.02013   0.01916   0.01360   0.01017   0.00862   0.00662   0.00348  -0.00058  -0.00498  -0.00600  -0.00879  -0.01300  -0.00731  -0.00823
      </tableData>

      <tableData breakPoint="10.00000">
                -10.00     -5.00      0.00      5.00     10.00     12.00     13.00     14.00     15.00     20.00     25.00     30.00     40.00     50.00     60.00
        0.20000   0.01878   0.02187   0.01800  -0.01835  -0.00493  -0.01001  -0.00178  -0.00789  -0.01691   0.00196  -0.00302  -0.00757   0.00114  -0.01629  -0.04312
        0.50000   0.01905   0.02397   0.01749   0.06011   0.04257  -0.02197  -0.00352  -0.00621  -0.02725  -0.00896  -0.02226  -0.00996   0.00241  -0.01492   0.00102
        0.90000   0.02266   0.03018   0.02084  -0.00255  -0.00034   0.00686  -0.00394  -0.01344  -0.04376   0.00118  -0.05241  -0.00155  -0.00414  -0.06279   0.01370
      </tableData>

    </table>
  </function>

  <function name="aero/CL_rudder_4">
    <table>
      <independentVar lookup="row">velocities/mach</independentVar>
      <independentVar lookup="column">aero/alpha-deg</independentVar>
      <independentVar lookup="table">aero/beta-deg</independentVar>
      <tableData breakPoint="-10.00000">
                -10.00     -5.00      0.00      5.00     10.00     12.00     13.00     14.00     15.00     20.00     25.00     30.00     40.00     50.00     60.00
        0.20000   0.00191   0.00155   0.00098   0.00968   0.00415  -0.00060  -0.00089  -0.00445   0.00105  -0.00356   0.00165  -0.00172   0.00160  -0.00451  -0.01108
        0.50000   0.00168   0.00188   0.00056   0.00716  -0.00171  -0.00194  -0.00041  -0.00186   0.00578  -0.01137  -0.00308  -0.00191   0.00446   0.00630   0.00901
        0.90000   0.00151   0.00208   0.00384  -0.00044  -0.00347  -0.02377   0.00176  -0.00282  -0.03816  -0.00397  -0.01266   0.00372   0.00209  -0.01465   0.00277
      </tableData>

      <tableData breakPoint="0.00000">
                -10.00     -5.00      0.00      5.00     10.00     12.00     13.00     14.00     15.00     20.00     25.00     30.00     40.00     50.00     60.00
        0.20000   0.00023   0.00026   0.00048   0.00010   0.00010   0.00014   0.00020   0.00021   0.00069   0.00033   0.00015  -0.00044   0.00000   0.00012   0.00000
        0.50000   0.00024   0.00028   0.00022   0.00025   0.00024   0.00023   0.00028   0.00028   0.00033   0.00041   0.00000  -0.00010   0.00000  -0.00041   0.00013
        0.90000   0.00044   0.00042   0.00035   0.00025   0.00032   0.00025   0.00024   0.00023   0.00022   0.00000  -0.00010  -0.00032  -0.00065   0.00000  -0.00018
      </tableData>

      <tableData breakPoint="10.00000">
                -10.00     -5.00      0.00      5.00     10.00     12.00     13.00     14.00     15.00     20.00     25.00     30.00     40.00     50.00     60.00
        0.20000  -0.00036  -0.00105   0.00000  -0.00482  -0.00219  -0.00040  -0.00365   0.00998  -0.00114   0.00019  -0.00396   0.00138   0.00233   0.00663   0.00801
        0.50000  -0.00040  -0.00149  -0.00023  -0.00216  -0.00016   0.00121  -0.01503   0.01095   0.00413  -0.00349  -0.03773   0.00608  -0.00956  -0.00584   0.03500
        0.90000  -0.00052  -0.00121  -0.00076   0.00028   0.00106   0.05708   0.00198   0.00271   0.00410   0.00637   0.00974  -0.00775  -0.00355   0.00868  -0.00330
      </tableData>

    </table>
  </function>

  <function name="aero/CL_rudder_-4">
    <table>
      <independentVar lookup="row">velocities/mach</independentVar>
      <independentVar lookup="column">aero/alpha-deg</independentVar>
      <independentVar lookup="table">aero/beta-deg</independentVar>
      <tableData breakPoint="-10.00000">
                -10.00     -5.00      0.00      5.00     10.00     12.00     13.00     14.00     15.00     20.00     25.00     30.00     40.00     50.00     60.00
        0.20000  -0.00039  -0.00107  -0.00033  -0.00812  -0.00206  -0.00039  -0.00592   0.00990  -0.00135   0.00224  -0.00291   0.00140   0.00294   0.00719   0.00886
        0.50000  -0.00033  -0.00134  -0.00035   0.02314  -0.00076   0.00104  -0.01601   0.01157   0.00334  -0.00358   0.00085   0.00672  -0.00978  -0.00543   0.04828
        0.90000  -0.00058  -0.00122  -0.00019   0.00000   0.00041   0.05476   0.00236   0.00233   0.00352   0.00547   0.00885  -0.00724  -0.00330   0.00889  -0.00326
      </tableData>

      <tableData breakPoint="0.00000">
                -10.00     -5.00      0.00      5.00     10.00     12.00     13.00     14.00     15.00     20.00     25.00     30.00     40.00     50.00     60.00
        0.20000   0.00026   0.00027   0.00046   0.00021   0.00025   0.00031   0.00035   0.00039   0.00070   0.00026   0.00000  -0.00048   0.00000   0.00011   0.00000
        0.50000   0.00025   0.00028   0.00020   0.00021   0.00026   0.00025   0.00030   0.00029   0.00033   0.00035   0.00000  -0.00010   0.00000  -0.00048   0.00000
        0.90000   0.00044   0.00042   0.00039   0.00023   0.00029   0.00026   0.00026   0.00028   0.00024   0.00000  -0.00011  -0.00022  -0.00072   0.00014  -0.00013
      </tableData>

      <tableData breakPoint="10.00000">
                -10.00     -5.00      0.00      5.00     10.00     12.00     13.00     14.00     15.00     20.00     25.00     30.00     40.00     50.00     60.00
        0.20000   0.00193   0.00157   0.00104   0.00064   0.00445  -0.00067  -0.00062  -0.00340   0.00079  -0.00580   0.00156  -0.00169   0.00157  -0.00393  -0.01296
        0.50000   0.00154   0.00179   0.00062   0.01244  -0.00228  -0.00256   0.00000  -0.00123   0.00384  -0.01166  -0.00142  -0.00186   0.00396   0.00635   0.00222
        0.90000   0.00160   0.00205   0.00630  -0.00040  -0.00025  -0.01986   0.00087  -0.00248  -0.03853  -0.00224  -0.01207   0.00280   0.00206  -0.01501   0.00260
      </tableData>

    </table>
  </function>

  <function name="aero/CL_rudder_35">
    <table>
      <independentVar lookup="row">velocities/mach</independentVar>
      <independentVar lookup="column">aero/alpha-deg</independentVar>
      <independentVar lookup="table">aero/beta-deg</independentVar>
      <tableData breakPoint="-10.00000">
                -10.00     -5.00      0.00      5.00     10.00     12.00     13.00     14.00     15.00     20.00     25.00     30.00     40.00     50.00     60.00
        0.20000   0.02001   0.02206   0.01923  -0.00656  -0.01235  -0.01000  -0.00240  -0.00931  -0.01598   0.00473  -0.00201  -0.00708   0.00124  -0.01701  -0.04220
        0.50000   0.01970   0.02403   0.01863   0.06674   0.04366  -0.02358  -0.00433  -0.00763  -0.02775  -0.00963  -0.02088  -0.01018   0.00246  -0.01472   0.01436
        0.90000   0.02310   0.03014   0.01937  -0.00183   0.00045   0.00394  -0.00372  -0.01296  -0.04537   0.00000  -0.05753  -0.00098  -0.00380  -0.06118   0.01388
      </tableData>

      <tableData breakPoint="0.00000">
                -10.00     -5.00      0.00      5.00     10.00     12.00     13.00     14.00     15.00     20.00     25.00     30.00     40.00     50.00     60.00
        0.20000   0.01314   0.01275   0.01234   0.01199   0.01082   0.01127   0.01079   0.01067   0.01002   0.00379  -0.00338  -0.00054  -0.00956  -0.00028  -0.01737
        0.50000   0.01426   0.01387   0.01339   0.01252   0.01076   0.01061   0.01043   0.01028   0.00945  -0.00084  -0.00473  -0.00204  -0.00979  -0.00378  -0.00755
        0.90000   0.02125   0.02013   0.01922   0.01382   0.01034   0.00881   0.00680   0.00367  -0.00039  -0.00460  -0.00667  -0.00942  -0.01267  -0.00758  -0.00835
      </tableData>

      <tableData breakPoint="10.00000">
                -10.00     -5.00      0.00      5.00     10.00     12.00     13.00     14.00     15.00     20.00     25.00     30.00     40.00     50.00     60.00
        0.20000   0.00771   0.00265   0.00787  -0.05128   0.00646   0.00374  -0.00030   0.00544  -0.00564   0.00658  -0.00760  -0.00318  -0.16119  -0.04324  -0.02370
        0.50000   0.00932  -0.00154   0.00772   0.02436   0.01266  -0.00014   0.00309   0.01401   0.02049  -0.00095  -0.05181  -0.00793  -0.04815  -0.05389  -0.00338
        0.90000   0.01739   0.01006  -0.00970  -0.00140  -0.00295   0.05766   0.05040   0.04750  -0.00516  -0.00215  -0.07440  -0.02668  -0.04216  -0.03687  -0.02057
      </tableData>

    </table>
  </function>

  <function name="aero/CL_rudder">
    <interpolate1d>
      <property>fcs/surfaces/rudder-pos-deg</property>
      <value>-35</value> <property>aero/CL_rudder_-35</property>
      <value>-4</value> <property>aero/CL_rudder_-4</property>
      <value>0</value> <value>0</value>
      <value>4</value> <property>aero/CL_rudder_4</property>
      <value>35</value> <property>aero/CL_rudder_35</property>
    </interpolate1d>
  </function>

  <!-- slats -->
  <function name="aero/CL_slats_27.5">
    <table>
      <independentVar lookup="row">velocities/mach</independentVar>
      <independentVar lookup="column">aero/alpha-deg</independentVar>
      <independentVar lookup="table">aero/beta-deg</independentVar>
      <tableData breakPoint="-10.00000">
                -10.00     -5.00      0.00      5.00     10.00     12.00     13.00     14.00     15.00     20.00     25.00     30.00     40.00     50.00     60.00
        0.20000   0.00000   0.00000   0.00000   0.00000   0.00000   0.00000  -0.00011   0.00000   0.00000   0.00000  -0.00014   0.00000   0.00000   0.00000   0.00210
        0.50000   0.00000   0.00000   0.00000  -0.00010   0.00000  -0.00012   0.00000   0.00000   0.00000   0.00000   0.00000   0.00000   0.00000   0.00000   0.00000
        0.90000   0.00000   0.00000   0.00000   0.00000  -0.00017   0.00067   0.00000   0.00000   0.00024   0.00000   0.00033   0.00033   0.00000   0.00043   0.00000
      </tableData>

      <tableData breakPoint="0.00000">
                -10.00     -5.00      0.00      5.00     10.00     12.00     13.00     14.00     15.00     20.00     25.00     30.00     40.00     50.00     60.00
        0.20000   0.00000   0.00000   0.00000   0.00000   0.00000   0.00000   0.00000   0.00000   0.00000   0.00000   0.00000   0.00000   0.00000   0.00000  -0.00011
        0.50000   0.00000   0.00000   0.00000   0.00000   0.00000   0.00000   0.00000   0.00000   0.00000   0.00000   0.00000   0.00000   0.00000  -0.00013   0.00000
        0.90000   0.00000   0.00000   0.00000   0.00000   0.00000   0.00000   0.00000   0.00000   0.00000   0.00000   0.00000   0.00000   0.00000   0.00000   0.00000
      </tableData>

      <tableData breakPoint="10.00000">
                -10.00     -5.00      0.00      5.00     10.00     12.00     13.00     14.00     15.00     20.00     25.00     30.00     40.00     50.00     60.00
        0.20000   0.00000   0.00000   0.00000   0.00000   0.00000   0.00000   0.00000   0.00000   0.00000  -0.00123   0.00000   0.00000   0.00000   0.00023  -0.00190
        0.50000   0.00000   0.00000   0.00000   0.00000   0.00000   0.00000   0.00000   0.00000   0.00000   0.00000  -0.00013   0.00000   0.00000   0.00000  -0.00830
        0.90000   0.00000   0.00000   0.00000   0.00000   0.00030   0.00075   0.00000   0.00000   0.00000   0.00062   0.00027   0.00000   0.00000  -0.00011  -0.00018
      </tableData>

    </table>
  </function>

  <function name="aero/CL_slats">
    <interpolate1d>
      <property>fcs/surfaces/slats-pos-deg</property>
      <value>0</value> <value>0</value>
      <value>27.5</value> <property>aero/CL_slats_27.5</property>
    </interpolate1d>
  </function>

  <!-- speedbrake -->
  <function name="aero/CL_speedbrake_60">
    <table>
      <independentVar lookup="row">velocities/mach</independentVar>
      <independentVar lookup="column">aero/alpha-deg</independentVar>
      <independentVar lookup="table">aero/beta-deg</independentVar>
      <tableData breakPoint="-10.00000">
                -10.00     -5.00      0.00      5.00     10.00     12.00     13.00     14.00     15.00     20.00     25.00     30.00     40.00     50.00     60.00
        0.20000   0.00000   0.00000   0.00000   0.00000   0.00000   0.00000  -0.00010   0.00000   0.00000   0.00137   0.00000   0.00000   0.00000   0.00024   0.00063
        0.50000   0.00000   0.00000   0.00000  -0.00095   0.00000   0.00000   0.00000  -0.00019   0.00000   0.00000   0.00000   0.00000   0.00000   0.00000   0.00142
        0.90000   0.00000   0.00000   0.00000   0.00000  -0.00031   0.00024   0.00000  -0.00013   0.00018  -0.00055   0.00000   0.00000   0.00000   0.00014  -0.00017
      </tableData>

      <tableData breakPoint="0.00000">
                -10.00     -5.00      0.00      5.00     10.00     12.00     13.00     14.00     15.00     20.00     25.00     30.00     40.00     50.00     60.00
        0.20000   0.00000   0.00000   0.00000   0.00000   0.00000   0.00000   0.00000   0.00000   0.00000   0.00000   0.00000   0.00000   0.00000   0.00010   0.00000
        0.50000   0.00000   0.00000   0.00000   0.00000   0.00000   0.00000   0.00000   0.00000   0.00000   0.00000   0.00000   0.00000   0.00000   0.00000   0.00000
        0.90000   0.00000   0.00000   0.00000   0.00000   0.00000   0.00000   0.00000   0.00000   0.00000   0.00000   0.00000   0.00000   0.00000   0.00026   0.00000
      </tableData>

      <tableData breakPoint="10.00000">
                -10.00     -5.00      0.00      5.00     10.00     12.00     13.00     14.00     15.00     20.00     25.00     30.00     40.00     50.00     60.00
        0.20000   0.00000   0.00000   0.00000   0.00000   0.00000   0.00000   0.00000   0.00000   0.00000  -0.00114   0.00000   0.00000   0.00000   0.00017   0.00060
        0.50000   0.00000   0.00000   0.00000   0.00000   0.00000   0.00000   0.00000   0.00000   0.00000   0.00000   0.00000   0.00000   0.00000   0.00000  -0.00114
        0.90000   0.00000   0.00000   0.00000   0.00000   0.00041   0.00000   0.00000   0.00016   0.00000   0.00039   0.00051   0.00000   0.00000  -0.00079  -0.00016
      </tableData>

    </table>
  </function>

  <function name="aero/CL_speedbrake">
    <interpolate1d>
      <property>fcs/surfaces/speedbrake-pos-deg</property>
      <value>0</value> <value>0</value>
      <value>60</value> <property>aero/CL_speedbrake_60</property>
    </interpolate1d>
  </function>

  <!-- CDTOT -->
  <!-- base -->
  <function name="aero/CDtot_base">
    <table>
      <independentVar lookup="row">velocities/mach</independentVar>
      <independentVar lookup="column">aero/alpha-deg</independentVar>
      <independentVar lookup="table">aero/beta-deg</independentVar>
      <tableData breakPoint="-10.00000">
                -10.00     -5.00      0.00      5.00     10.00     12.00     13.00     14.00     15.00     20.00     25.00     30.00     40.00     50.00     60.00
        0.20000   0.03960   0.01605   0.01716   0.03865   0.07624   0.10401   0.11162   0.14520   0.13223   0.18399   0.24706   0.32539   0.49341   0.78331   1.17584
        0.50000   0.04157   0.01643   0.01807   0.04197   0.08208   0.11072   0.11886   0.15568   0.13938   0.19356   0.25837   0.35086   0.54304   0.87981   1.46094
        0.90000   0.04904   0.01732   0.02803   0.06020   0.10256   0.13847   0.15234   0.17164   0.17217   0.23051   0.29568   0.47111   0.85133   1.39630   2.53561
      </tableData>

      <tableData breakPoint="0.00000">
                -10.00     -5.00      0.00      5.00     10.00     12.00     13.00     14.00     15.00     20.00     25.00     30.00     40.00     50.00     60.00
        0.20000   0.03240   0.01110   0.00962   0.03597   0.08098   0.10168   0.11180   0.12201   0.13238   0.18696   0.24785   0.31739   0.49719   0.78599   1.22265
        0.50000   0.03503   0.01139   0.00984   0.03916   0.08841   0.10985   0.12070   0.13154   0.14271   0.20165   0.26748   0.34326   0.54720   0.88113   1.40858
        0.90000   0.04977   0.01294   0.01129   0.05714   0.12137   0.14854   0.16226   0.17633   0.19096   0.26867   0.35799   0.47215   0.80708   1.41606   2.58019
      </tableData>

      <tableData breakPoint="10.00000">
                -10.00     -5.00      0.00      5.00     10.00     12.00     13.00     14.00     15.00     20.00     25.00     30.00     40.00     50.00     60.00
        0.20000   0.03991   0.01606   0.01710   0.03869   0.07579   0.10385   0.11161   0.14585   0.13219   0.18411   0.24631   0.32508   0.49306   0.78180   1.17449
        0.50000   0.04214   0.01644   0.01806   0.04220   0.08163   0.11063   0.11885   0.15578   0.13950   0.19335   0.25734   0.35047   0.54261   0.87821   1.45460
        0.90000   0.04909   0.01733   0.02783   0.06027   0.10259   0.13894   0.15245   0.17140   0.17181   0.23045   0.29487   0.47124   0.85144   1.39651   2.53729
      </tableData>

    </table>
  </function>

  <!-- elevator -->
  <function name="aero/CDtot_elevator_-24">
    <table>
      <independentVar lookup="row">velocities/mach</independentVar>
      <independentVar lookup="column">aero/alpha-deg</independentVar>
      <independentVar lookup="table">aero/beta-deg</independentVar>
      <tableData breakPoint="-10.00000">
                -10.00     -5.00      0.00      5.00     10.00     12.00     13.00     14.00     15.00     20.00     25.00     30.00     40.00     50.00     60.00
        0.20000   0.00000   0.00000   0.00000   0.00000   0.00000   0.00000   0.00000   0.00010   0.00000   0.00000   0.00000   0.00000   0.00000   0.00000   0.00068
        0.50000   0.00000   0.00000   0.00000   0.00000   0.00000   0.00000   0.00000   0.00000   0.00000   0.00000   0.00000   0.00000   0.00000   0.00000   0.00012
        0.90000   0.00000   0.00000   0.00000   0.00000   0.00000   0.00000   0.00000   0.00000   0.00000  -0.00010   0.00000   0.00000   0.00000   0.00000   0.00000
      </tableData>

      <tableData breakPoint="0.00000">
                -10.00     -5.00      0.00      5.00     10.00     12.00     13.00     14.00     15.00     20.00     25.00     30.00     40.00     50.00     60.00
        0.20000   0.00000   0.00000   0.00000   0.00000   0.00000   0.00000   0.00000   0.00000   0.00000   0.00000   0.00000   0.00000   0.00000   0.00000  -0.00037
        0.50000   0.00000   0.00000   0.00000   0.00000   0.00000   0.00000   0.00000   0.00000   0.00000   0.00000   0.00000   0.00000   0.00000   0.00014   0.00000
        0.90000   0.00000   0.00000   0.00000   0.00000   0.00000   0.00000   0.00000   0.00000   0.00000   0.00000   0.00000   0.00000   0.00000   0.00000  -0.00013
      </tableData>

      <tableData breakPoint="10.00000">
                -10.00     -5.00      0.00      5.00     10.00     12.00     13.00     14.00     15.00     20.00     25.00     30.00     40.00     50.00     60.00
        0.20000   0.00000   0.00000   0.00000   0.00000   0.00000   0.00000   0.00000   0.00000   0.00000   0.00000   0.00000   0.00000   0.00000   0.00000  -0.00010
        0.50000   0.00000   0.00000   0.00000   0.00000   0.00000   0.00000   0.00000   0.00000   0.00000   0.00000   0.00000   0.00000   0.00000   0.00000   0.00334
        0.90000   0.00000   0.00000   0.00000   0.00000   0.00000   0.00000   0.00000   0.00000   0.00000   0.00000   0.00000   0.00000   0.00000   0.00000  -0.00079
      </tableData>

    </table>
  </function>

  <function name="aero/CDtot_elevator_-9.5">
    <table>
      <independentVar lookup="row">velocities/mach</independentVar>
      <independentVar lookup="column">aero/alpha-deg</independentVar>
      <independentVar lookup="table">aero/beta-deg</independentVar>
      <tableData breakPoint="-10.00000">
                -10.00     -5.00      0.00      5.00     10.00     12.00     13.00     14.00     15.00     20.00     25.00     30.00     40.00     50.00     60.00
        0.20000   0.00000   0.00000   0.00000   0.00000   0.00000   0.00000   0.00000   0.00010   0.00000   0.00000   0.00000   0.00000   0.00000   0.00000   0.00000
        0.50000   0.00000   0.00000   0.00000   0.00000   0.00000   0.00000   0.00000   0.00000   0.00000   0.00000   0.00000   0.00000   0.00000   0.00000   0.00032
        0.90000   0.00000   0.00000   0.00000   0.00000   0.00000   0.00000   0.00000   0.00000   0.00000   0.00000   0.00000   0.00000   0.00000   0.00000   0.00000
      </tableData>

      <tableData breakPoint="0.00000">
                -10.00     -5.00      0.00      5.00     10.00     12.00     13.00     14.00     15.00     20.00     25.00     30.00     40.00     50.00     60.00
        0.20000   0.00000   0.00000   0.00000   0.00000   0.00000   0.00000   0.00000   0.00000   0.00000   0.00000   0.00000   0.00000   0.00000   0.00015  -0.00029
        0.50000   0.00000   0.00000   0.00000   0.00000   0.00000   0.00000   0.00000   0.00000   0.00000   0.00000   0.00000   0.00000   0.00000   0.00000  -0.00011
        0.90000   0.00000   0.00000   0.00000   0.00000   0.00000   0.00000   0.00000   0.00000   0.00000   0.00000   0.00000   0.00000   0.00000   0.00000   0.00000
      </tableData>

      <tableData breakPoint="10.00000">
                -10.00     -5.00      0.00      5.00     10.00     12.00     13.00     14.00     15.00     20.00     25.00     30.00     40.00     50.00     60.00
        0.20000   0.00000   0.00000   0.00000   0.00000   0.00000   0.00000   0.00000   0.00000   0.00000   0.00000   0.00000   0.00000   0.00000   0.00000   0.00000
        0.50000   0.00000   0.00000   0.00000   0.00000   0.00000   0.00000   0.00000   0.00000   0.00000   0.00000   0.00000   0.00000   0.00000   0.00010   0.00358
        0.90000   0.00000   0.00000   0.00000   0.00000   0.00000   0.00000   0.00000   0.00000   0.00000   0.00000   0.00000   0.00000   0.00000   0.00010  -0.00063
      </tableData>

    </table>
  </function>

  <function name="aero/CDtot_elevator_1.5">
    <table>
      <independentVar lookup="row">velocities/mach</independentVar>
      <independentVar lookup="column">aero/alpha-deg</independentVar>
      <independentVar lookup="table">aero/beta-deg</independentVar>
      <tableData breakPoint="-10.00000">
                -10.00     -5.00      0.00      5.00     10.00     12.00     13.00     14.00     15.00     20.00     25.00     30.00     40.00     50.00     60.00
        0.20000   0.00000   0.00000   0.00000   0.00000   0.00000   0.00000   0.00000   0.00000   0.00000   0.00000   0.00000   0.00000   0.00000   0.00000   0.00069
        0.50000   0.00000   0.00000   0.00000   0.00000   0.00000   0.00000   0.00000   0.00000   0.00000   0.00000   0.00000   0.00000   0.00000   0.00000   0.00000
        0.90000   0.00000   0.00000   0.00000   0.00000   0.00000   0.00000   0.00000   0.00000   0.00000   0.00000   0.00000   0.00000   0.00000   0.00000   0.00000
      </tableData>

      <tableData breakPoint="0.00000">
                -10.00     -5.00      0.00      5.00     10.00     12.00     13.00     14.00     15.00     20.00     25.00     30.00     40.00     50.00     60.00
        0.20000   0.00000   0.00000   0.00000   0.00000   0.00000   0.00000   0.00000   0.00000   0.00000   0.00000   0.00000   0.00000   0.00000   0.00000  -0.00049
        0.50000   0.00000   0.00000   0.00000   0.00000   0.00000   0.00000   0.00000   0.00000   0.00000   0.00000   0.00000   0.00000   0.00000   0.00000   0.00000
        0.90000   0.00000   0.00000   0.00000   0.00000   0.00000   0.00000   0.00000   0.00000   0.00000   0.00000   0.00000   0.00000   0.00000  -0.00010   0.00023
      </tableData>

      <tableData breakPoint="10.00000">
                -10.00     -5.00      0.00      5.00     10.00     12.00     13.00     14.00     15.00     20.00     25.00     30.00     40.00     50.00     60.00
        0.20000   0.00000   0.00000   0.00000   0.00000   0.00000   0.00000   0.00000   0.00000   0.00000   0.00000   0.00000   0.00000   0.00000   0.00011  -0.00029
        0.50000   0.00000   0.00000   0.00000   0.00000   0.00000   0.00000   0.00000   0.00000   0.00000   0.00000   0.00000   0.00000   0.00000   0.00000   0.00323
        0.90000   0.00000   0.00000   0.00000   0.00000   0.00000   0.00000   0.00000   0.00000   0.00000   0.00000   0.00000   0.00000   0.00000   0.00000  -0.00056
      </tableData>

    </table>
  </function>

  <function name="aero/CDtot_elevator">
    <interpolate1d>
      <property>fcs/surfaces/elevator-pos-deg</property>
      <value>-24</value> <property>aero/CDtot_elevator_-24</property>
      <value>-9.5</value> <property>aero/CDtot_elevator_-9.5</property>
      <value>0</value> <value>0</value>
      <value>1.5</value> <property>aero/CDtot_elevator_1.5</property>
    </interpolate1d>
  </function>

  <!-- flaps -->
  <function name="aero/CDtot_flaps_30">
    <table>
      <independentVar lookup="row">velocities/mach</independentVar>
      <independentVar lookup="column">aero/alpha-deg</independentVar>
      <independentVar lookup="table">aero/beta-deg</independentVar>
      <tableData breakPoint="-10.00000">
                -10.00     -5.00      0.00      5.00     10.00     12.00     13.00     14.00     15.00     20.00     25.00     30.00     40.00     50.00     60.00
        0.20000   0.00364   0.04895   0.07792   0.10095   0.09016   0.09844   0.11561   0.09388   0.10088   0.10277   0.11270   0.12415   0.14826   0.17103   0.13312
        0.50000   0.00607   0.05646   0.08150   0.11438   0.10000   0.10271   0.10725   0.09268   0.10903   0.11087   0.12022   0.13723   0.16690   0.19418   0.20837
        0.90000   0.03150   0.10293   0.21682   0.13982   0.13252   0.11657   0.13904   0.15431   0.13472   0.13744   0.13660   0.20734   0.25578   0.33413   0.36345
      </tableData>

      <tableData breakPoint="0.00000">
                -10.00     -5.00      0.00      5.00     10.00     12.00     13.00     14.00     15.00     20.00     25.00     30.00     40.00     50.00     60.00
        0.20000   0.01108   0.05561   0.04567   0.10868   0.11289   0.11212   0.11208   0.11208   0.11201   0.11316   0.11841   0.12656   0.14757   0.17308   0.13870
        0.50000   0.01343   0.06368   0.04469   0.11685   0.12053   0.12042   0.12005   0.12036   0.12041   0.12279   0.12947   0.14168   0.16520   0.19306   0.17135
        0.90000   0.03647   0.10779   0.00520   0.15880   0.16475   0.16617   0.16794   0.16772   0.16891   0.17935   0.19458   0.21716   0.26881   0.34471   0.38333
      </tableData>

      <tableData breakPoint="10.00000">
                -10.00     -5.00      0.00      5.00     10.00     12.00     13.00     14.00     15.00     20.00     25.00     30.00     40.00     50.00     60.00
        0.20000   0.00332   0.04895   0.07922   0.10088   0.09070   0.09862   0.11440   0.09269   0.10026   0.10218   0.11257   0.12436   0.14822   0.17081   0.13265
        0.50000   0.00549   0.05642   0.08135   0.11488   0.10109   0.10295   0.10609   0.09147   0.10834   0.11065   0.12072   0.13736   0.16661   0.19377   0.21685
        0.90000   0.03139   0.10288   0.22309   0.13959   0.13306   0.11567   0.13878   0.15458   0.13487   0.13743   0.13731   0.20747   0.25686   0.33536   0.36264
      </tableData>

    </table>
  </function>

  <function name="aero/CDtot_flaps_40">
    <table>
      <independentVar lookup="row">velocities/mach</independentVar>
      <independentVar lookup="column">aero/alpha-deg</independentVar>
      <independentVar lookup="table">aero/beta-deg</independentVar>
      <tableData breakPoint="-10.00000">
                -10.00     -5.00      0.00      5.00     10.00     12.00     13.00     14.00     15.00     20.00     25.00     30.00     40.00     50.00     60.00
        0.20000   0.00000   0.00000   0.00000   0.00000   0.00034   0.00187   0.00314   0.00553   0.00733   0.01437   0.02261   0.02976   0.05003   0.06780   0.04308
        0.50000   0.00000   0.00000   0.00000   0.00030   0.00083   0.00386   0.00578   0.00892   0.00982   0.01668   0.02451   0.03310   0.05668   0.08190   0.06879
        0.90000   0.00000   0.00000   0.00000   0.00000   0.00832   0.01266   0.01429   0.01546   0.01682   0.02559   0.03483   0.05038   0.08797   0.14329   0.16676
      </tableData>

      <tableData breakPoint="0.00000">
                -10.00     -5.00      0.00      5.00     10.00     12.00     13.00     14.00     15.00     20.00     25.00     30.00     40.00     50.00     60.00
        0.20000   0.00000   0.00000   0.00000   0.00000   0.00020   0.00302   0.00485   0.00648   0.00789   0.01489   0.02234   0.03149   0.05102   0.07197   0.04788
        0.50000   0.00000   0.00000   0.00000   0.00000   0.00126   0.00507   0.00669   0.00806   0.00949   0.01671   0.02538   0.03548   0.05809   0.08358   0.07074
        0.90000   0.00000   0.00000   0.00000   0.00000   0.00801   0.01149   0.01333   0.01513   0.01670   0.02738   0.03999   0.05262   0.08930   0.14395   0.18161
      </tableData>

      <tableData breakPoint="10.00000">
                -10.00     -5.00      0.00      5.00     10.00     12.00     13.00     14.00     15.00     20.00     25.00     30.00     40.00     50.00     60.00
        0.20000   0.00000   0.00000   0.00000   0.00000   0.00034   0.00187   0.00315   0.00536   0.00731   0.01429   0.02256   0.02966   0.04993   0.06742   0.04251
        0.50000   0.00000   0.00000   0.00000   0.00000   0.00083   0.00385   0.00575   0.00939   0.00988   0.01666   0.02443   0.03303   0.05652   0.08174   0.07467
        0.90000   0.00000   0.00000   0.00010   0.00000   0.00832   0.01271   0.01438   0.01538   0.01675   0.02566   0.03473   0.05042   0.08804   0.14341   0.16679
      </tableData>

    </table>
  </function>

  <function name="aero/CDtot_flaps">
    <interpolate1d>
      <property>fcs/surfaces/flaps-pos-deg</property>
      <value>0</value> <value>0</value>
      <value>30</value> <property>aero/CDtot_flaps_30</property>
      <value>40</value> <property>aero/CDtot_flaps_40</property>
    </interpolate1d>
  </function>

  <!-- left-flaperon -->
  <function name="aero/CDtot_left-flaperon_-51">
    <table>
      <independentVar lookup="row">velocities/mach</independentVar>
      <independentVar lookup="column">aero/alpha-deg</independentVar>
      <independentVar lookup="table">aero/beta-deg</independentVar>
      <tableData breakPoint="-10.00000">
                -10.00     -5.00      0.00      5.00     10.00     12.00     13.00     14.00     15.00     20.00     25.00     30.00     40.00     50.00     60.00
        0.20000   0.02996   0.02411   0.00404  -0.29015  -0.01566  -0.02601  -0.02652  -0.04854  -0.02783  -0.03410  -0.03633  -0.04807  -0.05138  -0.06753  -0.08860
        0.50000   0.03391   0.02670   0.00407  -0.00689  -0.01642  -0.02639  -0.02789  -0.05279  -0.02864  -0.03486  -0.03581  -0.05286  -0.05893  -0.07560  -0.27777
        0.90000   0.06398   0.04460  -0.00277  -0.00937  -0.01401  -0.03391  -0.04433  -0.05263  -0.04251  -0.04629  -0.04256  -0.09292  -0.13646  -0.14874  -0.20672
      </tableData>

      <tableData breakPoint="0.00000">
                -10.00     -5.00      0.00      5.00     10.00     12.00     13.00     14.00     15.00     20.00     25.00     30.00     40.00     50.00     60.00
        0.20000   0.03542   0.02285   0.00606  -0.00996  -0.02675  -0.03170  -0.03338  -0.03477  -0.03589  -0.04098  -0.04265  -0.04341  -0.04794  -0.06186  -0.09603
        0.50000   0.03879   0.02604   0.00700  -0.01119  -0.02968  -0.03451  -0.03634  -0.03764  -0.03922  -0.04493  -0.04650  -0.04637  -0.05263  -0.06900  -0.10680
        0.90000   0.05764   0.04405   0.01811  -0.01718  -0.04331  -0.04966  -0.05281  -0.05589  -0.05888  -0.06662  -0.06894  -0.07351  -0.08962  -0.12048  -0.21584
      </tableData>

      <tableData breakPoint="10.00000">
                -10.00     -5.00      0.00      5.00     10.00     12.00     13.00     14.00     15.00     20.00     25.00     30.00     40.00     50.00     60.00
        0.20000   0.02971   0.02043   0.01015  -0.00997  -0.01803  -0.03162  -0.03213  -0.05734  -0.03608  -0.04461  -0.04868  -0.04137  -0.04585  -0.06406  -0.10462
        0.50000   0.03265   0.02305   0.00564  -0.01117  -0.01884  -0.03417  -0.03439  -0.06269  -0.03902  -0.04358  -0.05018  -0.04128  -0.04962  -0.06509  -0.19900
        0.90000   0.04764   0.03880   0.01389  -0.01701  -0.03548  -0.04789  -0.04900  -0.05012  -0.05141  -0.05664  -0.04807  -0.05204  -0.03979  -0.09119  -0.21452
      </tableData>

    </table>
  </function>

  <function name="aero/CDtot_left-flaperon">
    <interpolate1d>
      <property>fcs/surfaces/left-flaperon-pos-deg</property>
      <value>-51</value> <property>aero/CDtot_left-flaperon_-51</property>
      <value>0</value> <value>0</value>
    </interpolate1d>
  </function>

  <!-- right-flaperon -->
  <function name="aero/CDtot_right-flaperon_-51">
    <table>
      <independentVar lookup="row">velocities/mach</independentVar>
      <independentVar lookup="column">aero/alpha-deg</independentVar>
      <independentVar lookup="table">aero/beta-deg</independentVar>
      <tableData breakPoint="-10.00000">
                -10.00     -5.00      0.00      5.00     10.00     12.00     13.00     14.00     15.00     20.00     25.00     30.00     40.00     50.00     60.00
        0.20000   0.03005   0.02044   0.01309  -0.00981  -0.01795  -0.03172  -0.03217  -0.05671  -0.03612  -0.04440  -0.04913  -0.04141  -0.04579  -0.06400  -0.10357
        0.50000   0.03325   0.02307   0.00671  -0.01089  -0.01835  -0.03420  -0.03443  -0.06266  -0.03895  -0.04272  -0.05095  -0.04174  -0.04930  -0.06527  -0.19735
        0.90000   0.04770   0.03883   0.01433  -0.01710  -0.03564  -0.04744  -0.04890  -0.05047  -0.05146  -0.05648  -0.04723  -0.05223  -0.04060  -0.09044  -0.21448
      </tableData>

      <tableData breakPoint="0.00000">
                -10.00     -5.00      0.00      5.00     10.00     12.00     13.00     14.00     15.00     20.00     25.00     30.00     40.00     50.00     60.00
        0.20000   0.03543   0.02286   0.00609  -0.00997  -0.02678  -0.03173  -0.03341  -0.03480  -0.03591  -0.04100  -0.04267  -0.04348  -0.04795  -0.06190  -0.09581
        0.50000   0.03880   0.02604   0.00699  -0.01121  -0.02971  -0.03454  -0.03636  -0.03766  -0.03925  -0.04495  -0.04653  -0.04635  -0.05262  -0.06895  -0.10659
        0.90000   0.05764   0.04405   0.01819  -0.01719  -0.04333  -0.04966  -0.05280  -0.05587  -0.05886  -0.06654  -0.06883  -0.07354  -0.08969  -0.12065  -0.21549
      </tableData>

      <tableData breakPoint="10.00000">
                -10.00     -5.00      0.00      5.00     10.00     12.00     13.00     14.00     15.00     20.00     25.00     30.00     40.00     50.00     60.00
        0.20000   0.02961   0.02404   0.00425   0.00144  -0.01529  -0.02574  -0.02662  -0.04920  -0.02790  -0.03435  -0.03599  -0.04826  -0.05141  -0.06758  -0.08798
        0.50000   0.03330   0.02669   0.00412  -0.00667  -0.01612  -0.02619  -0.02796  -0.05303  -0.02882  -0.03473  -0.03511  -0.05298  -0.05902  -0.07540  -0.23285
        0.90000   0.06406   0.04461  -0.00228  -0.00893  -0.01401  -0.03433  -0.04448  -0.05242  -0.04220  -0.04634  -0.04194  -0.09325  -0.13721  -0.14996  -0.20702
      </tableData>

    </table>
  </function>

  <function name="aero/CDtot_right-flaperon">
    <interpolate1d>
      <property>fcs/surfaces/right-flaperon-pos-deg</property>
      <value>-51</value> <property>aero/CDtot_right-flaperon_-51</property>
      <value>0</value> <value>0</value>
    </interpolate1d>
  </function>

  <!-- rudder -->
  <function name="aero/CDtot_rudder_-35">
    <table>
      <independentVar lookup="row">velocities/mach</independentVar>
      <independentVar lookup="column">aero/alpha-deg</independentVar>
      <independentVar lookup="table">aero/beta-deg</independentVar>
      <tableData breakPoint="-10.00000">
                -10.00     -5.00      0.00      5.00     10.00     12.00     13.00     14.00     15.00     20.00     25.00     30.00     40.00     50.00     60.00
        0.20000  -0.00360   0.00028   0.00129   0.00096   0.01235  -0.00259   0.00029  -0.02496  -0.00151  -0.00098  -0.00450  -0.01739  -0.04836  -0.01789  -0.00206
        0.50000  -0.00249   0.00097   0.00192   0.00112   0.01242  -0.00097   0.00248  -0.02501   0.00164   0.00198   0.00000  -0.01704   0.00688  -0.02245  -0.09796
        0.90000   0.00844   0.00691   0.00261   0.00146   0.02044   0.00697   0.01472   0.00822   0.01420   0.01422   0.01835  -0.01051   0.01736  -0.00077  -0.01294
      </tableData>

      <tableData breakPoint="0.00000">
                -10.00     -5.00      0.00      5.00     10.00     12.00     13.00     14.00     15.00     20.00     25.00     30.00     40.00     50.00     60.00
        0.20000   0.01732   0.01847   0.02042   0.02124   0.02009   0.01964   0.01935   0.01903   0.01867   0.01577   0.01451   0.02017   0.01370   0.01389   0.00828
        0.50000   0.01898   0.02018   0.02208   0.02275   0.02136   0.02077   0.02045   0.02012   0.01970   0.01690   0.01590   0.02078   0.01716   0.01216   0.01482
        0.90000   0.02873   0.02946   0.03015   0.03007   0.02946   0.02882   0.02841   0.02785   0.02702   0.02645   0.02592   0.02497   0.02481   0.01264   0.00951
      </tableData>

      <tableData breakPoint="10.00000">
                -10.00     -5.00      0.00      5.00     10.00     12.00     13.00     14.00     15.00     20.00     25.00     30.00     40.00     50.00     60.00
        0.20000   0.02112   0.03137   0.03767   0.07294   0.03781   0.01785   0.02448   0.01147   0.01215   0.00881   0.01432   0.04098   0.03203   0.03464   0.01650
        0.50000   0.02202   0.03287   0.03964   0.02548   0.01531   0.02025   0.02462   0.00463   0.00819   0.02002   0.01307   0.04073   0.03340   0.03382  -0.06734
        0.90000   0.03015   0.03921   0.04875   0.03968   0.02359   0.04040   0.03900   0.03256   0.01584  -0.00370  -0.00847   0.03300  -0.01620   0.05131   0.00598
      </tableData>

    </table>
  </function>

  <function name="aero/CDtot_rudder_4">
    <table>
      <independentVar lookup="row">velocities/mach</independentVar>
      <independentVar lookup="column">aero/alpha-deg</independentVar>
      <independentVar lookup="table">aero/beta-deg</independentVar>
      <tableData breakPoint="-10.00000">
                -10.00     -5.00      0.00      5.00     10.00     12.00     13.00     14.00     15.00     20.00     25.00     30.00     40.00     50.00     60.00
        0.20000   0.00018   0.00311   0.00345   0.00262   0.00198   0.00233   0.00272   0.00302   0.00179   0.00209   0.00213   0.00475   0.00324   0.00465   0.00000
        0.50000   0.00113   0.00331   0.00364   0.00301   0.00212   0.00239   0.00199  -0.00063   0.00095   0.00468   0.00142   0.00511   0.00326   0.00356   0.00300
        0.90000   0.00319   0.00404   0.00391   0.00442   0.00026   0.00527   0.00355   0.00437   0.00729  -0.00105   0.00157   0.00519  -0.01002   0.00352  -0.00058
      </tableData>

      <tableData breakPoint="0.00000">
                -10.00     -5.00      0.00      5.00     10.00     12.00     13.00     14.00     15.00     20.00     25.00     30.00     40.00     50.00     60.00
        0.20000   0.00036   0.00039   0.00043   0.00043   0.00042   0.00040   0.00039   0.00038   0.00046   0.00036   0.00036   0.00035   0.00039   0.00046   0.00000
        0.50000   0.00040   0.00043   0.00047   0.00048   0.00046   0.00045   0.00043   0.00042   0.00042   0.00037   0.00036   0.00045   0.00045   0.00025   0.00036
        0.90000   0.00061   0.00063   0.00065   0.00065   0.00063   0.00060   0.00059   0.00058   0.00058   0.00050   0.00055   0.00053   0.00042   0.00127   0.00027
      </tableData>

      <tableData breakPoint="10.00000">
                -10.00     -5.00      0.00      5.00     10.00     12.00     13.00     14.00     15.00     20.00     25.00     30.00     40.00     50.00     60.00
        0.20000  -0.00190  -0.00239  -0.00206  -0.00209  -0.00167  -0.00241  -0.00246  -0.01962  -0.00207  -0.00358  -0.00230  -0.00437  -0.00295  -0.00483   0.00072
        0.50000  -0.00239  -0.00252  -0.00194  -0.00235  -0.00167  -0.00205  -0.00216  -0.01669  -0.00128  -0.00273  -0.00131  -0.00440  -0.00282  -0.00334  -0.05479
        0.90000  -0.00225  -0.00287   0.00081  -0.00336   0.00051  -0.00413  -0.00243  -0.00331  -0.00431   0.00165   0.00296  -0.00394   0.01480  -0.00057   0.00000
      </tableData>

    </table>
  </function>

  <function name="aero/CDtot_rudder_-4">
    <table>
      <independentVar lookup="row">velocities/mach</independentVar>
      <independentVar lookup="column">aero/alpha-deg</independentVar>
      <independentVar lookup="table">aero/beta-deg</independentVar>
      <tableData breakPoint="-10.00000">
                -10.00     -5.00      0.00      5.00     10.00     12.00     13.00     14.00     15.00     20.00     25.00     30.00     40.00     50.00     60.00
        0.20000  -0.00166  -0.00238  -0.00231  -0.00207  -0.00170  -0.00240  -0.00205  -0.01961  -0.00213  -0.00332  -0.00237  -0.00436  -0.00280  -0.00508   0.00029
        0.50000  -0.00189  -0.00251  -0.00223  -0.00208  -0.00168  -0.00204  -0.00219  -0.01714  -0.00139  -0.00262  -0.00126  -0.00441  -0.00274  -0.00278  -0.05744
        0.90000  -0.00224  -0.00286   0.00104  -0.00340   0.00050  -0.00359  -0.00269  -0.00328  -0.00414   0.00159   0.00360  -0.00399   0.01490  -0.00039  -0.00013
      </tableData>

      <tableData breakPoint="0.00000">
                -10.00     -5.00      0.00      5.00     10.00     12.00     13.00     14.00     15.00     20.00     25.00     30.00     40.00     50.00     60.00
        0.20000   0.00036   0.00039   0.00043   0.00044   0.00043   0.00041   0.00040   0.00039   0.00046   0.00035   0.00035   0.00035   0.00035   0.00042  -0.00025
        0.50000   0.00040   0.00043   0.00046   0.00047   0.00046   0.00045   0.00043   0.00041   0.00041   0.00035   0.00034   0.00046   0.00038   0.00012   0.00025
        0.90000   0.00061   0.00063   0.00065   0.00064   0.00062   0.00059   0.00059   0.00058   0.00057   0.00050   0.00053   0.00050   0.00037   0.00130   0.00028
      </tableData>

      <tableData breakPoint="10.00000">
                -10.00     -5.00      0.00      5.00     10.00     12.00     13.00     14.00     15.00     20.00     25.00     30.00     40.00     50.00     60.00
        0.20000   0.00016   0.00310   0.00341   0.00262   0.00196   0.00228   0.00271   0.00224   0.00188   0.00220   0.00214   0.00469   0.00330   0.00475  -0.00017
        0.50000   0.00092   0.00330   0.00355   0.00298   0.00207   0.00219   0.00198  -0.00091   0.00110   0.00532   0.00182   0.00509   0.00320   0.00342   0.00426
        0.90000   0.00315   0.00404   0.00442   0.00442   0.00039   0.00469   0.00335   0.00431   0.00771  -0.00104   0.00210   0.00496  -0.01034   0.00344  -0.00122
      </tableData>

    </table>
  </function>

  <function name="aero/CDtot_rudder_35">
    <table>
      <independentVar lookup="row">velocities/mach</independentVar>
      <independentVar lookup="column">aero/alpha-deg</independentVar>
      <independentVar lookup="table">aero/beta-deg</independentVar>
      <tableData breakPoint="-10.00000">
                -10.00     -5.00      0.00      5.00     10.00     12.00     13.00     14.00     15.00     20.00     25.00     30.00     40.00     50.00     60.00
        0.20000   0.02143   0.03138   0.03788   0.07461   0.03528   0.01758   0.02456   0.01232   0.01231   0.00923   0.01449   0.04103   0.03193   0.03369   0.01567
        0.50000   0.02267   0.03288   0.03990   0.02526   0.01766   0.01989   0.02443   0.00484   0.00822   0.02036   0.01257   0.04078   0.03326   0.03280  -0.07214
        0.90000   0.03017   0.03918   0.04871   0.03969   0.02471   0.04135   0.03924   0.03281   0.01517  -0.00377  -0.00759   0.03343  -0.01605   0.05010   0.00605
      </tableData>

      <tableData breakPoint="0.00000">
                -10.00     -5.00      0.00      5.00     10.00     12.00     13.00     14.00     15.00     20.00     25.00     30.00     40.00     50.00     60.00
        0.20000   0.01731   0.01846   0.02044   0.02124   0.02008   0.01963   0.01934   0.01902   0.01869   0.01572   0.01460   0.01999   0.01342   0.01371   0.00743
        0.50000   0.01897   0.02017   0.02210   0.02276   0.02137   0.02081   0.02048   0.02013   0.01972   0.01689   0.01587   0.02062   0.01697   0.01194   0.01385
        0.90000   0.02871   0.02946   0.03017   0.03010   0.02952   0.02890   0.02849   0.02793   0.02712   0.02656   0.02593   0.02492   0.02500   0.01261   0.00993
      </tableData>

      <tableData breakPoint="10.00000">
                -10.00     -5.00      0.00      5.00     10.00     12.00     13.00     14.00     15.00     20.00     25.00     30.00     40.00     50.00     60.00
        0.20000  -0.00390   0.00027   0.00133   0.00079   0.01262  -0.00225   0.00031  -0.02591  -0.00159  -0.00119  -0.00412  -0.01739  -0.08735  -0.01754   0.00020
        0.50000  -0.00306   0.00095   0.00189   0.00082   0.01270  -0.00080   0.00234  -0.02551   0.00146   0.00242   0.00037  -0.01697   0.00774  -0.02199  -0.09081
        0.90000   0.00839   0.00690   0.00266   0.00153   0.02065   0.00643   0.01496   0.00822   0.01409   0.01450   0.01924  -0.01083   0.01667  -0.00214  -0.01147
      </tableData>

    </table>
  </function>

  <function name="aero/CDtot_rudder">
    <interpolate1d>
      <property>fcs/surfaces/rudder-pos-deg</property>
      <value>-35</value> <property>aero/CDtot_rudder_-35</property>
      <value>-4</value> <property>aero/CDtot_rudder_-4</property>
      <value>0</value> <value>0</value>
      <value>4</value> <property>aero/CDtot_rudder_4</property>
      <value>35</value> <property>aero/CDtot_rudder_35</property>
    </interpolate1d>
  </function>

  <!-- slats -->
  <function name="aero/CDtot_slats_27.5">
    <table>
      <independentVar lookup="row">velocities/mach</independentVar>
      <independentVar lookup="column">aero/alpha-deg</independentVar>
      <independentVar lookup="table">aero/beta-deg</independentVar>
      <tableData breakPoint="-10.00000">
                -10.00     -5.00      0.00      5.00     10.00     12.00     13.00     14.00     15.00     20.00     25.00     30.00     40.00     50.00     60.00
        0.20000   0.00000   0.00000   0.00000   0.00000   0.00000   0.00000   0.00000   0.00000   0.00000   0.00000   0.00000   0.00000   0.00000   0.00000   0.00046
        0.50000   0.00000   0.00000   0.00000   0.00000   0.00000   0.00000   0.00000   0.00000   0.00000   0.00000   0.00000   0.00000   0.00000   0.00000   0.00022
        0.90000   0.00000   0.00000   0.00000   0.00000   0.00000   0.00000   0.00000   0.00000   0.00000   0.00000   0.00000   0.00000   0.00000   0.00000  -0.00021
      </tableData>

      <tableData breakPoint="0.00000">
                -10.00     -5.00      0.00      5.00     10.00     12.00     13.00     14.00     15.00     20.00     25.00     30.00     40.00     50.00     60.00
        0.20000   0.00000   0.00000   0.00000   0.00000   0.00000   0.00000   0.00000   0.00000   0.00000   0.00000   0.00000   0.00000   0.00000   0.00022  -0.00028
        0.50000   0.00000   0.00000   0.00000   0.00000   0.00000   0.00000   0.00000   0.00000   0.00000   0.00000   0.00000   0.00000   0.00000   0.00014  -0.00010
        0.90000   0.00000   0.00000   0.00000   0.00000   0.00000   0.00000   0.00000   0.00000   0.00000   0.00000   0.00000   0.00000   0.00000   0.00000   0.00000
      </tableData>

      <tableData breakPoint="10.00000">
                -10.00     -5.00      0.00      5.00     10.00     12.00     13.00     14.00     15.00     20.00     25.00     30.00     40.00     50.00     60.00
        0.20000   0.00000   0.00000   0.00000   0.00000   0.00000   0.00000   0.00000   0.00000   0.00000   0.00000   0.00000   0.00000   0.00000  -0.00011  -0.00021
        0.50000   0.00000   0.00000   0.00000   0.00000   0.00000   0.00000   0.00000   0.00000   0.00000   0.00000   0.00000   0.00000   0.00000   0.00000   0.00341
        0.90000   0.00000   0.00000   0.00000   0.00000   0.00000   0.00000   0.00000   0.00000   0.00000   0.00000   0.00000   0.00000   0.00000   0.00000  -0.00054
      </tableData>

    </table>
  </function>

  <function name="aero/CDtot_slats">
    <interpolate1d>
      <property>fcs/surfaces/slats-pos-deg</property>
      <value>0</value> <value>0</value>
      <value>27.5</value> <property>aero/CDtot_slats_27.5</property>
    </interpolate1d>
  </function>

  <!-- speedbrake -->
  <function name="aero/CDtot_speedbrake_60">
    <table>
      <independentVar lookup="row">velocities/mach</independentVar>
      <independentVar lookup="column">aero/alpha-deg</independentVar>
      <independentVar lookup="table">aero/beta-deg</independentVar>
      <tableData breakPoint="-10.00000">
                -10.00     -5.00      0.00      5.00     10.00     12.00     13.00     14.00     15.00     20.00     25.00     30.00     40.00     50.00     60.00
        0.20000   0.00000   0.00000   0.00000   0.00000   0.00000   0.00000   0.00000   0.00000   0.00000   0.00000   0.00000   0.00000   0.00000   0.00000   0.00000
        0.50000   0.00000   0.00000   0.00000   0.00000   0.00000   0.00000   0.00000   0.00000   0.00000   0.00000   0.00000   0.00000   0.00000   0.00000   0.00013
        0.90000   0.00000   0.00000   0.00000   0.00000   0.00000   0.00000   0.00000   0.00000   0.00000   0.00000   0.00000   0.00000   0.00000   0.00000   0.00000
      </tableData>

      <tableData breakPoint="0.00000">
                -10.00     -5.00      0.00      5.00     10.00     12.00     13.00     14.00     15.00     20.00     25.00     30.00     40.00     50.00     60.00
        0.20000   0.00000   0.00000   0.00000   0.00000   0.00000   0.00000   0.00000   0.00000   0.00000   0.00000   0.00000   0.00000   0.00000   0.00027  -0.00011
        0.50000   0.00000   0.00000   0.00000   0.00000   0.00000   0.00000   0.00000   0.00000   0.00000   0.00000   0.00000   0.00000   0.00000   0.00000  -0.00013
        0.90000   0.00000   0.00000   0.00000   0.00000   0.00000   0.00000   0.00000   0.00000   0.00000   0.00000   0.00000   0.00000   0.00000   0.00103   0.00000
      </tableData>

      <tableData breakPoint="10.00000">
                -10.00     -5.00      0.00      5.00     10.00     12.00     13.00     14.00     15.00     20.00     25.00     30.00     40.00     50.00     60.00
        0.20000   0.00000   0.00000   0.00000   0.00000   0.00000   0.00000   0.00000   0.00000   0.00000   0.00000   0.00000   0.00000   0.00000   0.00000   0.00035
        0.50000   0.00000   0.00000   0.00000   0.00000   0.00000   0.00000   0.00000   0.00000   0.00000   0.00000   0.00000   0.00000   0.00000   0.00000   0.00059
        0.90000   0.00000   0.00000   0.00000   0.00000   0.00000   0.00000   0.00000   0.00000   0.00000  -0.00010   0.00000   0.00000   0.00000   0.00000  -0.00068
      </tableData>

    </table>
  </function>

  <function name="aero/CDtot_speedbrake">
    <interpolate1d>
      <property>fcs/surfaces/speedbrake-pos-deg</property>
      <value>0</value> <value>0</value>
      <value>60</value> <property>aero/CDtot_speedbrake_60</property>
    </interpolate1d>
  </function>

  <!-- CS -->
  <!-- base -->
  <function name="aero/CS_base">
    <table>
      <independentVar lookup="row">velocities/mach</independentVar>
      <independentVar lookup="column">aero/alpha-deg</independentVar>
      <independentVar lookup="table">aero/beta-deg</independentVar>
      <tableData breakPoint="-10.00000">
                -10.00     -5.00      0.00      5.00     10.00     12.00     13.00     14.00     15.00     20.00     25.00     30.00     40.00     50.00     60.00
        0.20000   0.05066   0.06362   0.06514   0.03465   0.05690   0.06968   0.04567   0.09284   0.09167   0.07231   0.04583  -0.03189  -0.11478  -0.23406  -0.30975
        0.50000   0.05024   0.06446   0.06428   0.06504   0.05584   0.06275   0.04225   0.09810   0.09112   0.04833   0.04256  -0.03547  -0.11697  -0.23598  -0.39592
        0.90000   0.04551   0.06512   0.07190   0.04843   0.03561  -0.05222  -0.04207  -0.00173   0.02754   0.00845   0.01447  -0.02673  -0.17398  -0.29673  -0.39546
      </tableData>

      <tableData breakPoint="0.00000">
                -10.00     -5.00      0.00      5.00     10.00     12.00     13.00     14.00     15.00     20.00     25.00     30.00     40.00     50.00     60.00
        0.20000   0.00000  -0.00000   0.00000   0.00011   0.00032   0.00038   0.00039   0.00040   0.00043   0.00077   0.00109   0.00094   0.00132   0.00177   0.00163
        0.50000   0.00000  -0.00000   0.00000   0.00000   0.00015   0.00019   0.00019   0.00036   0.00036   0.00068   0.00088   0.00092   0.00121   0.00274   0.00178
        0.90000   0.00000   0.00000   0.00000   0.00000  -0.00011  -0.00010  -0.00011  -0.00011  -0.00012  -0.00012  -0.00023  -0.00037  -0.00029   0.00023   0.00105
      </tableData>

      <tableData breakPoint="10.00000">
                -10.00     -5.00      0.00      5.00     10.00     12.00     13.00     14.00     15.00     20.00     25.00     30.00     40.00     50.00     60.00
        0.20000  -0.05087  -0.06374  -0.06503  -0.02313  -0.05592  -0.06980  -0.04610  -0.09430  -0.09179  -0.07286  -0.04573   0.03206   0.11544   0.23277   0.31182
        0.50000  -0.05084  -0.06455  -0.06419  -0.04216  -0.05522  -0.06265  -0.04276  -0.09893  -0.09163  -0.04918  -0.04090   0.03552   0.11775   0.23455   0.36618
        0.90000  -0.04607  -0.06518  -0.07456  -0.04864  -0.03656   0.05221   0.04108   0.00115  -0.02809  -0.01164  -0.02030   0.02345   0.17144   0.29440   0.39652
      </tableData>

    </table>
  </function>

  <!-- elevator -->
  <function name="aero/CS_elevator_-24">
    <table>
      <independentVar lookup="row">velocities/mach</independentVar>
      <independentVar lookup="column">aero/alpha-deg</independentVar>
      <independentVar lookup="table">aero/beta-deg</independentVar>
      <tableData breakPoint="-10.00000">
                -10.00     -5.00      0.00      5.00     10.00     12.00     13.00     14.00     15.00     20.00     25.00     30.00     40.00     50.00     60.00
        0.20000   0.00000   0.00000   0.00000   0.00000   0.00000   0.00000   0.00000   0.00000   0.00000   0.00040   0.00000   0.00000   0.00000   0.00026  -0.00120
        0.50000   0.00000   0.00000   0.00000   0.00000   0.00000   0.00000   0.00000   0.00000   0.00000   0.00000   0.00017   0.00000   0.00000   0.00000   0.00413
        0.90000   0.00000   0.00000   0.00000   0.00000  -0.00073   0.00053   0.00000   0.00000  -0.00013   0.00000  -0.00064   0.00010  -0.00013   0.00000   0.00011
      </tableData>

      <tableData breakPoint="0.00000">
                -10.00     -5.00      0.00      5.00     10.00     12.00     13.00     14.00     15.00     20.00     25.00     30.00     40.00     50.00     60.00
        0.20000   0.00000   0.00000   0.00000   0.00000   0.00000   0.00000   0.00000   0.00000   0.00000   0.00000   0.00000   0.00000   0.00000   0.00000   0.00000
        0.50000   0.00000   0.00000   0.00010   0.00000   0.00000   0.00000   0.00000   0.00000   0.00000   0.00000   0.00000   0.00000   0.00000  -0.00112   0.00013
        0.90000   0.00000   0.00000   0.00000   0.00000   0.00000   0.00000   0.00000   0.00000   0.00000   0.00000   0.00000   0.00000   0.00000   0.00000   0.00000
      </tableData>

      <tableData breakPoint="10.00000">
                -10.00     -5.00      0.00      5.00     10.00     12.00     13.00     14.00     15.00     20.00     25.00     30.00     40.00     50.00     60.00
        0.20000   0.00000   0.00000   0.00000   0.00000   0.00000   0.00000   0.00000   0.00000   0.00000  -0.00033   0.00000   0.00000   0.00000   0.00045  -0.00047
        0.50000   0.00000   0.00000   0.00000   0.00000   0.00000   0.00000   0.00000   0.00000   0.00000   0.00000   0.00000  -0.00010   0.00000  -0.00011   0.01511
        0.90000   0.00000   0.00000   0.00000   0.00000  -0.00082   0.00044   0.00000   0.00000   0.00000   0.00017   0.00031   0.00000   0.00000   0.00000   0.00015
      </tableData>

    </table>
  </function>

  <function name="aero/CS_elevator_-9.5">
    <table>
      <independentVar lookup="row">velocities/mach</independentVar>
      <independentVar lookup="column">aero/alpha-deg</independentVar>
      <independentVar lookup="table">aero/beta-deg</independentVar>
      <tableData breakPoint="-10.00000">
                -10.00     -5.00      0.00      5.00     10.00     12.00     13.00     14.00     15.00     20.00     25.00     30.00     40.00     50.00     60.00
        0.20000   0.00000   0.00000   0.00000   0.00000   0.00000   0.00000   0.00000   0.00000   0.00000  -0.00021  -0.00016   0.00000   0.00000   0.00037  -0.00033
        0.50000   0.00000   0.00000   0.00000   0.00000   0.00000   0.00000   0.00011   0.00011   0.00000   0.00014   0.00000   0.00012   0.00000  -0.00013   0.00425
        0.90000   0.00000   0.00000   0.00000   0.00000  -0.00037   0.00044   0.00000   0.00000   0.00082   0.00000   0.00000   0.00014  -0.00014   0.00023   0.00000
      </tableData>

      <tableData breakPoint="0.00000">
                -10.00     -5.00      0.00      5.00     10.00     12.00     13.00     14.00     15.00     20.00     25.00     30.00     40.00     50.00     60.00
        0.20000   0.00000   0.00000   0.00000   0.00000   0.00000   0.00000   0.00000   0.00000   0.00000   0.00000   0.00000   0.00000   0.00000   0.00000  -0.00012
        0.50000   0.00000   0.00000   0.00010   0.00000   0.00000   0.00000   0.00000   0.00000   0.00000   0.00000   0.00000   0.00000  -0.00013   0.00000   0.00000
        0.90000   0.00000   0.00000   0.00000   0.00000   0.00000   0.00000   0.00000   0.00000   0.00000   0.00000   0.00000   0.00000   0.00000   0.00000   0.00000
      </tableData>

      <tableData breakPoint="10.00000">
                -10.00     -5.00      0.00      5.00     10.00     12.00     13.00     14.00     15.00     20.00     25.00     30.00     40.00     50.00     60.00
        0.20000   0.00000   0.00000   0.00000   0.00000   0.00000   0.00000   0.00000   0.00000   0.00000  -0.00067   0.00000   0.00000   0.00000   0.00055  -0.00033
        0.50000   0.00000   0.00000   0.00000   0.00000   0.00000   0.00000   0.00000  -0.00011   0.00000   0.00000   0.00000  -0.00010   0.00000   0.00000   0.02048
        0.90000   0.00000   0.00000   0.00000   0.00000  -0.00019   0.00098   0.00000   0.00000   0.00000   0.00000   0.00042  -0.00013   0.00000   0.00011   0.00000
      </tableData>

    </table>
  </function>

  <function name="aero/CS_elevator_1.5">
    <table>
      <independentVar lookup="row">velocities/mach</independentVar>
      <independentVar lookup="column">aero/alpha-deg</independentVar>
      <independentVar lookup="table">aero/beta-deg</independentVar>
      <tableData breakPoint="-10.00000">
                -10.00     -5.00      0.00      5.00     10.00     12.00     13.00     14.00     15.00     20.00     25.00     30.00     40.00     50.00     60.00
        0.20000   0.00000   0.00000   0.00000   0.00000   0.00000   0.00000   0.00017   0.00000   0.00000   0.00000   0.00000   0.00000   0.00000  -0.00014  -0.00146
        0.50000   0.00000   0.00000   0.00000  -0.00056   0.00000   0.00000   0.00010   0.00000   0.00000   0.00000   0.00000   0.00000   0.00000  -0.00018   0.00576
        0.90000   0.00000   0.00000   0.00000   0.00000  -0.00052   0.00052   0.00000   0.00000   0.00080   0.00000  -0.00011   0.00000  -0.00019  -0.00019   0.00000
      </tableData>

      <tableData breakPoint="0.00000">
                -10.00     -5.00      0.00      5.00     10.00     12.00     13.00     14.00     15.00     20.00     25.00     30.00     40.00     50.00     60.00
        0.20000   0.00000   0.00000   0.00000   0.00000   0.00000   0.00000   0.00000   0.00000   0.00000   0.00000   0.00000   0.00000   0.00000   0.00000  -0.00011
        0.50000   0.00000   0.00000   0.00000   0.00000   0.00000   0.00000   0.00000   0.00000   0.00000   0.00000   0.00000   0.00000   0.00000   0.00000   0.00000
        0.90000   0.00000   0.00000   0.00000   0.00000   0.00000   0.00000   0.00000   0.00000   0.00000   0.00000   0.00000   0.00000   0.00000   0.00000   0.00000
      </tableData>

      <tableData breakPoint="10.00000">
                -10.00     -5.00      0.00      5.00     10.00     12.00     13.00     14.00     15.00     20.00     25.00     30.00     40.00     50.00     60.00
        0.20000   0.00000   0.00000   0.00000   0.00000   0.00000   0.00000   0.00000   0.00000   0.00000  -0.00035   0.00012   0.00010   0.00000   0.00010  -0.00066
        0.50000   0.00000   0.00000   0.00000   0.00000   0.00000   0.00000   0.00000  -0.00011   0.00000   0.00000   0.00000   0.00000   0.00000   0.00000   0.01469
        0.90000   0.00000   0.00000   0.00000   0.00000  -0.00047   0.00050   0.00000   0.00000  -0.00072   0.00010   0.00079   0.00000   0.00000  -0.00014  -0.00012
      </tableData>

    </table>
  </function>

  <function name="aero/CS_elevator">
    <interpolate1d>
      <property>fcs/surfaces/elevator-pos-deg</property>
      <value>-24</value> <property>aero/CS_elevator_-24</property>
      <value>-9.5</value> <property>aero/CS_elevator_-9.5</property>
      <value>0</value> <value>0</value>
      <value>1.5</value> <property>aero/CS_elevator_1.5</property>
    </interpolate1d>
  </function>

  <!-- flaps -->
  <function name="aero/CS_flaps_30">
    <table>
      <independentVar lookup="row">velocities/mach</independentVar>
      <independentVar lookup="column">aero/alpha-deg</independentVar>
      <independentVar lookup="table">aero/beta-deg</independentVar>
      <tableData breakPoint="-10.00000">
                -10.00     -5.00      0.00      5.00     10.00     12.00     13.00     14.00     15.00     20.00     25.00     30.00     40.00     50.00     60.00
        0.20000  -0.01224  -0.03188  -0.01030  -0.17986  -0.03502  -0.00267   0.01062  -0.01526  -0.03197  -0.02993  -0.02225  -0.01929  -0.03270  -0.03135  -0.03231
        0.50000  -0.01335  -0.03559  -0.04737  -0.21619  -0.16350  -0.20781  -0.05910  -0.11556  -0.04388  -0.07820  -0.02194  -0.02700  -0.03423  -0.05312  -0.10280
        0.90000  -0.01365  -0.05107   0.02583  -0.08925  -0.16250  -0.14901  -0.16325  -0.11064  -0.08834  -0.08801  -0.03548  -0.04901  -0.05042  -0.05516  -0.04661
      </tableData>

      <tableData breakPoint="0.00000">
                -10.00     -5.00      0.00      5.00     10.00     12.00     13.00     14.00     15.00     20.00     25.00     30.00     40.00     50.00     60.00
        0.20000   0.00000  -0.00039   0.00010   0.00154   0.00062   0.00057   0.00070   0.00057   0.00060   0.00080   0.00075   0.00062   0.00054   0.00042   0.00025
        0.50000  -0.00000  -0.00046   0.00000   0.00098   0.00077   0.00078   0.00082   0.00065   0.00058   0.00016   0.00076   0.00032   0.00083  -0.00069   0.00016
        0.90000  -0.00000   0.00000  -0.00056  -0.00151  -0.00076  -0.00059  -0.00061  -0.00050  -0.00036  -0.00051  -0.00045  -0.00074  -0.00044  -0.00023  -0.00020
      </tableData>

      <tableData breakPoint="10.00000">
                -10.00     -5.00      0.00      5.00     10.00     12.00     13.00     14.00     15.00     20.00     25.00     30.00     40.00     50.00     60.00
        0.20000   0.01223   0.03170   0.00903   0.19131   0.05465   0.00444  -0.00897   0.01748   0.03271   0.03127   0.02267   0.02114   0.03306   0.03171   0.03145
        0.50000   0.01374   0.03544   0.04212   0.17831   0.16639   0.20646   0.06103   0.12108   0.04277   0.07822   0.01990   0.02776   0.03427   0.05189   0.13501
        0.90000   0.01402   0.05196  -0.05246   0.06166   0.14859   0.14788   0.16130   0.10871   0.08466   0.08713   0.03536   0.04682   0.04985   0.05648   0.04593
      </tableData>

    </table>
  </function>

  <function name="aero/CS_flaps_40">
    <table>
      <independentVar lookup="row">velocities/mach</independentVar>
      <independentVar lookup="column">aero/alpha-deg</independentVar>
      <independentVar lookup="table">aero/beta-deg</independentVar>
      <tableData breakPoint="-10.00000">
                -10.00     -5.00      0.00      5.00     10.00     12.00     13.00     14.00     15.00     20.00     25.00     30.00     40.00     50.00     60.00
        0.20000   0.00000   0.00000   0.00000   0.00000   0.00495   0.00379   0.00303   0.00684   0.00710   0.00163   0.00047  -0.00789  -0.01295  -0.01857  -0.01325
        0.50000   0.00000   0.00000   0.00000   0.00638   0.00460   0.00604   0.00537   0.00969   0.01047   0.00112   0.00274  -0.00631  -0.01304  -0.01812   0.01091
        0.90000   0.00000   0.00000  -0.00025   0.00179   0.00388   0.00246   0.00193   0.00334   0.00873   0.00237   0.00280  -0.00617  -0.01506  -0.02762  -0.02360
      </tableData>

      <tableData breakPoint="0.00000">
                -10.00     -5.00      0.00      5.00     10.00     12.00     13.00     14.00     15.00     20.00     25.00     30.00     40.00     50.00     60.00
        0.20000   0.00000   0.00000   0.00000   0.00000   0.00000   0.00000   0.00000   0.00000   0.00000   0.00000   0.00000   0.00000   0.00000   0.00000   0.00000
        0.50000   0.00000   0.00000   0.00000   0.00000   0.00000   0.00000   0.00000   0.00000   0.00000   0.00000   0.00000   0.00000   0.00000  -0.00111   0.00000
        0.90000   0.00000   0.00000   0.00000   0.00000   0.00000   0.00000   0.00000   0.00000   0.00000   0.00000   0.00000   0.00000   0.00000   0.00000   0.00000
      </tableData>

      <tableData breakPoint="10.00000">
                -10.00     -5.00      0.00      5.00     10.00     12.00     13.00     14.00     15.00     20.00     25.00     30.00     40.00     50.00     60.00
        0.20000   0.00000   0.00000   0.00000   0.00000  -0.00475  -0.00377  -0.00304  -0.00682  -0.00711  -0.00219  -0.00052   0.00792   0.01296   0.01901   0.01300
        0.50000   0.00000   0.00000   0.00000   0.00000  -0.00459  -0.00602  -0.00516  -0.01017  -0.01079  -0.00105  -0.00263   0.00603   0.01295   0.01797   0.04311
        0.90000   0.00000   0.00000   0.00025  -0.00185  -0.00414  -0.00174  -0.00145  -0.00319  -0.00794  -0.00237  -0.00269   0.00621   0.01502   0.02768   0.02372
      </tableData>

    </table>
  </function>

  <function name="aero/CS_flaps">
    <interpolate1d>
      <property>fcs/surfaces/flaps-pos-deg</property>
      <value>0</value> <value>0</value>
      <value>30</value> <property>aero/CS_flaps_30</property>
      <value>40</value> <property>aero/CS_flaps_40</property>
    </interpolate1d>
  </function>

  <!-- left-flaperon -->
  <function name="aero/CS_left-flaperon_-51">
    <table>
      <independentVar lookup="row">velocities/mach</independentVar>
      <independentVar lookup="column">aero/alpha-deg</independentVar>
      <independentVar lookup="table">aero/beta-deg</independentVar>
      <tableData breakPoint="-10.00000">
                -10.00     -5.00      0.00      5.00     10.00     12.00     13.00     14.00     15.00     20.00     25.00     30.00     40.00     50.00     60.00
        0.20000   0.00167   0.00891   0.00528  -0.03367   0.00522   0.00024   0.03060  -0.01503  -0.01613  -0.02196  -0.02983  -0.02492   0.00112  -0.00389   0.01540
        0.50000  -0.00040   0.00508   0.01040   0.02884   0.00679   0.00793   0.03290  -0.01660  -0.00785   0.01083  -0.02168  -0.02378   0.00233   0.00321   0.12207
        0.90000  -0.02045   0.00669   0.02065   0.07854   0.04401   0.10419   0.09977   0.06534   0.04450   0.03993   0.02650  -0.02664   0.02651   0.06200   0.02167
      </tableData>

      <tableData breakPoint="0.00000">
                -10.00     -5.00      0.00      5.00     10.00     12.00     13.00     14.00     15.00     20.00     25.00     30.00     40.00     50.00     60.00
        0.20000   0.01348   0.01834   0.01876   0.01588   0.00426  -0.00038  -0.00289  -0.00568  -0.00840  -0.02125  -0.03216  -0.03384  -0.02425  -0.01896  -0.00609
        0.50000   0.01324   0.01915   0.01926   0.01759   0.00525   0.00014  -0.00252  -0.00571  -0.00843  -0.02222  -0.03452  -0.03728  -0.02529  -0.02084  -0.00447
        0.90000   0.00993   0.01910   0.01460   0.02558   0.00631  -0.00124  -0.00489  -0.00816  -0.01166  -0.02522  -0.03445  -0.04148  -0.03110  -0.01265   0.00761
      </tableData>

      <tableData breakPoint="10.00000">
                -10.00     -5.00      0.00      5.00     10.00     12.00     13.00     14.00     15.00     20.00     25.00     30.00     40.00     50.00     60.00
        0.20000   0.02481   0.02601   0.01237  -0.00334   0.07436   0.00763  -0.02413   0.03235  -0.01061   0.00925  -0.01516  -0.02471  -0.01335  -0.00936  -0.01829
        0.50000   0.02592   0.02861   0.01556   0.01150   0.07585   0.00538  -0.02336   0.04099  -0.00983  -0.03724  -0.00859  -0.02332  -0.00741  -0.01414  -0.02991
        0.90000   0.03182   0.04707   0.03058   0.02181  -0.03209  -0.05117  -0.06246   0.00238  -0.01045  -0.00915  -0.01043  -0.01311   0.00349  -0.02983  -0.00469
      </tableData>

    </table>
  </function>

  <function name="aero/CS_left-flaperon">
    <interpolate1d>
      <property>fcs/surfaces/left-flaperon-pos-deg</property>
      <value>-51</value> <property>aero/CS_left-flaperon_-51</property>
      <value>0</value> <value>0</value>
    </interpolate1d>
  </function>

  <!-- right-flaperon -->
  <function name="aero/CS_right-flaperon_-51">
    <table>
      <independentVar lookup="row">velocities/mach</independentVar>
      <independentVar lookup="column">aero/alpha-deg</independentVar>
      <independentVar lookup="table">aero/beta-deg</independentVar>
      <tableData breakPoint="-10.00000">
                -10.00     -5.00      0.00      5.00     10.00     12.00     13.00     14.00     15.00     20.00     25.00     30.00     40.00     50.00     60.00
        0.20000  -0.02473  -0.02602  -0.01127  -0.01132  -0.07580  -0.00698   0.02468  -0.03130   0.01023  -0.00879   0.01489   0.02439   0.01318   0.01013   0.01633
        0.50000  -0.02545  -0.02868  -0.01564  -0.03440  -0.07808  -0.00491   0.02395  -0.04056   0.01012   0.03869   0.00178   0.02297   0.00818   0.01384   0.05746
        0.90000  -0.03209  -0.04746  -0.02772  -0.02253   0.03243   0.05222   0.06175  -0.00153   0.00947   0.00989   0.01406   0.01514  -0.00238   0.03013   0.00492
      </tableData>

      <tableData breakPoint="0.00000">
                -10.00     -5.00      0.00      5.00     10.00     12.00     13.00     14.00     15.00     20.00     25.00     30.00     40.00     50.00     60.00
        0.20000  -0.01329  -0.01836  -0.01863  -0.01611  -0.00480  -0.00011   0.00246   0.00527   0.00797   0.02041   0.03125   0.03316   0.02363   0.01841   0.00561
        0.50000  -0.01301  -0.01920  -0.01950  -0.01760  -0.00548  -0.00035   0.00244   0.00523   0.00808   0.02146   0.03346   0.03570   0.02455   0.01792   0.00422
        0.90000  -0.01030  -0.01936  -0.01438  -0.02559  -0.00628   0.00114   0.00476   0.00807   0.01143   0.02477   0.03400   0.04193   0.03104   0.01165  -0.00809
      </tableData>

      <tableData breakPoint="10.00000">
                -10.00     -5.00      0.00      5.00     10.00     12.00     13.00     14.00     15.00     20.00     25.00     30.00     40.00     50.00     60.00
        0.20000  -0.00145  -0.00913  -0.00258  -0.09877  -0.00594  -0.00100  -0.03080   0.01580   0.01551   0.02155   0.02941   0.02442  -0.00112   0.00412  -0.01460
        0.50000   0.00095  -0.00544  -0.01637  -0.05483  -0.00730  -0.00864  -0.03333   0.01712   0.00737  -0.01135   0.01935   0.02368  -0.00271  -0.00308  -0.06032
        0.90000   0.01936  -0.00716  -0.01783  -0.07854  -0.04283  -0.10488  -0.09969  -0.06597  -0.04569  -0.03759  -0.02325   0.02831  -0.02633  -0.06106  -0.02115
      </tableData>

    </table>
  </function>

  <function name="aero/CS_right-flaperon">
    <interpolate1d>
      <property>fcs/surfaces/right-flaperon-pos-deg</property>
      <value>-51</value> <property>aero/CS_right-flaperon_-51</property>
      <value>0</value> <value>0</value>
    </interpolate1d>
  </function>

  <!-- rudder -->
  <function name="aero/CS_rudder_-35">
    <table>
      <independentVar lookup="row">velocities/mach</independentVar>
      <independentVar lookup="column">aero/alpha-deg</independentVar>
      <independentVar lookup="table">aero/beta-deg</independentVar>
      <tableData breakPoint="-10.00000">
                -10.00     -5.00      0.00      5.00     10.00     12.00     13.00     14.00     15.00     20.00     25.00     30.00     40.00     50.00     60.00
        0.20000  -0.10942  -0.11554  -0.12685  -0.12212  -0.17650  -0.12454  -0.09535  -0.15083  -0.14270  -0.12765  -0.13573  -0.10555  -0.16262  -0.10063  -0.03064
        0.50000  -0.11478  -0.12222  -0.13185  -0.19853  -0.17492  -0.12890  -0.09232  -0.16393  -0.12965  -0.11496  -0.12169  -0.10668  -0.13464  -0.10307   0.05811
        0.90000  -0.12252  -0.14318  -0.16958  -0.18780  -0.12625  -0.08637  -0.08943  -0.15015  -0.10628  -0.08018  -0.08184  -0.10311  -0.17525  -0.03376  -0.03237
      </tableData>

      <tableData breakPoint="0.00000">
                -10.00     -5.00      0.00      5.00     10.00     12.00     13.00     14.00     15.00     20.00     25.00     30.00     40.00     50.00     60.00
        0.20000  -0.09635  -0.11079  -0.13603  -0.14682  -0.14286  -0.13948  -0.13736  -0.13495  -0.13311  -0.13898  -0.14508  -0.14950  -0.14329  -0.14382  -0.13902
        0.50000  -0.09981  -0.11526  -0.14266  -0.15376  -0.14789  -0.14361  -0.14084  -0.13825  -0.13571  -0.13951  -0.14673  -0.15278  -0.14884  -0.14646  -0.14254
        0.90000  -0.11569  -0.13549  -0.16997  -0.18281  -0.17371  -0.16720  -0.16272  -0.15799  -0.15333  -0.13814  -0.14145  -0.15638  -0.16865  -0.16051  -0.14696
      </tableData>

      <tableData breakPoint="10.00000">
                -10.00     -5.00      0.00      5.00     10.00     12.00     13.00     14.00     15.00     20.00     25.00     30.00     40.00     50.00     60.00
        0.20000  -0.06691  -0.08441  -0.10476  -0.01378  -0.02817  -0.05655  -0.08690  -0.03269  -0.02623  -0.03167  -0.03750  -0.07717  -0.07852  -0.06223  -0.01583
        0.50000  -0.06709  -0.08452  -0.10727  -0.09747  -0.03294  -0.04981  -0.08921  -0.02631  -0.02191  -0.05146  -0.04104  -0.08566  -0.08274  -0.06045  -0.05468
        0.90000  -0.07257  -0.08187  -0.10118  -0.11337  -0.05836  -0.11896  -0.10946  -0.05836  -0.05576  -0.01442  -0.03146  -0.05745  -0.12395  -0.10807  -0.06549
      </tableData>

    </table>
  </function>
  <function name="aero/CS_rudder_4">
    <table>
      <independentVar lookup="row">velocities/mach</independentVar>
      <independentVar lookup="column">aero/alpha-deg</independentVar>
      <independentVar lookup="table">aero/beta-deg</independentVar>
      <tableData breakPoint="-10.00000">
                -10.00     -5.00      0.00      5.00     10.00     12.00     13.00     14.00     15.00     20.00     25.00     30.00     40.00     50.00     60.00
        0.20000   0.01094   0.01513   0.01831   0.00772   0.01272   0.01128   0.01727   0.01287   0.00703   0.01516   0.01039   0.01265   0.01569   0.00825  -0.00135
        0.50000   0.01204   0.01577   0.01964  -0.01847   0.01798   0.01086   0.01504   0.00769   0.00342   0.01983   0.01387   0.01576   0.01701  -0.00845   0.02386
        0.90000   0.01550   0.01864   0.02514   0.02226   0.00937   0.02885   0.01747   0.01959   0.01857   0.00368   0.01734   0.01819   0.02417   0.01243   0.00724
      </tableData>

      <tableData breakPoint="0.00000">
                -10.00     -5.00      0.00      5.00     10.00     12.00     13.00     14.00     15.00     20.00     25.00     30.00     40.00     50.00     60.00
        0.20000   0.01401   0.01607   0.01983   0.02109   0.02082   0.02056   0.02048   0.02051   0.02065   0.02244   0.02548   0.02880   0.02415   0.02379   0.02392
        0.50000   0.01455   0.01671   0.02079   0.02243   0.02192   0.02164   0.02151   0.02145   0.02144   0.02297   0.02605   0.02934   0.02576   0.02338   0.02532
        0.90000   0.01691   0.01990   0.02505   0.02800   0.02726   0.02648   0.02602   0.02566   0.02521   0.02388   0.02607   0.03210   0.03027   0.02640   0.02142
      </tableData>

      <tableData breakPoint="10.00000">
                -10.00     -5.00      0.00      5.00     10.00     12.00     13.00     14.00     15.00     20.00     25.00     30.00     40.00     50.00     60.00
        0.20000   0.01283   0.01543   0.01999   0.00638   0.01485   0.01420  -0.00718   0.05469   0.01135   0.02586   0.01150   0.01282   0.01673   0.01231   0.00412
        0.50000   0.01369   0.01621   0.02120   0.00732   0.01809   0.01253  -0.00292   0.04323   0.01095   0.01397   0.01595   0.01127   0.01785  -0.00847  -0.00707
        0.90000   0.01598   0.01912   0.02527   0.02427   0.01252   0.01809   0.01827   0.01927   0.00118   0.00743   0.03680   0.02132   0.02728  -0.00323   0.00921
      </tableData>

    </table>
  </function>

  <function name="aero/CS_rudder_-4">
    <table>
      <independentVar lookup="row">velocities/mach</independentVar>
      <independentVar lookup="column">aero/alpha-deg</independentVar>
      <independentVar lookup="table">aero/beta-deg</independentVar>
      <tableData breakPoint="-10.00000">
                -10.00     -5.00      0.00      5.00     10.00     12.00     13.00     14.00     15.00     20.00     25.00     30.00     40.00     50.00     60.00
        0.20000  -0.01266  -0.01544  -0.01983  -0.01245  -0.01458  -0.01452   0.00333  -0.05877  -0.01141  -0.02678  -0.01211  -0.01282  -0.01780  -0.01099  -0.00382
        0.50000  -0.01320  -0.01618  -0.02051  -0.02152  -0.01803  -0.01256   0.00502  -0.04630  -0.01093  -0.01312  -0.01227  -0.01140  -0.01778   0.00783   0.03859
        0.90000  -0.01599  -0.01911  -0.02290  -0.02427  -0.01323  -0.01483  -0.01738  -0.01945  -0.00234  -0.00721  -0.03722  -0.02111  -0.02688   0.00431  -0.00865
      </tableData>

      <tableData breakPoint="0.00000">
                -10.00     -5.00      0.00      5.00     10.00     12.00     13.00     14.00     15.00     20.00     25.00     30.00     40.00     50.00     60.00
        0.20000  -0.01393  -0.01607  -0.01964  -0.02123  -0.02099  -0.02076  -0.02072  -0.02074  -0.02068  -0.02263  -0.02551  -0.02874  -0.02416  -0.02368  -0.02362
        0.50000  -0.01448  -0.01672  -0.02057  -0.02227  -0.02192  -0.02166  -0.02152  -0.02147  -0.02145  -0.02298  -0.02583  -0.02938  -0.02580  -0.02440  -0.02455
        0.90000  -0.01695  -0.01990  -0.02504  -0.02806  -0.02726  -0.02654  -0.02607  -0.02568  -0.02526  -0.02395  -0.02616  -0.03201  -0.03038  -0.02689  -0.02154
      </tableData>

      <tableData breakPoint="10.00000">
                -10.00     -5.00      0.00      5.00     10.00     12.00     13.00     14.00     15.00     20.00     25.00     30.00     40.00     50.00     60.00
        0.20000  -0.01108  -0.01508  -0.01846  -0.00708  -0.01314  -0.01117  -0.01725  -0.01184  -0.00698  -0.01421  -0.01096  -0.01240  -0.01540  -0.00788   0.00145
        0.50000  -0.01184  -0.01576  -0.01972  -0.01258  -0.01682  -0.01117  -0.01521  -0.00732  -0.00525  -0.01967  -0.01303  -0.01568  -0.01656   0.00752   0.00486
        0.90000  -0.01546  -0.01863  -0.02260  -0.02202  -0.01299  -0.03128  -0.01656  -0.01946  -0.01957  -0.00359  -0.01552  -0.01800  -0.02430  -0.01045  -0.00826
      </tableData>

    </table>
  </function>

  <function name="aero/CS_rudder_35">
    <table>
      <independentVar lookup="row">velocities/mach</independentVar>
      <independentVar lookup="column">aero/alpha-deg</independentVar>
      <independentVar lookup="table">aero/beta-deg</independentVar>
      <tableData breakPoint="-10.00000">
                -10.00     -5.00      0.00      5.00     10.00     12.00     13.00     14.00     15.00     20.00     25.00     30.00     40.00     50.00     60.00
        0.20000   0.06711   0.08447   0.10435  -0.00084   0.02168   0.05789   0.08718   0.03409   0.02609   0.03241   0.03772   0.07739   0.07952   0.06557   0.01591
        0.50000   0.06778   0.08453   0.10695   0.06745   0.03181   0.05109   0.08933   0.02696   0.02221   0.05187   0.03901   0.08593   0.08337   0.06382   0.08476
        0.90000   0.07260   0.08194   0.10261   0.11312   0.06056   0.11952   0.10901   0.05893   0.05383   0.01438   0.03459   0.05795   0.12469   0.11254   0.06692
      </tableData>

      <tableData breakPoint="0.00000">
                -10.00     -5.00      0.00      5.00     10.00     12.00     13.00     14.00     15.00     20.00     25.00     30.00     40.00     50.00     60.00
        0.20000   0.09643   0.11077   0.13611   0.14662   0.14240   0.13890   0.13683   0.13438   0.13258   0.13817   0.14434   0.14915   0.14259   0.14342   0.13863
        0.50000   0.09989   0.11523   0.14270   0.15375   0.14760   0.14339   0.14070   0.13767   0.13512   0.13924   0.14600   0.15197   0.14779   0.14390   0.14148
        0.90000   0.11563   0.13545   0.17004   0.18269   0.17352   0.16692   0.16243   0.15766   0.15304   0.13750   0.14109   0.15611   0.16721   0.15912   0.14543
      </tableData>

      <tableData breakPoint="10.00000">
                -10.00     -5.00      0.00      5.00     10.00     12.00     13.00     14.00     15.00     20.00     25.00     30.00     40.00     50.00     60.00
        0.20000   0.10955   0.11570   0.12699   0.10469   0.17685   0.12408   0.09534   0.15203   0.14235   0.12714   0.13456   0.10594   0.15292   0.10520   0.03006
        0.50000   0.11527   0.12230   0.13167   0.18644   0.17468   0.12856   0.09164   0.16280   0.12952   0.11548   0.11898   0.10706   0.13954   0.10785  -0.02782
        0.90000   0.12244   0.14320   0.17331   0.18569   0.12418   0.08489   0.08859   0.12969   0.10526   0.08167   0.08405   0.10389   0.17627   0.03156   0.03297
      </tableData>

    </table>
  </function>

  <function name="aero/CS_rudder">
    <interpolate1d>
      <property>fcs/surfaces/rudder-pos-deg</property>
      <value>-35</value> <property>aero/CS_rudder_-35</property>
      <value>-4</value> <property>aero/CS_rudder_-4</property>
      <value>0</value> <value>0</value>
      <value>4</value> <property>aero/CS_rudder_4</property>
      <value>35</value> <property>aero/CS_rudder_35</property>
    </interpolate1d>
  </function>

  <!-- slats -->
  <function name="aero/CS_slats_27.5">
    <table>
      <independentVar lookup="row">velocities/mach</independentVar>
      <independentVar lookup="column">aero/alpha-deg</independentVar>
      <independentVar lookup="table">aero/beta-deg</independentVar>
      <tableData breakPoint="-10.00000">
                -10.00     -5.00      0.00      5.00     10.00     12.00     13.00     14.00     15.00     20.00     25.00     30.00     40.00     50.00     60.00
        0.20000   0.00000   0.00000   0.00000   0.00000   0.00000   0.00000   0.00016   0.00000   0.00000   0.00041  -0.00010   0.00000   0.00000   0.00045  -0.00086
        0.50000   0.00000   0.00000   0.00000   0.00000   0.00000   0.00000   0.00000   0.00000   0.00000   0.00000   0.00000   0.00013   0.00000   0.00000  -0.00032
        0.90000   0.00000   0.00000   0.00000   0.00000  -0.00015   0.00045   0.00000   0.00000   0.00088   0.00000  -0.00074   0.00000  -0.00011   0.00032   0.00000
      </tableData>

      <tableData breakPoint="0.00000">
                -10.00     -5.00      0.00      5.00     10.00     12.00     13.00     14.00     15.00     20.00     25.00     30.00     40.00     50.00     60.00
        0.20000   0.00000   0.00000   0.00000   0.00000   0.00000   0.00000   0.00000   0.00000   0.00000   0.00000   0.00000   0.00000   0.00000  -0.00016   0.00000
        0.50000   0.00000   0.00000   0.00000   0.00000   0.00000   0.00000   0.00000   0.00000   0.00000   0.00000   0.00000   0.00000   0.00000  -0.00115   0.00014
        0.90000   0.00000   0.00000   0.00000   0.00000   0.00000   0.00000   0.00000   0.00000   0.00000   0.00000   0.00000   0.00000   0.00000   0.00000   0.00000
      </tableData>

      <tableData breakPoint="10.00000">
                -10.00     -5.00      0.00      5.00     10.00     12.00     13.00     14.00     15.00     20.00     25.00     30.00     40.00     50.00     60.00
        0.20000   0.00000   0.00000   0.00000   0.00000   0.00000   0.00000   0.00000   0.00000   0.00000  -0.00069   0.00011   0.00000   0.00000   0.00000  -0.00045
        0.50000   0.00000   0.00000   0.00000   0.00000   0.00010   0.00000   0.00000   0.00000   0.00000   0.00000   0.00000  -0.00010   0.00000   0.00000   0.01681
        0.90000   0.00000   0.00000   0.00000   0.00000  -0.00036   0.00096   0.00000   0.00000   0.00000   0.00000   0.00063   0.00000   0.00000   0.00015   0.00000
      </tableData>

    </table>
  </function>

  <function name="aero/CS_slats">
    <interpolate1d>
      <property>fcs/surfaces/slats-pos-deg</property>
      <value>0</value> <value>0</value>
      <value>27.5</value> <property>aero/CS_slats_27.5</property>
    </interpolate1d>
  </function>

  <!-- speedbrake -->
  <function name="aero/CS_speedbrake_60">
    <table>
      <independentVar lookup="row">velocities/mach</independentVar>
      <independentVar lookup="column">aero/alpha-deg</independentVar>
      <independentVar lookup="table">aero/beta-deg</independentVar>
      <tableData breakPoint="-10.00000">
                -10.00     -5.00      0.00      5.00     10.00     12.00     13.00     14.00     15.00     20.00     25.00     30.00     40.00     50.00     60.00
        0.20000   0.00000   0.00000   0.00000   0.00000   0.00000   0.00000   0.00015   0.00000   0.00000   0.00000   0.00000   0.00000   0.00000   0.00000  -0.00015
        0.50000   0.00000   0.00000   0.00000  -0.00055   0.00000   0.00000   0.00000   0.00000   0.00000   0.00015   0.00000   0.00000   0.00000   0.00000   0.00452
        0.90000   0.00000   0.00000   0.00000   0.00000  -0.00037   0.00029   0.00000   0.00000   0.00099   0.00000   0.00000   0.00016   0.00000   0.00016   0.00000
      </tableData>

      <tableData breakPoint="0.00000">
                -10.00     -5.00      0.00      5.00     10.00     12.00     13.00     14.00     15.00     20.00     25.00     30.00     40.00     50.00     60.00
        0.20000   0.00000   0.00000   0.00000   0.00000   0.00000   0.00000   0.00000   0.00000   0.00000   0.00000   0.00000   0.00000   0.00000  -0.00014   0.00000
        0.50000   0.00000   0.00000   0.00010   0.00000   0.00000   0.00000   0.00000   0.00000   0.00000   0.00000   0.00000   0.00000  -0.00010   0.00000   0.00014
        0.90000   0.00000   0.00000   0.00000   0.00000   0.00000   0.00000   0.00000   0.00000   0.00000   0.00000   0.00000   0.00000   0.00000  -0.00137  -0.00014
      </tableData>

      <tableData breakPoint="10.00000">
                -10.00     -5.00      0.00      5.00     10.00     12.00     13.00     14.00     15.00     20.00     25.00     30.00     40.00     50.00     60.00
        0.20000   0.00000   0.00000   0.00000   0.00000   0.00000   0.00000   0.00000   0.00000   0.00000  -0.00068   0.00000   0.00000   0.00000   0.00000   0.00040
        0.50000   0.00000   0.00000   0.00000   0.00000   0.00000   0.00000   0.00000   0.00000   0.00000   0.00000   0.00000  -0.00017   0.00000  -0.00012   0.00022
        0.90000   0.00000   0.00000   0.00000   0.00000  -0.00049   0.00000   0.00000   0.00000   0.00000   0.00013   0.00096   0.00000   0.00000   0.00012   0.00000
      </tableData>

    </table>
  </function>

  <function name="aero/CS_speedbrake">
    <interpolate1d>
      <property>fcs/surfaces/speedbrake-pos-deg</property>
      <value>0</value> <value>0</value>
      <value>60</value> <property>aero/CS_speedbrake_60</property>
    </interpolate1d>
  </function>

  <!-- CMX -->
  <!-- base -->
  <function name="aero/CMx_base">
    <table>
      <independentVar lookup="row">velocities/mach</independentVar>
      <independentVar lookup="column">aero/alpha-deg</independentVar>
      <independentVar lookup="table">aero/beta-deg</independentVar>
      <tableData breakPoint="-10.00000">
                -10.00     -5.00      0.00      5.00     10.00     12.00     13.00     14.00     15.00     20.00     25.00     30.00     40.00     50.00     60.00
        0.20000   0.00269  -0.00084  -0.00166  -0.00455  -0.00680  -0.00317   0.00078  -0.00312  -0.00303  -0.00360  -0.00553  -0.00144   0.00335   0.01110   0.01416
        0.50000   0.00321  -0.00065  -0.00148  -0.00589  -0.00409  -0.00050   0.00256  -0.00276  -0.00241   0.00000  -0.00479  -0.00121   0.00322   0.01175   0.02061
        0.90000   0.00617   0.00039  -0.00055  -0.00612   0.00325   0.01159   0.00977   0.00458   0.00280   0.00094  -0.00034  -0.00307   0.00656   0.01487   0.02556
      </tableData>

      <tableData breakPoint="0.00000">
                -10.00     -5.00      0.00      5.00     10.00     12.00     13.00     14.00     15.00     20.00     25.00     30.00     40.00     50.00     60.00
        0.20000   0.00000   0.00000   0.00016   0.00000   0.00000   0.00000   0.00000   0.00000  -0.00000   0.00000   0.00000   0.00000   0.00000   0.00000   0.00000
        0.50000   0.00000   0.00000   0.00011   0.00000   0.00000  -0.00000   0.00000  -0.00000   0.00000   0.00000   0.00000   0.00000   0.00000   0.00000  -0.00000
        0.90000   0.00000  -0.00000   0.00000   0.00000   0.00000   0.00000   0.00000   0.00000   0.00000   0.00000   0.00000   0.00000   0.00000   0.00000   0.00000
      </tableData>

      <tableData breakPoint="10.00000">
                -10.00     -5.00      0.00      5.00     10.00     12.00     13.00     14.00     15.00     20.00     25.00     30.00     40.00     50.00     60.00
        0.20000  -0.00292   0.00072   0.00181   0.00431   0.00676   0.00324  -0.00069   0.00327   0.00310   0.00364   0.00540   0.00145  -0.00336  -0.01101  -0.01415
        0.50000  -0.00344   0.00057   0.00165   0.00507   0.00405   0.00053  -0.00247   0.00284   0.00254   0.00013   0.00451   0.00121  -0.00324  -0.01166  -0.02048
        0.90000  -0.00620  -0.00043   0.00069   0.00624  -0.00322  -0.01142  -0.00966  -0.00462  -0.00294  -0.00072   0.00076   0.00330  -0.00645  -0.01477  -0.02565
      </tableData>

    </table>
  </function>

  <!-- elevator -->
  <function name="aero/CMx_elevator_-24">
    <table>
      <independentVar lookup="row">velocities/mach</independentVar>
      <independentVar lookup="column">aero/alpha-deg</independentVar>
      <independentVar lookup="table">aero/beta-deg</independentVar>
      <tableData breakPoint="-10.00000">
                -10.00     -5.00      0.00      5.00     10.00     12.00     13.00     14.00     15.00     20.00     25.00     30.00     40.00     50.00     60.00
        0.20000   0.00000   0.00000   0.00000   0.00000   0.00000   0.00000   0.00000   0.00000   0.00000   0.00000   0.00000   0.00000   0.00000   0.00000   0.00012
        0.50000   0.00000   0.00000   0.00000   0.00000   0.00000   0.00000   0.00000   0.00000   0.00000   0.00000   0.00000   0.00000   0.00000   0.00000   0.00000
        0.90000   0.00000   0.00000   0.00000   0.00000   0.00000   0.00000   0.00000   0.00000   0.00000   0.00000   0.00000   0.00000   0.00000   0.00000   0.00000
      </tableData>

      <tableData breakPoint="0.00000">
                -10.00     -5.00      0.00      5.00     10.00     12.00     13.00     14.00     15.00     20.00     25.00     30.00     40.00     50.00     60.00
        0.20000   0.00000   0.00000   0.00000   0.00000   0.00000   0.00000   0.00000   0.00000   0.00000   0.00000   0.00000   0.00000   0.00000   0.00000   0.00000
        0.50000   0.00000   0.00000   0.00000   0.00000   0.00000   0.00000   0.00000   0.00000   0.00000   0.00000   0.00000   0.00000   0.00000   0.00000   0.00000
        0.90000   0.00000   0.00000   0.00000   0.00000   0.00000   0.00000   0.00000   0.00000   0.00000   0.00000   0.00000   0.00000   0.00000   0.00000   0.00000
      </tableData>

      <tableData breakPoint="10.00000">
                -10.00     -5.00      0.00      5.00     10.00     12.00     13.00     14.00     15.00     20.00     25.00     30.00     40.00     50.00     60.00
        0.20000   0.00000   0.00000   0.00000   0.00000   0.00000   0.00000   0.00000   0.00000   0.00000   0.00000   0.00000   0.00000   0.00000   0.00000   0.00000
        0.50000   0.00000   0.00000   0.00000   0.00000   0.00000   0.00000   0.00000   0.00000   0.00000   0.00000   0.00000   0.00000   0.00000   0.00000   0.00000
        0.90000   0.00000   0.00000   0.00000   0.00000   0.00000   0.00000   0.00000   0.00000   0.00000   0.00000   0.00000   0.00000   0.00000   0.00000   0.00000
      </tableData>

    </table>
  </function>

  <function name="aero/CMx_elevator_-9.5">
    <table>
      <independentVar lookup="row">velocities/mach</independentVar>
      <independentVar lookup="column">aero/alpha-deg</independentVar>
      <independentVar lookup="table">aero/beta-deg</independentVar>
      <tableData breakPoint="-10.00000">
                -10.00     -5.00      0.00      5.00     10.00     12.00     13.00     14.00     15.00     20.00     25.00     30.00     40.00     50.00     60.00
        0.20000   0.00000   0.00000   0.00000   0.00000   0.00000   0.00000   0.00000   0.00000   0.00000   0.00000   0.00000   0.00000   0.00000   0.00000   0.00000
        0.50000   0.00000   0.00000   0.00000   0.00000   0.00000   0.00000   0.00000   0.00000   0.00000   0.00000   0.00000   0.00000   0.00000   0.00000   0.00000
        0.90000   0.00000   0.00000   0.00000   0.00000   0.00000   0.00000   0.00000   0.00000   0.00000   0.00000   0.00000   0.00000   0.00000   0.00000   0.00000
      </tableData>

      <tableData breakPoint="0.00000">
                -10.00     -5.00      0.00      5.00     10.00     12.00     13.00     14.00     15.00     20.00     25.00     30.00     40.00     50.00     60.00
        0.20000   0.00000   0.00000   0.00000   0.00000   0.00000   0.00000   0.00000   0.00000   0.00000   0.00000   0.00000   0.00000   0.00000   0.00000   0.00000
        0.50000   0.00000   0.00000   0.00000   0.00000   0.00000   0.00000   0.00000   0.00000   0.00000   0.00000   0.00000   0.00000   0.00000   0.00000   0.00000
        0.90000   0.00000   0.00000   0.00000   0.00000   0.00000   0.00000   0.00000   0.00000   0.00000   0.00000   0.00000   0.00000   0.00000   0.00000   0.00000
      </tableData>

      <tableData breakPoint="10.00000">
                -10.00     -5.00      0.00      5.00     10.00     12.00     13.00     14.00     15.00     20.00     25.00     30.00     40.00     50.00     60.00
        0.20000   0.00000   0.00000   0.00000   0.00000   0.00000   0.00000   0.00000   0.00000   0.00000   0.00011   0.00000   0.00000   0.00000   0.00000   0.00000
        0.50000   0.00000   0.00000   0.00000   0.00000   0.00000   0.00000   0.00000   0.00000   0.00000   0.00000   0.00000   0.00000   0.00000   0.00000   0.00000
        0.90000   0.00000   0.00000   0.00000   0.00000   0.00000  -0.00013   0.00000   0.00000   0.00000   0.00000   0.00000   0.00000   0.00000   0.00000   0.00000
      </tableData>

    </table>
  </function>

  <function name="aero/CMx_elevator_1.5">
    <table>
      <independentVar lookup="row">velocities/mach</independentVar>
      <independentVar lookup="column">aero/alpha-deg</independentVar>
      <independentVar lookup="table">aero/beta-deg</independentVar>
      <tableData breakPoint="-10.00000">
                -10.00     -5.00      0.00      5.00     10.00     12.00     13.00     14.00     15.00     20.00     25.00     30.00     40.00     50.00     60.00
        0.20000   0.00000   0.00000   0.00000   0.00000   0.00000   0.00000   0.00000   0.00000   0.00000   0.00000   0.00000   0.00000   0.00000   0.00000   0.00014
        0.50000   0.00000   0.00000   0.00000   0.00000   0.00000   0.00000   0.00000   0.00000   0.00000   0.00000   0.00000   0.00000   0.00000   0.00000  -0.00015
        0.90000   0.00000   0.00000   0.00000   0.00000   0.00000   0.00000   0.00000   0.00000   0.00000   0.00000   0.00000   0.00000   0.00000   0.00000   0.00000
      </tableData>

      <tableData breakPoint="0.00000">
                -10.00     -5.00      0.00      5.00     10.00     12.00     13.00     14.00     15.00     20.00     25.00     30.00     40.00     50.00     60.00
        0.20000   0.00000   0.00000   0.00000   0.00000   0.00000   0.00000   0.00000   0.00000   0.00000   0.00000   0.00000   0.00000   0.00000   0.00000   0.00000
        0.50000   0.00000   0.00000   0.00000   0.00000   0.00000   0.00000   0.00000   0.00000   0.00000   0.00000   0.00000   0.00000   0.00000   0.00000   0.00000
        0.90000   0.00000   0.00000   0.00000   0.00000   0.00000   0.00000   0.00000   0.00000   0.00000   0.00000   0.00000   0.00000   0.00000   0.00000   0.00000
      </tableData>

      <tableData breakPoint="10.00000">
                -10.00     -5.00      0.00      5.00     10.00     12.00     13.00     14.00     15.00     20.00     25.00     30.00     40.00     50.00     60.00
        0.20000   0.00000   0.00000   0.00000   0.00000   0.00000   0.00000   0.00000   0.00000   0.00000   0.00000   0.00000   0.00000   0.00000   0.00000   0.00000
        0.50000   0.00000   0.00000   0.00000   0.00000   0.00000   0.00000   0.00000   0.00000   0.00000   0.00000   0.00000   0.00000   0.00000   0.00000   0.00010
        0.90000   0.00000   0.00000   0.00000   0.00000   0.00000   0.00000   0.00000   0.00000   0.00000   0.00000  -0.00011   0.00000   0.00000   0.00000   0.00000
      </tableData>

    </table>
  </function>

  <function name="aero/CMx_elevator">
    <interpolate1d>
      <property>fcs/surfaces/elevator-pos-deg</property>
      <value>-24</value> <property>aero/CMx_elevator_-24</property>
      <value>-9.5</value> <property>aero/CMx_elevator_-9.5</property>
      <value>0</value> <value>0</value>
      <value>1.5</value> <property>aero/CMx_elevator_1.5</property>
    </interpolate1d>
  </function>

  <!-- flaps -->
  <function name="aero/CMx_flaps_30">
    <table>
      <independentVar lookup="row">velocities/mach</independentVar>
      <independentVar lookup="column">aero/alpha-deg</independentVar>
      <independentVar lookup="table">aero/beta-deg</independentVar>
      <tableData breakPoint="-10.00000">
                -10.00     -5.00      0.00      5.00     10.00     12.00     13.00     14.00     15.00     20.00     25.00     30.00     40.00     50.00     60.00
        0.20000  -0.00446  -0.00314   0.00830   0.01307   0.01429   0.00777   0.00448   0.00569   0.00723   0.00579   0.00346   0.00155   0.00000  -0.00068  -0.00584
        0.50000  -0.00502  -0.00379   0.00918   0.01443   0.02553   0.02447   0.00698   0.01398   0.00890   0.01346   0.00322   0.00300   0.00000   0.00096  -0.00500
        0.90000  -0.01070  -0.00169   0.00818   0.04313   0.01004   0.00858   0.01253   0.00664   0.00441   0.00778  -0.00193   0.00487   0.00061   0.00066  -0.00131
      </tableData>

      <tableData breakPoint="0.00000">
                -10.00     -5.00      0.00      5.00     10.00     12.00     13.00     14.00     15.00     20.00     25.00     30.00     40.00     50.00     60.00
        0.20000   0.00000   0.00010   0.00000   0.00000   0.00000   0.00000   0.00000   0.00000   0.00000   0.00000   0.00000   0.00000   0.00000   0.00000   0.00000
        0.50000   0.00000   0.00000   0.00000   0.00000   0.00000   0.00000   0.00000   0.00000   0.00000   0.00000   0.00000   0.00000   0.00000   0.00000   0.00000
        0.90000   0.00000   0.00000   0.00000   0.00000   0.00000   0.00000   0.00000   0.00000   0.00000   0.00000   0.00000   0.00000   0.00000   0.00000   0.00000
      </tableData>

      <tableData breakPoint="10.00000">
                -10.00     -5.00      0.00      5.00     10.00     12.00     13.00     14.00     15.00     20.00     25.00     30.00     40.00     50.00     60.00
        0.20000   0.00478   0.00348  -0.00844  -0.01385  -0.01524  -0.00775  -0.00463  -0.00578  -0.00734  -0.00597  -0.00341  -0.00161   0.00000   0.00073   0.00598
        0.50000   0.00531   0.00396  -0.00932  -0.01262  -0.02532  -0.02432  -0.00712  -0.01427  -0.00905  -0.01349  -0.00293  -0.00301   0.00000  -0.00081   0.00501
        0.90000   0.01067   0.00174  -0.00601  -0.04278  -0.00819  -0.00834  -0.01238  -0.00640  -0.00399  -0.00779   0.00196  -0.00470  -0.00053  -0.00067   0.00133
      </tableData>

    </table>
  </function>

  <function name="aero/CMx_flaps_40">
    <table>
      <independentVar lookup="row">velocities/mach</independentVar>
      <independentVar lookup="column">aero/alpha-deg</independentVar>
      <independentVar lookup="table">aero/beta-deg</independentVar>
      <tableData breakPoint="-10.00000">
                -10.00     -5.00      0.00      5.00     10.00     12.00     13.00     14.00     15.00     20.00     25.00     30.00     40.00     50.00     60.00
        0.20000   0.00000   0.00000   0.00000   0.00000  -0.00164  -0.00698  -0.00697  -0.00545  -0.00329   0.00024   0.00050   0.00107   0.00000  -0.00053  -0.00842
        0.50000   0.00000   0.00000   0.00000  -0.00030  -0.00487  -0.00694  -0.00491  -0.00268  -0.00180   0.00089   0.00023   0.00121   0.00032   0.00013  -0.00719
        0.90000   0.00000   0.00000   0.00037   0.00000  -0.00135   0.00061   0.00118   0.00118   0.00076   0.00099   0.00145   0.00186   0.00093   0.00099  -0.00195
      </tableData>

      <tableData breakPoint="0.00000">
                -10.00     -5.00      0.00      5.00     10.00     12.00     13.00     14.00     15.00     20.00     25.00     30.00     40.00     50.00     60.00
        0.20000   0.00000   0.00000   0.00000   0.00000   0.00000   0.00000   0.00000   0.00000   0.00000   0.00000   0.00000   0.00000   0.00000   0.00000   0.00000
        0.50000   0.00000   0.00000   0.00000   0.00000   0.00000   0.00000   0.00000   0.00000   0.00000   0.00000   0.00000   0.00000   0.00000   0.00000   0.00000
        0.90000   0.00000   0.00000   0.00000   0.00000   0.00000   0.00000   0.00000   0.00000   0.00000   0.00000   0.00000   0.00000   0.00000   0.00000   0.00000
      </tableData>

      <tableData breakPoint="10.00000">
                -10.00     -5.00      0.00      5.00     10.00     12.00     13.00     14.00     15.00     20.00     25.00     30.00     40.00     50.00     60.00
        0.20000   0.00000   0.00000   0.00000   0.00000   0.00166   0.00708   0.00706   0.00562   0.00337  -0.00014  -0.00050  -0.00108   0.00000   0.00056   0.00854
        0.50000   0.00000   0.00000   0.00000   0.00000   0.00490   0.00701   0.00494   0.00280   0.00184  -0.00095  -0.00026  -0.00121  -0.00031  -0.00012   0.00665
        0.90000   0.00000   0.00000  -0.00035   0.00000   0.00138  -0.00076  -0.00121  -0.00119  -0.00082  -0.00098  -0.00147  -0.00187  -0.00093  -0.00099   0.00194
      </tableData>

    </table>
  </function>

  <function name="aero/CMx_flaps">
    <interpolate1d>
      <property>fcs/surfaces/flaps-pos-deg</property>
      <value>0</value> <value>0</value>
      <value>30</value> <property>aero/CMx_flaps_30</property>
      <value>40</value> <property>aero/CMx_flaps_40</property>
    </interpolate1d>
  </function>

  <!-- left-flaperon -->
  <function name="aero/CMx_left-flaperon_-51">
    <table>
      <independentVar lookup="row">velocities/mach</independentVar>
      <independentVar lookup="column">aero/alpha-deg</independentVar>
      <independentVar lookup="table">aero/beta-deg</independentVar>
      <tableData breakPoint="-10.00000">
                -10.00     -5.00      0.00      5.00     10.00     12.00     13.00     14.00     15.00     20.00     25.00     30.00     40.00     50.00     60.00
        0.20000   0.04308   0.05416   0.05371   0.07014   0.05618   0.04920   0.04199   0.04118   0.03680   0.01983   0.01011   0.00839   0.00727   0.00931   0.01181
        0.50000   0.04217   0.05812   0.05748   0.06099   0.05727   0.04814   0.04009   0.03967   0.03514   0.01293   0.00842   0.00843   0.00767   0.00940   0.00898
        0.90000   0.02678   0.06730   0.08206   0.08582   0.06327   0.04109   0.03699   0.03574   0.03043   0.00919   0.00054   0.00952   0.00726   0.00702   0.01549
      </tableData>

      <tableData breakPoint="0.00000">
                -10.00     -5.00      0.00      5.00     10.00     12.00     13.00     14.00     15.00     20.00     25.00     30.00     40.00     50.00     60.00
        0.20000   0.04605   0.05642   0.05496   0.05823   0.05853   0.05329   0.04873   0.04379   0.03873   0.02225   0.01140   0.00834   0.00797   0.01003   0.01673
        0.50000   0.04540   0.06057   0.05896   0.06250   0.06116   0.05285   0.04742   0.04190   0.03737   0.02039   0.01053   0.00816   0.00805   0.01034   0.01634
        0.90000   0.03400   0.07231   0.08274   0.08942   0.06997   0.05449   0.04871   0.04379   0.03892   0.01670   0.00774   0.00703   0.00864   0.01131   0.01827
      </tableData>

      <tableData breakPoint="10.00000">
                -10.00     -5.00      0.00      5.00     10.00     12.00     13.00     14.00     15.00     20.00     25.00     30.00     40.00     50.00     60.00
        0.20000   0.05073   0.05620   0.05762   0.05872   0.05318   0.05832   0.05826   0.04901   0.04856   0.02756   0.01787   0.01206   0.00903   0.01183   0.02191
        0.50000   0.05093   0.06036   0.06191   0.06245   0.05805   0.06013   0.05872   0.04754   0.04746   0.03250   0.01457   0.01111   0.00825   0.01140   0.02141
        0.90000   0.04609   0.07887   0.08993   0.09014   0.08273   0.07259   0.06605   0.05129   0.04895   0.02613   0.01412   0.00856   0.00770   0.01313   0.02308
      </tableData>

    </table>
  </function>

  <function name="aero/CMx_left-flaperon">
    <interpolate1d>
      <property>fcs/surfaces/left-flaperon-pos-deg</property>
      <value>-51</value> <property>aero/CMx_left-flaperon_-51</property>
      <value>0</value> <value>0</value>
    </interpolate1d>
  </function>

  <!-- right-flaperon -->
  <function name="aero/CMx_right-flaperon_-51">
    <table>
      <independentVar lookup="row">velocities/mach</independentVar>
      <independentVar lookup="column">aero/alpha-deg</independentVar>
      <independentVar lookup="table">aero/beta-deg</independentVar>
      <tableData breakPoint="-10.00000">
                -10.00     -5.00      0.00      5.00     10.00     12.00     13.00     14.00     15.00     20.00     25.00     30.00     40.00     50.00     60.00
        0.20000  -0.05066  -0.05616  -0.05784  -0.05830  -0.05309  -0.05835  -0.05828  -0.04901  -0.04844  -0.02750  -0.01773  -0.01202  -0.00900  -0.01182  -0.02166
        0.50000  -0.05081  -0.06034  -0.06218  -0.06154  -0.05793  -0.06015  -0.05876  -0.04750  -0.04747  -0.03246  -0.01365  -0.01104  -0.00828  -0.01145  -0.02118
        0.90000  -0.04611  -0.07887  -0.09003  -0.09017  -0.08269  -0.07284  -0.06595  -0.05128  -0.04880  -0.02621  -0.01440  -0.00865  -0.00776  -0.01316  -0.02310
      </tableData>

      <tableData breakPoint="0.00000">
                -10.00     -5.00      0.00      5.00     10.00     12.00     13.00     14.00     15.00     20.00     25.00     30.00     40.00     50.00     60.00
        0.20000  -0.04618  -0.05652  -0.05534  -0.05819  -0.05844  -0.05324  -0.04867  -0.04373  -0.03868  -0.02222  -0.01140  -0.00835  -0.00799  -0.01008  -0.01669
        0.50000  -0.04548  -0.06065  -0.05922  -0.06246  -0.06110  -0.05281  -0.04737  -0.04186  -0.03734  -0.02038  -0.01052  -0.00816  -0.00807  -0.01038  -0.01638
        0.90000  -0.03402  -0.07235  -0.08269  -0.08939  -0.06993  -0.05444  -0.04867  -0.04377  -0.03888  -0.01663  -0.00768  -0.00701  -0.00861  -0.01129  -0.01836
      </tableData>

      <tableData breakPoint="10.00000">
                -10.00     -5.00      0.00      5.00     10.00     12.00     13.00     14.00     15.00     20.00     25.00     30.00     40.00     50.00     60.00
        0.20000  -0.04312  -0.05420  -0.05385  -0.05938  -0.05604  -0.04900  -0.04183  -0.04111  -0.03668  -0.01974  -0.01008  -0.00840  -0.00727  -0.00932  -0.01194
        0.50000  -0.04213  -0.05814  -0.05747  -0.05979  -0.05715  -0.04798  -0.03999  -0.03964  -0.03511  -0.01289  -0.00811  -0.00841  -0.00765  -0.00940  -0.01084
        0.90000  -0.02680  -0.06741  -0.08223  -0.08584  -0.06330  -0.04118  -0.03705  -0.03563  -0.03017  -0.00944  -0.00076  -0.00967  -0.00728  -0.00705  -0.01550
      </tableData>

    </table>
  </function>

  <function name="aero/CMx_right-flaperon">
    <interpolate1d>
      <property>fcs/surfaces/right-flaperon-pos-deg</property>
      <value>-51</value> <property>aero/CMx_right-flaperon_-51</property>
      <value>0</value> <value>0</value>
    </interpolate1d>
  </function>

  <!-- rudder -->
  <function name="aero/CMx_rudder_-35">
    <table>
      <independentVar lookup="row">velocities/mach</independentVar>
      <independentVar lookup="column">aero/alpha-deg</independentVar>
      <independentVar lookup="table">aero/beta-deg</independentVar>
      <tableData breakPoint="-10.00000">
                -10.00     -5.00      0.00      5.00     10.00     12.00     13.00     14.00     15.00     20.00     25.00     30.00     40.00     50.00     60.00
        0.20000   0.00953   0.00936   0.00956   0.00810   0.01037   0.00760   0.00492   0.00998   0.00967   0.00988   0.00771   0.00750   0.00628   0.00525   0.00157
        0.50000   0.00992   0.00981   0.01028   0.01110   0.01087   0.00834   0.00494   0.01196   0.00940   0.00825   0.00712   0.00817   0.00882   0.00551  -0.00204
        0.90000   0.01210   0.01235   0.01044   0.01279   0.01169   0.00699   0.00754   0.01509   0.00800   0.00810   0.00388   0.01042   0.01348   0.00416   0.00353
      </tableData>

      <tableData breakPoint="0.00000">
                -10.00     -5.00      0.00      5.00     10.00     12.00     13.00     14.00     15.00     20.00     25.00     30.00     40.00     50.00     60.00
        0.20000   0.00911   0.00915   0.00888   0.00885   0.00784   0.00716   0.00660   0.00601   0.00553   0.00499   0.00683   0.00846   0.00816   0.00816   0.00693
        0.50000   0.00956   0.00963   0.00943   0.00934   0.00836   0.00749   0.00693   0.00627   0.00567   0.00513   0.00731   0.00901   0.00888   0.00857   0.00736
        0.90000   0.01171   0.01179   0.01176   0.01181   0.01081   0.00974   0.00924   0.00871   0.00830   0.00671   0.00708   0.00955   0.01148   0.01103   0.00930
      </tableData>

      <tableData breakPoint="10.00000">
                -10.00     -5.00      0.00      5.00     10.00     12.00     13.00     14.00     15.00     20.00     25.00     30.00     40.00     50.00     60.00
        0.20000   0.00591   0.00618   0.00695   0.00240  -0.00082   0.00429   0.00747   0.00247   0.00159   0.00223   0.00209   0.00503   0.00656   0.00514  -0.00090
        0.50000   0.00590   0.00607   0.00704   0.00654   0.00167   0.00424   0.00819   0.00196   0.00114   0.00476   0.00246   0.00655   0.00702   0.00558   0.00240
        0.90000   0.00536   0.00536   0.00582   0.00812   0.00590   0.01190   0.01045   0.00450   0.00551   0.00055   0.00433   0.00442   0.01089   0.01029   0.00610
      </tableData>

    </table>
  </function>

  <function name="aero/CMx_rudder_4">
    <table>
      <independentVar lookup="row">velocities/mach</independentVar>
      <independentVar lookup="column">aero/alpha-deg</independentVar>
      <independentVar lookup="table">aero/beta-deg</independentVar>
      <tableData breakPoint="-10.00000">
                -10.00     -5.00      0.00      5.00     10.00     12.00     13.00     14.00     15.00     20.00     25.00     30.00     40.00     50.00     60.00
        0.20000  -0.00120  -0.00124  -0.00130  -0.00075  -0.00083  -0.00072  -0.00139  -0.00100  -0.00045  -0.00132  -0.00061  -0.00095  -0.00116  -0.00067   0.00043
        0.50000  -0.00127  -0.00132  -0.00142   0.00026  -0.00133  -0.00072  -0.00136  -0.00055   0.00012  -0.00189  -0.00110  -0.00120  -0.00120   0.00028   0.00000
        0.90000  -0.00160  -0.00163  -0.00201  -0.00164  -0.00099  -0.00279  -0.00189  -0.00195  -0.00290  -0.00021  -0.00219  -0.00154  -0.00197  -0.00138  -0.00085
      </tableData>

      <tableData breakPoint="0.00000">
                -10.00     -5.00      0.00      5.00     10.00     12.00     13.00     14.00     15.00     20.00     25.00     30.00     40.00     50.00     60.00
        0.20000  -0.00136  -0.00134  -0.00132  -0.00121  -0.00110  -0.00106  -0.00098  -0.00091  -0.00087  -0.00069  -0.00114  -0.00147  -0.00130  -0.00132  -0.00121
        0.50000  -0.00142  -0.00141  -0.00136  -0.00129  -0.00120  -0.00112  -0.00104  -0.00096  -0.00087  -0.00068  -0.00124  -0.00156  -0.00141  -0.00139  -0.00127
        0.90000  -0.00173  -0.00176  -0.00174  -0.00174  -0.00159  -0.00145  -0.00135  -0.00125  -0.00114  -0.00109  -0.00115  -0.00163  -0.00176  -0.00171  -0.00141
      </tableData>

      <tableData breakPoint="10.00000">
                -10.00     -5.00      0.00      5.00     10.00     12.00     13.00     14.00     15.00     20.00     25.00     30.00     40.00     50.00     60.00
        0.20000  -0.00127  -0.00128  -0.00137  -0.00070  -0.00099  -0.00096   0.00155  -0.00446  -0.00084  -0.00284  -0.00065  -0.00097  -0.00133  -0.00064  -0.00027
        0.50000  -0.00129  -0.00135  -0.00145  -0.00075  -0.00130  -0.00092   0.00083  -0.00397  -0.00092  -0.00132  -0.00150  -0.00102  -0.00115   0.00023  -0.00037
        0.90000  -0.00164  -0.00167  -0.00198  -0.00173  -0.00128  -0.00249  -0.00192  -0.00194   0.00085  -0.00043  -0.00397  -0.00172  -0.00221  -0.00049  -0.00087
      </tableData>

    </table>
  </function>

  <function name="aero/CMx_rudder_-4">
    <table>
      <independentVar lookup="row">velocities/mach</independentVar>
      <independentVar lookup="column">aero/alpha-deg</independentVar>
      <independentVar lookup="table">aero/beta-deg</independentVar>
      <tableData breakPoint="-10.00000">
                -10.00     -5.00      0.00      5.00     10.00     12.00     13.00     14.00     15.00     20.00     25.00     30.00     40.00     50.00     60.00
        0.20000   0.00127   0.00129   0.00135   0.00093   0.00098   0.00102  -0.00096   0.00478   0.00085   0.00300   0.00074   0.00097   0.00140   0.00067   0.00023
        0.50000   0.00133   0.00137   0.00148   0.00129   0.00130   0.00093  -0.00109   0.00423   0.00094   0.00113   0.00077   0.00102   0.00114  -0.00022   0.00021
        0.90000   0.00164   0.00168   0.00194   0.00173   0.00136   0.00200   0.00193   0.00195  -0.00072   0.00041   0.00395   0.00170   0.00219   0.00044   0.00085
      </tableData>

      <tableData breakPoint="0.00000">
                -10.00     -5.00      0.00      5.00     10.00     12.00     13.00     14.00     15.00     20.00     25.00     30.00     40.00     50.00     60.00
        0.20000   0.00130   0.00132   0.00127   0.00134   0.00117   0.00106   0.00098   0.00091   0.00086   0.00066   0.00110   0.00143   0.00126   0.00124   0.00124
        0.50000   0.00137   0.00140   0.00138   0.00141   0.00123   0.00111   0.00103   0.00096   0.00087   0.00066   0.00120   0.00154   0.00137   0.00129   0.00123
        0.90000   0.00172   0.00175   0.00178   0.00178   0.00160   0.00146   0.00136   0.00125   0.00114   0.00111   0.00118   0.00166   0.00182   0.00171   0.00134
      </tableData>

      <tableData breakPoint="10.00000">
                -10.00     -5.00      0.00      5.00     10.00     12.00     13.00     14.00     15.00     20.00     25.00     30.00     40.00     50.00     60.00
        0.20000   0.00114   0.00127   0.00131   0.00070   0.00086   0.00071   0.00139   0.00091   0.00045   0.00125   0.00071   0.00093   0.00115   0.00067  -0.00049
        0.50000   0.00127   0.00130   0.00142   0.00092   0.00124   0.00070   0.00137   0.00053   0.00000   0.00191   0.00094   0.00120   0.00119  -0.00020  -0.00042
        0.90000   0.00160   0.00163   0.00202   0.00165   0.00134   0.00278   0.00173   0.00192   0.00314   0.00020   0.00200   0.00149   0.00199   0.00128   0.00087
      </tableData>

    </table>
  </function>

  <function name="aero/CMx_rudder_35">
    <table>
      <independentVar lookup="row">velocities/mach</independentVar>
      <independentVar lookup="column">aero/alpha-deg</independentVar>
      <independentVar lookup="table">aero/beta-deg</independentVar>
      <tableData breakPoint="-10.00000">
                -10.00     -5.00      0.00      5.00     10.00     12.00     13.00     14.00     15.00     20.00     25.00     30.00     40.00     50.00     60.00
        0.20000  -0.00629  -0.00632  -0.00701  -0.00211   0.00146  -0.00438  -0.00751  -0.00257  -0.00163  -0.00233  -0.00198  -0.00502  -0.00660  -0.00526   0.00090
        0.50000  -0.00601  -0.00621  -0.00714  -0.00540  -0.00162  -0.00436  -0.00822  -0.00198  -0.00124  -0.00486  -0.00227  -0.00658  -0.00704  -0.00572  -0.00248
        0.90000  -0.00536  -0.00538  -0.00584  -0.00810  -0.00603  -0.01216  -0.01058  -0.00458  -0.00518  -0.00054  -0.00457  -0.00452  -0.01092  -0.01056  -0.00615
      </tableData>

      <tableData breakPoint="0.00000">
                -10.00     -5.00      0.00      5.00     10.00     12.00     13.00     14.00     15.00     20.00     25.00     30.00     40.00     50.00     60.00
        0.20000  -0.00919  -0.00918  -0.00897  -0.00868  -0.00768  -0.00713  -0.00656  -0.00598  -0.00556  -0.00506  -0.00690  -0.00848  -0.00819  -0.00822  -0.00692
        0.50000  -0.00962  -0.00965  -0.00945  -0.00921  -0.00827  -0.00746  -0.00691  -0.00625  -0.00565  -0.00519  -0.00734  -0.00902  -0.00889  -0.00864  -0.00735
        0.90000  -0.01173  -0.01179  -0.01169  -0.01176  -0.01080  -0.00972  -0.00923  -0.00869  -0.00828  -0.00667  -0.00706  -0.00950  -0.01138  -0.01101  -0.00933
      </tableData>

      <tableData breakPoint="10.00000">
                -10.00     -5.00      0.00      5.00     10.00     12.00     13.00     14.00     15.00     20.00     25.00     30.00     40.00     50.00     60.00
        0.20000  -0.00952  -0.00930  -0.00950  -0.00747  -0.01038  -0.00752  -0.00491  -0.01010  -0.00961  -0.00973  -0.00755  -0.00750  -0.00452  -0.00538  -0.00160
        0.50000  -0.00988  -0.00979  -0.01026  -0.01071  -0.01085  -0.00833  -0.00490  -0.01185  -0.00942  -0.00823  -0.00676  -0.00817  -0.00904  -0.00565   0.00195
        0.90000  -0.01209  -0.01232  -0.01051  -0.01278  -0.01138  -0.00705  -0.00747  -0.01271  -0.00786  -0.00826  -0.00401  -0.01052  -0.01351  -0.00385  -0.00352
      </tableData>

    </table>
  </function>

  <function name="aero/CMx_rudder">
    <interpolate1d>
      <property>fcs/surfaces/rudder-pos-deg</property>
      <value>-35</value> <property>aero/CMx_rudder_-35</property>
      <value>-4</value> <property>aero/CMx_rudder_-4</property>
      <value>0</value> <value>0</value>
      <value>4</value> <property>aero/CMx_rudder_4</property>
      <value>35</value> <property>aero/CMx_rudder_35</property>
    </interpolate1d>
  </function>

  <!-- slats -->
  <function name="aero/CMx_slats_27.5">
    <table>
      <independentVar lookup="row">velocities/mach</independentVar>
      <independentVar lookup="column">aero/alpha-deg</independentVar>
      <independentVar lookup="table">aero/beta-deg</independentVar>
      <tableData breakPoint="-10.00000">
                -10.00     -5.00      0.00      5.00     10.00     12.00     13.00     14.00     15.00     20.00     25.00     30.00     40.00     50.00     60.00
        0.20000   0.00000   0.00000   0.00000   0.00000   0.00000   0.00000   0.00000   0.00000   0.00000   0.00000   0.00000   0.00000   0.00000   0.00000   0.00000
        0.50000   0.00000   0.00000   0.00000   0.00000   0.00000   0.00000   0.00000   0.00000   0.00000   0.00000   0.00000   0.00000   0.00000   0.00000   0.00000
        0.90000   0.00000   0.00000   0.00000   0.00000   0.00000   0.00000   0.00000   0.00000  -0.00011   0.00000   0.00000   0.00000   0.00000   0.00000   0.00000
      </tableData>

      <tableData breakPoint="0.00000">
                -10.00     -5.00      0.00      5.00     10.00     12.00     13.00     14.00     15.00     20.00     25.00     30.00     40.00     50.00     60.00
        0.20000   0.00000   0.00000   0.00000   0.00000   0.00000   0.00000   0.00000   0.00000   0.00000   0.00000   0.00000   0.00000   0.00000   0.00000   0.00000
        0.50000   0.00000   0.00000   0.00000   0.00000   0.00000   0.00000   0.00000   0.00000   0.00000   0.00000   0.00000   0.00000   0.00000   0.00000   0.00000
        0.90000   0.00000   0.00000   0.00000   0.00000   0.00000   0.00000   0.00000   0.00000   0.00000   0.00000   0.00000   0.00000   0.00000   0.00000   0.00000
      </tableData>

      <tableData breakPoint="10.00000">
                -10.00     -5.00      0.00      5.00     10.00     12.00     13.00     14.00     15.00     20.00     25.00     30.00     40.00     50.00     60.00
        0.20000   0.00000   0.00000   0.00000   0.00000   0.00000   0.00000   0.00000   0.00000   0.00000   0.00012   0.00000   0.00000   0.00000   0.00000   0.00000
        0.50000   0.00000   0.00000   0.00000   0.00000   0.00000   0.00000   0.00000   0.00000   0.00000   0.00000   0.00000   0.00000   0.00000   0.00000   0.00000
        0.90000   0.00000   0.00000   0.00000   0.00000   0.00000  -0.00013   0.00000   0.00000   0.00000   0.00000   0.00000   0.00000   0.00000   0.00000   0.00000
      </tableData>

    </table>
  </function>

  <function name="aero/CMx_slats">
    <interpolate1d>
      <property>fcs/surfaces/slats-pos-deg</property>
      <value>0</value> <value>0</value>
      <value>27.5</value> <property>aero/CMx_slats_27.5</property>
    </interpolate1d>
  </function>

  <!-- speedbrake -->
  <function name="aero/CMx_speedbrake_60">
    <table>
      <independentVar lookup="row">velocities/mach</independentVar>
      <independentVar lookup="column">aero/alpha-deg</independentVar>
      <independentVar lookup="table">aero/beta-deg</independentVar>
      <tableData breakPoint="-10.00000">
                -10.00     -5.00      0.00      5.00     10.00     12.00     13.00     14.00     15.00     20.00     25.00     30.00     40.00     50.00     60.00
        0.20000   0.00000   0.00000   0.00000   0.00000   0.00000   0.00000   0.00000   0.00000   0.00000   0.00000   0.00000   0.00000   0.00000   0.00000   0.00000
        0.50000   0.00000   0.00000   0.00000   0.00000   0.00000   0.00000   0.00000   0.00000   0.00000   0.00000   0.00000   0.00000   0.00000   0.00000  -0.00010
        0.90000   0.00000   0.00000   0.00000   0.00000   0.00000   0.00000   0.00000   0.00000  -0.00012   0.00000   0.00000   0.00000   0.00000   0.00000   0.00000
      </tableData>

      <tableData breakPoint="0.00000">
                -10.00     -5.00      0.00      5.00     10.00     12.00     13.00     14.00     15.00     20.00     25.00     30.00     40.00     50.00     60.00
        0.20000   0.00000   0.00000   0.00000   0.00000   0.00000   0.00000   0.00000   0.00000   0.00000   0.00000   0.00000   0.00000   0.00000   0.00000   0.00000
        0.50000   0.00000   0.00000   0.00000   0.00000   0.00000   0.00000   0.00000   0.00000  -0.00000   0.00000   0.00000   0.00000   0.00000   0.00000   0.00000
        0.90000   0.00000   0.00000   0.00000   0.00000   0.00000   0.00000   0.00000   0.00000   0.00000   0.00000   0.00000   0.00000   0.00000   0.00000   0.00000
      </tableData>

      <tableData breakPoint="10.00000">
                -10.00     -5.00      0.00      5.00     10.00     12.00     13.00     14.00     15.00     20.00     25.00     30.00     40.00     50.00     60.00
        0.20000   0.00000   0.00000   0.00000   0.00000   0.00000   0.00000   0.00000   0.00000   0.00000   0.00011   0.00000   0.00000   0.00000   0.00000   0.00000
        0.50000   0.00000   0.00000   0.00000   0.00000   0.00000   0.00000   0.00000   0.00000   0.00000   0.00000   0.00000   0.00000   0.00000   0.00000   0.00000
        0.90000   0.00000   0.00000   0.00000   0.00000   0.00000   0.00000   0.00000   0.00000   0.00000   0.00000  -0.00014   0.00000   0.00000   0.00000   0.00000
      </tableData>

    </table>
  </function>

  <function name="aero/CMx_speedbrake">
    <interpolate1d>
      <property>fcs/surfaces/speedbrake-pos-deg</property>
      <value>0</value> <value>0</value>
      <value>60</value> <property>aero/CMx_speedbrake_60</property>
    </interpolate1d>
  </function>

  <!-- CMY -->
  <!-- base -->
  <function name="aero/CMy_base">
    <table>
      <independentVar lookup="row">velocities/mach</independentVar>
      <independentVar lookup="column">aero/alpha-deg</independentVar>
      <independentVar lookup="table">aero/beta-deg</independentVar>
      <tableData breakPoint="-10.00000">
                -10.00     -5.00      0.00      5.00     10.00     12.00     13.00     14.00     15.00     20.00     25.00     30.00     40.00     50.00     60.00
        0.20000   0.15369   0.08789   0.00236  -0.14630  -0.16962  -0.20417  -0.23818  -0.24445  -0.23649  -0.24665  -0.24098  -0.29264  -0.37913  -0.43973  -0.53177
        0.50000   0.16364   0.09506  -0.00449  -0.02435  -0.17593  -0.21482  -0.24320  -0.24270  -0.25196  -0.28935  -0.31220  -0.31495  -0.40627  -0.46456  -0.67061
        0.90000   0.22133   0.12333  -0.06117  -0.17782  -0.10865  -0.13436  -0.16475  -0.19353  -0.25480  -0.23601  -0.43691  -0.37973  -0.51368  -0.60835  -0.69079
      </tableData>

      <tableData breakPoint="0.00000">
                -10.00     -5.00      0.00      5.00     10.00     12.00     13.00     14.00     15.00     20.00     25.00     30.00     40.00     50.00     60.00
        0.20000   0.16810   0.09134   0.03445  -0.06862  -0.16379  -0.19326  -0.20569  -0.21695  -0.22808  -0.28847  -0.32900  -0.35440  -0.40251  -0.46735  -0.54956
        0.50000   0.17964   0.09695   0.03619  -0.07761  -0.17719  -0.20791  -0.22020  -0.23273  -0.24618  -0.30995  -0.35027  -0.36832  -0.42390  -0.49968  -0.59719
        0.90000   0.23806   0.12302   0.06326  -0.12218  -0.24168  -0.28821  -0.31000  -0.33142  -0.35286  -0.41227  -0.44765  -0.48416  -0.55189  -0.65021  -0.77769
      </tableData>

      <tableData breakPoint="10.00000">
                -10.00     -5.00      0.00      5.00     10.00     12.00     13.00     14.00     15.00     20.00     25.00     30.00     40.00     50.00     60.00
        0.20000   0.15373   0.08808   0.00286  -0.16722  -0.16603  -0.20272  -0.23615  -0.24030  -0.23753  -0.25309  -0.24081  -0.29110  -0.37771  -0.43892  -0.53348
        0.50000   0.16345   0.09522  -0.00388  -0.04266  -0.17019  -0.21324  -0.24056  -0.23943  -0.25095  -0.28805  -0.31450  -0.31319  -0.40492  -0.46480  -0.58737
        0.90000   0.22210   0.12353  -0.06070  -0.18300  -0.10786  -0.12614  -0.16533  -0.19431  -0.25421  -0.23539  -0.43416  -0.38159  -0.51390  -0.60830  -0.68846
      </tableData>

    </table>
  </function>

  <!-- elevator -->
  <function name="aero/CMy_elevator_-24">
    <table>
      <independentVar lookup="row">velocities/mach</independentVar>
      <independentVar lookup="column">aero/alpha-deg</independentVar>
      <independentVar lookup="table">aero/beta-deg</independentVar>
      <tableData breakPoint="-10.00000">
                -10.00     -5.00      0.00      5.00     10.00     12.00     13.00     14.00     15.00     20.00     25.00     30.00     40.00     50.00     60.00
        0.20000   0.00000   0.00000   0.00000   0.00000   0.00000   0.00000   0.00000   0.00026  -0.00013   0.00000   0.00013   0.00000   0.00000   0.00024  -0.00271
        0.50000   0.00000   0.00000   0.00000   0.00000   0.00000   0.00021   0.00000   0.00000   0.00000   0.00000   0.00049   0.00000   0.00000   0.00000   0.01073
        0.90000   0.00000   0.00000   0.00000   0.00000   0.00127  -0.00123   0.00000   0.00012  -0.00078   0.00144  -0.00083  -0.00017   0.00000   0.00018   0.00025
      </tableData>

      <tableData breakPoint="0.00000">
                -10.00     -5.00      0.00      5.00     10.00     12.00     13.00     14.00     15.00     20.00     25.00     30.00     40.00     50.00     60.00
        0.20000   0.00000   0.00000   0.00000   0.00000   0.00000   0.00000   0.00000   0.00000   0.00000   0.00000   0.00000   0.00000   0.00000   0.00000   0.00000
        0.50000   0.00000   0.00000   0.00000   0.00000   0.00000   0.00000   0.00000   0.00000   0.00000   0.00000   0.00000   0.00000   0.00000   0.00000   0.00000
        0.90000   0.00000   0.00000   0.00000   0.00000   0.00000   0.00000   0.00000   0.00000   0.00000   0.00000   0.00000   0.00000   0.00000   0.00000   0.00000
      </tableData>

      <tableData breakPoint="10.00000">
                -10.00     -5.00      0.00      5.00     10.00     12.00     13.00     14.00     15.00     20.00     25.00     30.00     40.00     50.00     60.00
        0.20000   0.00000   0.00000   0.00000   0.00000   0.00000   0.00000   0.00000   0.00000   0.00000   0.00219   0.00000   0.00000   0.00000   0.00046   0.00241
        0.50000   0.00000   0.00000   0.00000   0.00000   0.00000   0.00000   0.00000   0.00000   0.00014   0.00000   0.00016   0.00000   0.00000   0.00000  -0.04288
        0.90000   0.00000   0.00000   0.00000   0.00000  -0.00148  -0.00322   0.00012  -0.00035   0.00000  -0.00087  -0.00058   0.00000   0.00000   0.00000   0.00000
      </tableData>

    </table>
  </function>

  <function name="aero/CMy_elevator_-9.5">
    <table>
      <independentVar lookup="row">velocities/mach</independentVar>
      <independentVar lookup="column">aero/alpha-deg</independentVar>
      <independentVar lookup="table">aero/beta-deg</independentVar>
      <tableData breakPoint="-10.00000">
                -10.00     -5.00      0.00      5.00     10.00     12.00     13.00     14.00     15.00     20.00     25.00     30.00     40.00     50.00     60.00
        0.20000   0.00000   0.00000   0.00000   0.00000   0.00000   0.00000   0.00000   0.00027   0.00000  -0.00362   0.00016   0.00000   0.00000   0.00029  -0.00034
        0.50000   0.00037   0.00000   0.00000   0.00000   0.00000   0.00020   0.00000   0.00043   0.00000   0.00016   0.00000   0.00000   0.00000  -0.00010   0.01190
        0.90000   0.00000   0.00000   0.00000   0.00000   0.00062  -0.00128  -0.00015   0.00034  -0.00100   0.00059  -0.00022   0.00000   0.00000   0.00044   0.00020
      </tableData>

      <tableData breakPoint="0.00000">
                -10.00     -5.00      0.00      5.00     10.00     12.00     13.00     14.00     15.00     20.00     25.00     30.00     40.00     50.00     60.00
        0.20000   0.00000   0.00000   0.00000   0.00000   0.00000   0.00000   0.00000   0.00000   0.00000   0.00000   0.00000   0.00000   0.00000  -0.00019   0.00031
        0.50000   0.00000   0.00000   0.00000   0.00000   0.00000   0.00000   0.00000   0.00000   0.00000   0.00000   0.00000   0.00000   0.00000   0.00000   0.00032
        0.90000   0.00000   0.00000   0.00000   0.00000   0.00000   0.00000   0.00000   0.00000   0.00000   0.00000   0.00000   0.00000   0.00000   0.00000   0.00000
      </tableData>

      <tableData breakPoint="10.00000">
                -10.00     -5.00      0.00      5.00     10.00     12.00     13.00     14.00     15.00     20.00     25.00     30.00     40.00     50.00     60.00
        0.20000   0.00017   0.00000   0.00000   0.00000   0.00000   0.00000   0.00000   0.00000   0.00000   0.00238   0.00000  -0.00011   0.00000   0.00070   0.00243
        0.50000   0.00039   0.00000   0.00000   0.00000   0.00000   0.00000   0.00000   0.00044   0.00000   0.00000   0.00018   0.00000   0.00000   0.00022  -0.05798
        0.90000   0.00000   0.00000   0.00000   0.00000  -0.00026  -0.00148   0.00014   0.00000   0.00000  -0.00118  -0.00063   0.00018   0.00000   0.00012   0.00041
      </tableData>

    </table>
  </function>

  <function name="aero/CMy_elevator_1.5">
    <table>
      <independentVar lookup="row">velocities/mach</independentVar>
      <independentVar lookup="column">aero/alpha-deg</independentVar>
      <independentVar lookup="table">aero/beta-deg</independentVar>
      <tableData breakPoint="-10.00000">
                -10.00     -5.00      0.00      5.00     10.00     12.00     13.00     14.00     15.00     20.00     25.00     30.00     40.00     50.00     60.00
        0.20000   0.00000   0.00000   0.00000   0.00000   0.00000   0.00000   0.00027   0.00000   0.00000  -0.00255   0.00000   0.00000   0.00000   0.00018  -0.00235
        0.50000   0.00000   0.00000   0.00000   0.00210   0.00012   0.00000   0.00011   0.00025   0.00000   0.00000   0.00016   0.00000   0.00000   0.00000   0.01163
        0.90000   0.00000   0.00000   0.00000   0.00000   0.00097  -0.00167   0.00000   0.00000  -0.00104   0.00045  -0.00041  -0.00026   0.00000   0.00000   0.00020
      </tableData>

      <tableData breakPoint="0.00000">
                -10.00     -5.00      0.00      5.00     10.00     12.00     13.00     14.00     15.00     20.00     25.00     30.00     40.00     50.00     60.00
        0.20000   0.00000   0.00000   0.00000   0.00000   0.00000   0.00000   0.00000   0.00000   0.00000   0.00000   0.00000   0.00000   0.00000  -0.00010   0.00000
        0.50000   0.00000   0.00000   0.00000   0.00000   0.00000   0.00000   0.00000   0.00000   0.00000   0.00000   0.00000   0.00000   0.00000   0.00011   0.00018
        0.90000   0.00000   0.00000   0.00000   0.00000   0.00000   0.00000   0.00000   0.00000   0.00000   0.00000   0.00000   0.00000   0.00000   0.00000   0.00000
      </tableData>

      <tableData breakPoint="10.00000">
                -10.00     -5.00      0.00      5.00     10.00     12.00     13.00     14.00     15.00     20.00     25.00     30.00     40.00     50.00     60.00
        0.20000   0.00000   0.00000   0.00000   0.00000   0.00000   0.00000   0.00000   0.00000  -0.00016  -0.00026   0.00000   0.00000   0.00000   0.00034   0.00232
        0.50000   0.00000   0.00000   0.00000   0.00000   0.00000   0.00000   0.00000   0.00044   0.00000   0.00000   0.00016   0.00000   0.00000   0.00000  -0.04295
        0.90000   0.00000   0.00000   0.00014   0.00000  -0.00088  -0.00351  -0.00012  -0.00036  -0.00146  -0.00125  -0.00135   0.00016   0.00000   0.00000   0.00061
      </tableData>

    </table>
  </function>

  <function name="aero/CMy_elevator">
    <interpolate1d>
      <property>fcs/surfaces/elevator-pos-deg</property>
      <value>-24</value> <property>aero/CMy_elevator_-24</property>
      <value>-9.5</value> <property>aero/CMy_elevator_-9.5</property>
      <value>0</value> <value>0</value>
      <value>1.5</value> <property>aero/CMy_elevator_1.5</property>
    </interpolate1d>
  </function>

  <!-- flaps -->
  <function name="aero/CMy_flaps_30">
    <table>
      <independentVar lookup="row">velocities/mach</independentVar>
      <independentVar lookup="column">aero/alpha-deg</independentVar>
      <independentVar lookup="table">aero/beta-deg</independentVar>
      <tableData breakPoint="-10.00000">
                -10.00     -5.00      0.00      5.00     10.00     12.00     13.00     14.00     15.00     20.00     25.00     30.00     40.00     50.00     60.00
        0.20000  -0.12894  -0.08199  -0.16391  -0.26813  -0.24311  -0.19279  -0.20289  -0.14026  -0.20377  -0.16362  -0.07603  -0.07181  -0.10834  -0.08483  -0.04288
        0.50000  -0.14873  -0.09310  -0.22713  -0.37240  -0.20795  -0.23594  -0.22191  -0.21828  -0.19693  -0.20525  -0.02645  -0.08102  -0.12362  -0.09451  -0.08483
        0.90000  -0.33514  -0.20591   0.04781   1.15902  -0.16365  -0.19823  -0.20553  -0.16450  -0.18140  -0.33260  -0.14423  -0.19143  -0.20151  -0.16095  -0.12310
      </tableData>

      <tableData breakPoint="0.00000">
                -10.00     -5.00      0.00      5.00     10.00     12.00     13.00     14.00     15.00     20.00     25.00     30.00     40.00     50.00     60.00
        0.20000  -0.13951  -0.04775  -0.19258  -0.16438  -0.11961  -0.10724  -0.10432  -0.10264  -0.10064  -0.09011  -0.09208  -0.10814  -0.11437  -0.09347  -0.04489
        0.50000  -0.16009  -0.05514  -0.21375  -0.17260  -0.13959  -0.13346  -0.12484  -0.12437  -0.12033  -0.10242  -0.11509  -0.13599  -0.12945  -0.10213  -0.05349
        0.90000  -0.31802  -0.12483  -0.15730  -0.20044  -0.25583  -0.26341  -0.26938  -0.27917  -0.28301  -0.29617  -0.30511  -0.29212  -0.21462  -0.16736  -0.11601
      </tableData>

      <tableData breakPoint="10.00000">
                -10.00     -5.00      0.00      5.00     10.00     12.00     13.00     14.00     15.00     20.00     25.00     30.00     40.00     50.00     60.00
        0.20000  -0.12920  -0.08345  -0.16733  -0.24678  -0.26399  -0.18085  -0.20252  -0.13767  -0.20217  -0.15570  -0.07441  -0.07223  -0.10778  -0.08535  -0.04033
        0.50000  -0.14876  -0.09480  -0.21821  -0.34645  -0.21292  -0.24608  -0.22316  -0.23195  -0.19538  -0.20605  -0.02324  -0.08008  -0.12372  -0.09422  -0.16893
        0.90000  -0.33620  -0.20656   0.11041   1.16230  -0.21029  -0.20039  -0.20034  -0.16457  -0.18428  -0.33563  -0.15324  -0.19266  -0.20274  -0.16209  -0.12244
      </tableData>

    </table>
  </function>

  <function name="aero/CMy_flaps_40">
    <table>
      <independentVar lookup="row">velocities/mach</independentVar>
      <independentVar lookup="column">aero/alpha-deg</independentVar>
      <independentVar lookup="table">aero/beta-deg</independentVar>
      <tableData breakPoint="-10.00000">
                -10.00     -5.00      0.00      5.00     10.00     12.00     13.00     14.00     15.00     20.00     25.00     30.00     40.00     50.00     60.00
        0.20000   0.00000   0.00000   0.00000   0.00000  -0.00106  -0.00510  -0.00764  -0.01811  -0.02019  -0.03361  -0.03290  -0.03133  -0.04594  -0.04273  -0.01990
        0.50000   0.00000   0.00000   0.00000   0.01048  -0.00307  -0.01036  -0.01549  -0.02847  -0.03132  -0.03320  -0.03803  -0.03233  -0.04840  -0.04595   0.03180
        0.90000   0.00000   0.00000  -0.00712   0.00020  -0.01855  -0.03963  -0.03780  -0.03391  -0.03355  -0.03014  -0.04972  -0.03823  -0.05414  -0.05050  -0.04827
      </tableData>

      <tableData breakPoint="0.00000">
                -10.00     -5.00      0.00      5.00     10.00     12.00     13.00     14.00     15.00     20.00     25.00     30.00     40.00     50.00     60.00
        0.20000   0.00000   0.00000   0.00000   0.00000  -0.00073  -0.00810  -0.01086  -0.01263  -0.01292  -0.01176  -0.02149  -0.04060  -0.04763  -0.04693  -0.01637
        0.50000   0.00000   0.00000   0.00000   0.00000  -0.00380  -0.01112  -0.01263  -0.01278  -0.01262  -0.01131  -0.02964  -0.04429  -0.05049  -0.04700  -0.02250
        0.90000   0.00000   0.00000   0.00000   0.00000  -0.01208  -0.01146  -0.01101  -0.01059  -0.01033  -0.03754  -0.05368  -0.05504  -0.05584  -0.06143  -0.05590
      </tableData>

      <tableData breakPoint="10.00000">
                -10.00     -5.00      0.00      5.00     10.00     12.00     13.00     14.00     15.00     20.00     25.00     30.00     40.00     50.00     60.00
        0.20000   0.00000   0.00000   0.00000   0.00000  -0.00119  -0.00515  -0.00762  -0.01826  -0.02062  -0.02740  -0.03322  -0.03127  -0.04579  -0.04250  -0.01789
        0.50000   0.00000   0.00000   0.00000   0.00000  -0.00309  -0.01039  -0.01504  -0.02870  -0.03169  -0.03310  -0.03853  -0.03220  -0.04828  -0.04602  -0.09487
        0.90000   0.00000   0.00000  -0.00689   0.00021  -0.01912  -0.04222  -0.03759  -0.03427  -0.03187  -0.03152  -0.04991  -0.03779  -0.05416  -0.05095  -0.04886
      </tableData>

    </table>
  </function>

  <function name="aero/CMy_flaps">
    <interpolate1d>
      <property>fcs/surfaces/flaps-pos-deg</property>
      <value>0</value> <value>0</value>
      <value>30</value> <property>aero/CMy_flaps_30</property>
      <value>40</value> <property>aero/CMy_flaps_40</property>
    </interpolate1d>
  </function>

  <!-- left-flaperon -->
  <function name="aero/CMy_left-flaperon_-51">
    <table>
      <independentVar lookup="row">velocities/mach</independentVar>
      <independentVar lookup="column">aero/alpha-deg</independentVar>
      <independentVar lookup="table">aero/beta-deg</independentVar>
      <tableData breakPoint="-10.00000">
                -10.00     -5.00      0.00      5.00     10.00     12.00     13.00     14.00     15.00     20.00     25.00     30.00     40.00     50.00     60.00
        0.20000   0.03073   0.03995  -0.00677  -0.02145   0.06298   0.07403   0.09124   0.07808   0.05553   0.01706   0.01466   0.02977   0.05302   0.03725   0.03067
        0.50000   0.03697   0.05481  -0.00064  -0.00581   0.06266   0.07806   0.08783   0.06983   0.06304   0.06196   0.09144   0.04548   0.06522   0.05341   0.14646
        0.90000   0.08279   0.07343   0.05208   0.16341  -0.01591   0.00476   0.02606   0.04604   0.09728   0.01769   0.20521   0.11381   0.11129   0.12785   0.10577
      </tableData>

      <tableData breakPoint="0.00000">
                -10.00     -5.00      0.00      5.00     10.00     12.00     13.00     14.00     15.00     20.00     25.00     30.00     40.00     50.00     60.00
        0.20000   0.06970   0.07598   0.04247   0.07667   0.08562   0.08215   0.07954   0.07599   0.07286   0.07501   0.07726   0.07324   0.05845   0.04582   0.04166
        0.50000   0.07714   0.08777   0.04420   0.08804   0.09630   0.09316   0.08930   0.08595   0.08458   0.09151   0.09272   0.08185   0.06721   0.05525   0.04972
        0.90000   0.12711   0.16123  -0.01239   0.17018   0.17772   0.18019   0.18567   0.19136   0.19818   0.19415   0.17986   0.16327   0.12708   0.10427   0.09176
      </tableData>

      <tableData breakPoint="10.00000">
                -10.00     -5.00      0.00      5.00     10.00     12.00     13.00     14.00     15.00     20.00     25.00     30.00     40.00     50.00     60.00
        0.20000   0.09505   0.10966   0.10977   0.17938   0.12452   0.12769   0.14306   0.14065   0.11263   0.06197   0.06222   0.08064   0.05969   0.04976   0.03821
        0.50000   0.10713   0.12418   0.13615   0.08227   0.12518   0.14424   0.15140   0.13332   0.13388   0.12470   0.06693   0.08597   0.06077   0.05291   0.04784
        0.90000   0.18316   0.23929   0.28594   0.29019   0.13381   0.14827   0.09968   0.18691   0.24538   0.20373   0.28126   0.18071   0.13273   0.09864   0.10540
      </tableData>

    </table>
  </function>

  <function name="aero/CMy_left-flaperon">
    <interpolate1d>
      <property>fcs/surfaces/left-flaperon-pos-deg</property>
      <value>-51</value> <property>aero/CMy_left-flaperon_-51</property>
      <value>0</value> <value>0</value>
    </interpolate1d>
  </function>

  <!-- right-flaperon -->
  <function name="aero/CMy_right-flaperon_-51">
    <table>
      <independentVar lookup="row">velocities/mach</independentVar>
      <independentVar lookup="column">aero/alpha-deg</independentVar>
      <independentVar lookup="table">aero/beta-deg</independentVar>
      <tableData breakPoint="-10.00000">
                -10.00     -5.00      0.00      5.00     10.00     12.00     13.00     14.00     15.00     20.00     25.00     30.00     40.00     50.00     60.00
        0.20000   0.09532   0.10989   0.11052   0.15979   0.12618   0.12766   0.14441   0.14512   0.11088   0.05561   0.06076   0.08093   0.05998   0.04926   0.03522
        0.50000   0.10719   0.12430   0.13071   0.06580   0.12963   0.14435   0.15285   0.13640   0.13343   0.12738   0.05779   0.08865   0.06077   0.05173   0.12674
        0.90000   0.18342   0.23951   0.28858   0.28328   0.13654   0.15754   0.10017   0.18613   0.25070   0.20421   0.28764   0.17757   0.13253   0.09661   0.10625
      </tableData>

      <tableData breakPoint="0.00000">
                -10.00     -5.00      0.00      5.00     10.00     12.00     13.00     14.00     15.00     20.00     25.00     30.00     40.00     50.00     60.00
        0.20000   0.06977   0.07587   0.04130   0.07683   0.08557   0.08205   0.07952   0.07594   0.07280   0.07499   0.07707   0.07325   0.05830   0.04557   0.04153
        0.50000   0.07689   0.08764   0.04317   0.08822   0.09625   0.09307   0.08930   0.08583   0.08457   0.09054   0.09282   0.08179   0.06721   0.05497   0.04961
        0.90000   0.12725   0.16117  -0.01419   0.17013   0.17790   0.18018   0.18563   0.19103   0.19795   0.19392   0.17963   0.16341   0.12739   0.10498   0.09201
      </tableData>

      <tableData breakPoint="10.00000">
                -10.00     -5.00      0.00      5.00     10.00     12.00     13.00     14.00     15.00     20.00     25.00     30.00     40.00     50.00     60.00
        0.20000   0.02977   0.03865  -0.00666   0.27241   0.05930   0.07085   0.08992   0.07303   0.05642   0.02484   0.01562   0.03022   0.05273   0.03759   0.03071
        0.50000   0.03627   0.05451  -0.00581   0.00999   0.05774   0.07463   0.08223   0.06670   0.06171   0.06258   0.09471   0.04538   0.06501   0.05366   0.08282
        0.90000   0.08335   0.07786   0.04932   0.16003  -0.01651  -0.00516   0.02564   0.04588   0.09545   0.01830   0.20262   0.11545   0.11189   0.13139   0.10534
      </tableData>

    </table>
  </function>

  <function name="aero/CMy_right-flaperon">
    <interpolate1d>
      <property>fcs/surfaces/right-flaperon-pos-deg</property>
      <value>-51</value> <property>aero/CMy_right-flaperon_-51</property>
      <value>0</value> <value>0</value>
    </interpolate1d>
  </function>

  <!-- rudder -->
  <function name="aero/CMy_rudder_-35">
    <table>
      <independentVar lookup="row">velocities/mach</independentVar>
      <independentVar lookup="column">aero/alpha-deg</independentVar>
      <independentVar lookup="table">aero/beta-deg</independentVar>
      <tableData breakPoint="-10.00000">
                -10.00     -5.00      0.00      5.00     10.00     12.00     13.00     14.00     15.00     20.00     25.00     30.00     40.00     50.00     60.00
        0.20000  -0.00010   0.00429  -0.00973   0.07229  -0.02640  -0.01458  -0.00528  -0.01640  -0.00353  -0.03228   0.00348  -0.00985   0.07298   0.04671  -0.05717
        0.50000  -0.00595   0.01402  -0.00899  -0.15764  -0.03567  -0.00801  -0.01520  -0.03722  -0.04906  -0.00217   0.08908  -0.00093   0.05736   0.09445   0.04986
        0.90000  -0.02042  -0.00659   0.03177   0.00095   0.00508  -0.11746  -0.11514  -0.06973  -0.00390   0.01626   0.13531   0.03437   0.00663   0.04732   0.06449
      </tableData>

      <tableData breakPoint="0.00000">
                -10.00     -5.00      0.00      5.00     10.00     12.00     13.00     14.00     15.00     20.00     25.00     30.00     40.00     50.00     60.00
        0.20000  -0.02856  -0.02909  -0.02907  -0.03062  -0.02785  -0.02666  -0.02545  -0.02443  -0.02298  -0.00967   0.00297  -0.01069  -0.00621   0.00139  -0.00537
        0.50000  -0.03145  -0.03188  -0.03208  -0.03185  -0.02795  -0.02570  -0.02488  -0.02373  -0.02154   0.00068   0.00533  -0.00408  -0.00578   0.00647   0.00274
        0.90000  -0.04865  -0.04763  -0.04658  -0.03381  -0.02570  -0.02218  -0.01794  -0.01144  -0.00271   0.00765   0.01045   0.01441   0.01629   0.00874   0.00648
      </tableData>

      <tableData breakPoint="10.00000">
                -10.00     -5.00      0.00      5.00     10.00     12.00     13.00     14.00     15.00     20.00     25.00     30.00     40.00     50.00     60.00
        0.20000  -0.05215  -0.05943  -0.05067   0.05044   0.01612   0.03154   0.00685   0.01563   0.03721  -0.01130   0.00674   0.02192   0.01724   0.00682   0.01455
        0.50000  -0.05263  -0.06437  -0.05026  -0.12887  -0.09661   0.05802   0.01101   0.00976   0.05772   0.01875   0.04280   0.02740   0.02783   0.01676   0.03519
        0.90000  -0.06237  -0.08182  -0.05828  -0.00461  -0.00361  -0.00359   0.01918   0.03850   0.09148  -0.00393   0.11493   0.01439   0.02585   0.03886  -0.01537
      </tableData>

    </table>
  </function>

  <function name="aero/CMy_rudder_4">
    <table>
      <independentVar lookup="row">velocities/mach</independentVar>
      <independentVar lookup="column">aero/alpha-deg</independentVar>
      <independentVar lookup="table">aero/beta-deg</independentVar>
      <tableData breakPoint="-10.00000">
                -10.00     -5.00      0.00      5.00     10.00     12.00     13.00     14.00     15.00     20.00     25.00     30.00     40.00     50.00     60.00
        0.20000  -0.00564  -0.00538  -0.00402  -0.02107  -0.00897   0.00216   0.00376   0.01042  -0.00140   0.00814  -0.00266   0.00342   0.00245  -0.00085   0.02384
        0.50000  -0.00472  -0.00599  -0.00310  -0.01514   0.00442   0.00481   0.00296   0.00355  -0.01072   0.02468   0.00712   0.00485   0.00574   0.01178   0.08146
        0.90000  -0.00614  -0.00719  -0.00682  -0.00022   0.00698   0.05244  -0.00186   0.00751   0.08549   0.00696   0.03010  -0.00337  -0.00078   0.00580  -0.00654
      </tableData>

      <tableData breakPoint="0.00000">
                -10.00     -5.00      0.00      5.00     10.00     12.00     13.00     14.00     15.00     20.00     25.00     30.00     40.00     50.00     60.00
        0.20000  -0.00049  -0.00061  -0.00051  -0.00032  -0.00034  -0.00040  -0.00047  -0.00049  -0.00133  -0.00061  -0.00038   0.00057  -0.00039  -0.00029  -0.00020
        0.50000  -0.00060  -0.00067  -0.00065  -0.00066  -0.00067  -0.00063  -0.00069  -0.00071  -0.00078  -0.00083  -0.00016   0.00000  -0.00030   0.00065   0.00011
        0.90000  -0.00101  -0.00099  -0.00096  -0.00082  -0.00078  -0.00071  -0.00069  -0.00067  -0.00063   0.00000   0.00000   0.00023   0.00050   0.00062   0.00000
      </tableData>

      <tableData breakPoint="10.00000">
                -10.00     -5.00      0.00      5.00     10.00     12.00     13.00     14.00     15.00     20.00     25.00     30.00     40.00     50.00     60.00
        0.20000   0.00090   0.00419   0.00143   0.01035   0.00477  -0.00070   0.00604  -0.02885   0.00144  -0.00280   0.00775  -0.00265   0.00092   0.00725  -0.01562
        0.50000   0.00106   0.00521   0.00194   0.00474   0.00000  -0.00384   0.03586  -0.02764  -0.00763   0.00619   0.07562  -0.01178  -0.00995  -0.00606  -0.01506
        0.90000   0.00411   0.00524   0.00380   0.00000  -0.00233  -0.12140  -0.00521  -0.00728  -0.01164  -0.01284  -0.02026   0.01143   0.00350   0.00645   0.00891
      </tableData>

    </table>
  </function>

  <function name="aero/CMy_rudder_-4">
    <table>
      <independentVar lookup="row">velocities/mach</independentVar>
      <independentVar lookup="column">aero/alpha-deg</independentVar>
      <independentVar lookup="table">aero/beta-deg</independentVar>
      <tableData breakPoint="-10.00000">
                -10.00     -5.00      0.00      5.00     10.00     12.00     13.00     14.00     15.00     20.00     25.00     30.00     40.00     50.00     60.00
        0.20000   0.00105   0.00412   0.00255   0.01749   0.00440  -0.00037   0.01341  -0.02762   0.00164  -0.00673   0.00538  -0.00269   0.00142   0.00802  -0.01738
        0.50000   0.00115   0.00443   0.00257  -0.04963   0.00135  -0.00362   0.03839  -0.02850  -0.00638   0.00645  -0.00228  -0.01288  -0.01021  -0.00702   0.06711
        0.90000   0.00416   0.00523   0.00259   0.00061  -0.00097  -0.11702  -0.00618  -0.00646  -0.00997  -0.01094  -0.01860   0.01051   0.00311   0.00744   0.00856
      </tableData>

      <tableData breakPoint="0.00000">
                -10.00     -5.00      0.00      5.00     10.00     12.00     13.00     14.00     15.00     20.00     25.00     30.00     40.00     50.00     60.00
        0.20000  -0.00060  -0.00061  -0.00056  -0.00064  -0.00065  -0.00067  -0.00071  -0.00072  -0.00127  -0.00051  -0.00030   0.00066  -0.00026  -0.00033  -0.00011
        0.50000  -0.00061  -0.00067  -0.00071  -0.00066  -0.00067  -0.00063  -0.00068  -0.00064  -0.00064  -0.00068  -0.00013   0.00000  -0.00022   0.00064   0.00029
        0.90000  -0.00102  -0.00100  -0.00097  -0.00081  -0.00075  -0.00069  -0.00067  -0.00069  -0.00062   0.00000   0.00000   0.00017   0.00062   0.00043   0.00000
      </tableData>

      <tableData breakPoint="10.00000">
                -10.00     -5.00      0.00      5.00     10.00     12.00     13.00     14.00     15.00     20.00     25.00     30.00     40.00     50.00     60.00
        0.20000  -0.00575  -0.00555  -0.00394  -0.00183  -0.00986   0.00209   0.00306   0.00805  -0.00116   0.01298  -0.00238   0.00337   0.00242  -0.00102   0.02806
        0.50000  -0.00467  -0.00580  -0.00299  -0.02704   0.00545   0.00579   0.00190   0.00203  -0.00633   0.02652   0.00351   0.00475   0.00533   0.01122   0.00970
        0.90000  -0.00597  -0.00718  -0.01226  -0.00016   0.00089   0.04396   0.00000   0.00693   0.08656   0.00352   0.02928  -0.00195  -0.00079   0.00558  -0.00666
      </tableData>

    </table>
  </function>

  <function name="aero/CMy_rudder_35">
    <table>
      <independentVar lookup="row">velocities/mach</independentVar>
      <independentVar lookup="column">aero/alpha-deg</independentVar>
      <independentVar lookup="table">aero/beta-deg</independentVar>
      <tableData breakPoint="-10.00000">
                -10.00     -5.00      0.00      5.00     10.00     12.00     13.00     14.00     15.00     20.00     25.00     30.00     40.00     50.00     60.00
        0.20000  -0.05364  -0.05953  -0.05221   0.02610   0.03158   0.03023   0.00778   0.01941   0.03583  -0.01671   0.00461   0.02089   0.01768   0.00715   0.01398
        0.50000  -0.05474  -0.06449  -0.05125  -0.14285  -0.09763   0.06078   0.01213   0.01243   0.05822   0.02064   0.04002   0.02783   0.02856   0.01566   0.11836
        0.90000  -0.06260  -0.08177  -0.05583  -0.00618  -0.00495   0.00341   0.01887   0.03703   0.09496  -0.00188   0.12483   0.01338   0.02574   0.04007  -0.01356
      </tableData>

      <tableData breakPoint="0.00000">
                -10.00     -5.00      0.00      5.00     10.00     12.00     13.00     14.00     15.00     20.00     25.00     30.00     40.00     50.00     60.00
        0.20000  -0.02862  -0.02914  -0.02951  -0.03057  -0.02788  -0.02675  -0.02547  -0.02446  -0.02281  -0.00952   0.00246  -0.01017  -0.00640   0.00129  -0.00479
        0.50000  -0.03155  -0.03188  -0.03253  -0.03185  -0.02792  -0.02584  -0.02503  -0.02386  -0.02165   0.00079   0.00494  -0.00436  -0.00608   0.00660   0.00264
        0.90000  -0.04864  -0.04771  -0.04676  -0.03390  -0.02592  -0.02242  -0.01817  -0.01169  -0.00295   0.00727   0.01100   0.01494   0.01627   0.00910   0.00673
      </tableData>

      <tableData breakPoint="10.00000">
                -10.00     -5.00      0.00      5.00     10.00     12.00     13.00     14.00     15.00     20.00     25.00     30.00     40.00     50.00     60.00
        0.20000  -0.00038   0.00524  -0.01069   0.10470  -0.02619  -0.01757  -0.00518  -0.01813  -0.00487  -0.02462   0.00470  -0.01014   0.04687   0.04408  -0.05530
        0.50000  -0.00560   0.01407  -0.01078  -0.05544  -0.03918  -0.01105  -0.01555  -0.03755  -0.04954  -0.00378   0.09306  -0.00136   0.06021   0.09442  -0.03410
        0.90000  -0.02050  -0.00655   0.03547   0.00466  -0.00258  -0.12648  -0.11619  -0.10926  -0.00442   0.00991   0.13525   0.03558   0.00522   0.02495   0.06160
      </tableData>

    </table>
  </function>

  <function name="aero/CMy_rudder">
    <interpolate1d>
      <property>fcs/surfaces/rudder-pos-deg</property>
      <value>-35</value> <property>aero/CMy_rudder_-35</property>
      <value>-4</value> <property>aero/CMy_rudder_-4</property>
      <value>0</value> <value>0</value>
      <value>4</value> <property>aero/CMy_rudder_4</property>
      <value>35</value> <property>aero/CMy_rudder_35</property>
    </interpolate1d>
  </function>

  <!-- slats -->
  <function name="aero/CMy_slats_27.5">
    <table>
      <independentVar lookup="row">velocities/mach</independentVar>
      <independentVar lookup="column">aero/alpha-deg</independentVar>
      <independentVar lookup="table">aero/beta-deg</independentVar>
      <tableData breakPoint="-10.00000">
                -10.00     -5.00      0.00      5.00     10.00     12.00     13.00     14.00     15.00     20.00     25.00     30.00     40.00     50.00     60.00
        0.20000   0.00000   0.00000   0.00000   0.00000   0.00000   0.00000   0.00029   0.00000   0.00000  -0.00017   0.00027   0.00000   0.00000  -0.00010  -0.00276
        0.50000   0.00036   0.00000   0.00000   0.00021   0.00010   0.00023   0.00000   0.00016   0.00000   0.00000   0.00000   0.00000   0.00000   0.00000  -0.00046
        0.90000   0.00000   0.00000   0.00000   0.00000   0.00035  -0.00138   0.00000   0.00000  -0.00048  -0.00019  -0.00081  -0.00061   0.00000   0.00000   0.00016
      </tableData>

      <tableData breakPoint="0.00000">
                -10.00     -5.00      0.00      5.00     10.00     12.00     13.00     14.00     15.00     20.00     25.00     30.00     40.00     50.00     60.00
        0.20000   0.00000   0.00000   0.00000   0.00000   0.00000   0.00000   0.00000   0.00000   0.00000   0.00000   0.00000   0.00000   0.00000  -0.00017   0.00032
        0.50000   0.00000   0.00000   0.00000   0.00000   0.00000   0.00000   0.00000   0.00000   0.00000   0.00000   0.00000   0.00000   0.00000   0.00016   0.00011
        0.90000   0.00000   0.00000   0.00000   0.00000   0.00000   0.00000   0.00000   0.00000   0.00000   0.00000   0.00000   0.00000   0.00000   0.00000   0.00000
      </tableData>

      <tableData breakPoint="10.00000">
                -10.00     -5.00      0.00      5.00     10.00     12.00     13.00     14.00     15.00     20.00     25.00     30.00     40.00     50.00     60.00
        0.20000   0.00000   0.00000   0.00000   0.00000   0.00000   0.00000   0.00000   0.00000   0.00000   0.00263   0.00000   0.00000   0.00000  -0.00019   0.00217
        0.50000   0.00000   0.00000   0.00000   0.00000  -0.00017   0.00000   0.00000   0.00016   0.00000  -0.00021   0.00031   0.00011   0.00000   0.00012  -0.04583
        0.90000   0.00000   0.00000   0.00000   0.00000  -0.00063  -0.00160  -0.00012   0.00000   0.00013  -0.00125  -0.00074   0.00000   0.00000  -0.00018   0.00048
      </tableData>

    </table>
  </function>

  <function name="aero/CMy_slats">
    <interpolate1d>
      <property>fcs/surfaces/slats-pos-deg</property>
      <value>0</value> <value>0</value>
      <value>27.5</value> <property>aero/CMy_slats_27.5</property>
    </interpolate1d>
  </function>

  <!-- speedbrake -->
  <function name="aero/CMy_speedbrake_60">
    <table>
      <independentVar lookup="row">velocities/mach</independentVar>
      <independentVar lookup="column">aero/alpha-deg</independentVar>
      <independentVar lookup="table">aero/beta-deg</independentVar>
      <tableData breakPoint="-10.00000">
                -10.00     -5.00      0.00      5.00     10.00     12.00     13.00     14.00     15.00     20.00     25.00     30.00     40.00     50.00     60.00
        0.20000   0.00017   0.00000   0.00000   0.00011   0.00000   0.00000   0.00025   0.00013  -0.00013  -0.00306   0.00000   0.00000   0.00000   0.00060  -0.00014
        0.50000   0.00000   0.00000   0.00000   0.00205   0.00000   0.00000   0.00000   0.00041   0.00000   0.00000   0.00016   0.00000   0.00000   0.00000   0.01050
        0.90000   0.00000   0.00000   0.00000   0.00000   0.00063  -0.00048  -0.00013   0.00027  -0.00034   0.00108  -0.00010   0.00018   0.00000   0.00018   0.00053
      </tableData>

      <tableData breakPoint="0.00000">
                -10.00     -5.00      0.00      5.00     10.00     12.00     13.00     14.00     15.00     20.00     25.00     30.00     40.00     50.00     60.00
        0.20000   0.00000   0.00000   0.00000   0.00000   0.00000   0.00000   0.00000   0.00000   0.00000   0.00000   0.00000   0.00000   0.00000  -0.00024   0.00018
        0.50000   0.00000   0.00000   0.00000   0.00000   0.00000   0.00000   0.00000   0.00000   0.00000   0.00000   0.00000   0.00000   0.00000   0.00000   0.00024
        0.90000   0.00000   0.00000   0.00000   0.00000   0.00000   0.00000   0.00000   0.00000   0.00000   0.00000   0.00000   0.00000   0.00000   0.00041   0.00000
      </tableData>

      <tableData breakPoint="10.00000">
                -10.00     -5.00      0.00      5.00     10.00     12.00     13.00     14.00     15.00     20.00     25.00     30.00     40.00     50.00     60.00
        0.20000   0.00000   0.00000   0.00000   0.00000   0.00000   0.00000   0.00000   0.00000  -0.00018   0.00243   0.00000   0.00000   0.00000  -0.00031  -0.00018
        0.50000   0.00040   0.00000   0.00000   0.00000   0.00000   0.00000  -0.00011   0.00016   0.00000  -0.00015   0.00000   0.00000   0.00000  -0.00011  -0.00184
        0.90000   0.00000   0.00000   0.00000   0.00000  -0.00086   0.00016   0.00014  -0.00030   0.00000  -0.00090  -0.00124   0.00017   0.00010   0.00023   0.00036
      </tableData>

    </table>
  </function>

  <function name="aero/CMy_speedbrake">
    <interpolate1d>
      <property>fcs/surfaces/speedbrake-pos-deg</property>
      <value>0</value> <value>0</value>
      <value>60</value> <property>aero/CMy_speedbrake_60</property>
    </interpolate1d>
  </function>

  <!-- CMZ -->
  <!-- base -->
  <function name="aero/CMz_base">
    <table>
      <independentVar lookup="row">velocities/mach</independentVar>
      <independentVar lookup="column">aero/alpha-deg</independentVar>
      <independentVar lookup="table">aero/beta-deg</independentVar>
      <tableData breakPoint="-10.00000">
                -10.00     -5.00      0.00      5.00     10.00     12.00     13.00     14.00     15.00     20.00     25.00     30.00     40.00     50.00     60.00
        0.20000   0.00810   0.01153   0.01499   0.00772   0.03252   0.04129   0.02748   0.05733   0.05841   0.06085   0.06159   0.03499   0.02670  -0.00643  -0.01295
        0.50000   0.00743   0.01162   0.01450   0.02529   0.03381   0.04023   0.02702   0.06124   0.05951   0.04945   0.06101   0.03376   0.02855  -0.00470  -0.04898
        0.90000   0.00342   0.01032   0.01773   0.01578   0.03137  -0.00762   0.00000   0.02557   0.03624   0.04384   0.04778   0.04441   0.00359  -0.02666  -0.03245
      </tableData>

      <tableData breakPoint="0.00000">
                -10.00     -5.00      0.00      5.00     10.00     12.00     13.00     14.00     15.00     20.00     25.00     30.00     40.00     50.00     60.00
        0.20000   0.00000   0.00000   0.00000   0.00000   0.00019   0.00021   0.00021   0.00021   0.00022   0.00034   0.00045   0.00038   0.00053   0.00063   0.00066
        0.50000   0.00000   0.00000   0.00000   0.00000   0.00011   0.00012   0.00012   0.00021   0.00021   0.00033   0.00042   0.00043   0.00057   0.00118   0.00084
        0.90000  -0.00000   0.00000   0.00000  -0.00000  -0.00000   0.00000   0.00000   0.00000   0.00000   0.00000   0.00000   0.00000   0.00000   0.00038   0.00065
      </tableData>

      <tableData breakPoint="10.00000">
                -10.00     -5.00      0.00      5.00     10.00     12.00     13.00     14.00     15.00     20.00     25.00     30.00     40.00     50.00     60.00
        0.20000  -0.00813  -0.01155  -0.01495  -0.00156  -0.03192  -0.04111  -0.02755  -0.05787  -0.05827  -0.06087  -0.06142  -0.03485  -0.02670   0.00503   0.01374
        0.50000  -0.00767  -0.01164  -0.01440  -0.01243  -0.03339  -0.04007  -0.02714  -0.06148  -0.05967  -0.04970  -0.06019  -0.03359  -0.02836   0.00348   0.03728
        0.90000  -0.00354  -0.01033  -0.01898  -0.01568  -0.03146   0.00714  -0.00016  -0.02541  -0.03596  -0.04474  -0.04993  -0.04495  -0.00422   0.02574   0.03303
      </tableData>

    </table>
  </function>

  <!-- elevator -->
  <function name="aero/CMz_elevator_-24">
    <table>
      <independentVar lookup="row">velocities/mach</independentVar>
      <independentVar lookup="column">aero/alpha-deg</independentVar>
      <independentVar lookup="table">aero/beta-deg</independentVar>
      <tableData breakPoint="-10.00000">
                -10.00     -5.00      0.00      5.00     10.00     12.00     13.00     14.00     15.00     20.00     25.00     30.00     40.00     50.00     60.00
        0.20000   0.00000   0.00000   0.00000   0.00000   0.00000   0.00000   0.00000   0.00000   0.00000   0.00021   0.00000   0.00000   0.00000   0.00012  -0.00089
        0.50000   0.00000   0.00000   0.00000   0.00000   0.00000   0.00000   0.00000   0.00000   0.00000   0.00000   0.00000   0.00000   0.00000   0.00000   0.00166
        0.90000   0.00000   0.00000   0.00000   0.00000  -0.00047   0.00023   0.00000   0.00000  -0.00015   0.00000  -0.00031   0.00000   0.00000   0.00000   0.00000
      </tableData>

      <tableData breakPoint="0.00000">
                -10.00     -5.00      0.00      5.00     10.00     12.00     13.00     14.00     15.00     20.00     25.00     30.00     40.00     50.00     60.00
        0.20000   0.00000   0.00000   0.00000   0.00000   0.00000   0.00000   0.00000   0.00000   0.00000   0.00000   0.00000   0.00000   0.00000   0.00000   0.00000
        0.50000   0.00000   0.00000   0.00000   0.00000   0.00000   0.00000   0.00000   0.00000   0.00000   0.00000   0.00000   0.00000   0.00000  -0.00056   0.00000
        0.90000   0.00000   0.00000   0.00000   0.00000   0.00000   0.00000   0.00000   0.00000   0.00000   0.00000   0.00000   0.00000   0.00000   0.00000   0.00000
      </tableData>

      <tableData breakPoint="10.00000">
                -10.00     -5.00      0.00      5.00     10.00     12.00     13.00     14.00     15.00     20.00     25.00     30.00     40.00     50.00     60.00
        0.20000   0.00000   0.00000   0.00000   0.00000   0.00000   0.00000   0.00000   0.00000   0.00000  -0.00018   0.00000   0.00000   0.00000   0.00031  -0.00036
        0.50000   0.00000   0.00000   0.00000   0.00000   0.00000   0.00000   0.00000   0.00000   0.00000   0.00000   0.00000   0.00000   0.00000   0.00000   0.00556
        0.90000   0.00000   0.00000   0.00000   0.00000  -0.00053   0.00048   0.00000   0.00000   0.00000   0.00010   0.00016   0.00000   0.00000   0.00000   0.00000
      </tableData>

    </table>
  </function>

  <function name="aero/CMz_elevator_-9.5">
    <table>
      <independentVar lookup="row">velocities/mach</independentVar>
      <independentVar lookup="column">aero/alpha-deg</independentVar>
      <independentVar lookup="table">aero/beta-deg</independentVar>
      <tableData breakPoint="-10.00000">
                -10.00     -5.00      0.00      5.00     10.00     12.00     13.00     14.00     15.00     20.00     25.00     30.00     40.00     50.00     60.00
        0.20000   0.00000   0.00000   0.00000   0.00000   0.00000   0.00000   0.00000   0.00000   0.00000  -0.00013   0.00000   0.00000   0.00000   0.00015  -0.00026
        0.50000   0.00000   0.00000   0.00000   0.00000   0.00000   0.00000   0.00000   0.00000   0.00000   0.00000   0.00000   0.00000   0.00000   0.00000   0.00177
        0.90000   0.00000   0.00000   0.00000   0.00000  -0.00023   0.00017   0.00000   0.00000   0.00035   0.00000   0.00000   0.00000   0.00000   0.00011   0.00000
      </tableData>

      <tableData breakPoint="0.00000">
                -10.00     -5.00      0.00      5.00     10.00     12.00     13.00     14.00     15.00     20.00     25.00     30.00     40.00     50.00     60.00
        0.20000   0.00000   0.00000   0.00000   0.00000   0.00000   0.00000   0.00000   0.00000   0.00000   0.00000   0.00000   0.00000   0.00000   0.00000   0.00000
        0.50000   0.00000   0.00000   0.00000   0.00000   0.00000   0.00000   0.00000   0.00000   0.00000   0.00000   0.00000   0.00000   0.00000   0.00000   0.00000
        0.90000   0.00000   0.00000   0.00000   0.00000   0.00000   0.00000   0.00000   0.00000   0.00000   0.00000   0.00000   0.00000   0.00000   0.00000   0.00000
      </tableData>

      <tableData breakPoint="10.00000">
                -10.00     -5.00      0.00      5.00     10.00     12.00     13.00     14.00     15.00     20.00     25.00     30.00     40.00     50.00     60.00
        0.20000   0.00000   0.00000   0.00000   0.00000   0.00000   0.00000   0.00000   0.00000   0.00000  -0.00037   0.00000   0.00000   0.00000   0.00052  -0.00029
        0.50000   0.00000   0.00000   0.00000   0.00000   0.00000   0.00000   0.00000   0.00000   0.00000   0.00000   0.00000   0.00000   0.00000   0.00000   0.00772
        0.90000   0.00000   0.00000   0.00000   0.00000  -0.00012   0.00066   0.00000   0.00000   0.00000   0.00000   0.00019   0.00000   0.00000   0.00000   0.00000
      </tableData>

    </table>
  </function>

  <function name="aero/CMz_elevator_1.5">
    <table>
      <independentVar lookup="row">velocities/mach</independentVar>
      <independentVar lookup="column">aero/alpha-deg</independentVar>
      <independentVar lookup="table">aero/beta-deg</independentVar>
      <tableData breakPoint="-10.00000">
                -10.00     -5.00      0.00      5.00     10.00     12.00     13.00     14.00     15.00     20.00     25.00     30.00     40.00     50.00     60.00
        0.20000   0.00000   0.00000   0.00000   0.00000   0.00000   0.00000   0.00000   0.00000   0.00000   0.00000   0.00000   0.00000   0.00000  -0.00014  -0.00109
        0.50000   0.00000   0.00000   0.00000  -0.00028   0.00000   0.00000   0.00000   0.00000   0.00000   0.00000   0.00000   0.00000   0.00000  -0.00010   0.00260
        0.90000   0.00000   0.00000   0.00000   0.00000  -0.00034   0.00019   0.00000   0.00000   0.00033   0.00000   0.00000   0.00000   0.00000  -0.00010   0.00000
      </tableData>

      <tableData breakPoint="0.00000">
                -10.00     -5.00      0.00      5.00     10.00     12.00     13.00     14.00     15.00     20.00     25.00     30.00     40.00     50.00     60.00
        0.20000   0.00000   0.00000   0.00000   0.00000   0.00000   0.00000   0.00000   0.00000   0.00000   0.00000   0.00000   0.00000   0.00000   0.00000   0.00000
        0.50000   0.00000   0.00000   0.00000   0.00000   0.00000   0.00000   0.00000   0.00000   0.00000   0.00000   0.00000   0.00000   0.00000   0.00000   0.00000
        0.90000   0.00000   0.00000   0.00000   0.00000   0.00000   0.00000   0.00000   0.00000   0.00000   0.00000   0.00000   0.00000   0.00000   0.00000   0.00000
      </tableData>

      <tableData breakPoint="10.00000">
                -10.00     -5.00      0.00      5.00     10.00     12.00     13.00     14.00     15.00     20.00     25.00     30.00     40.00     50.00     60.00
        0.20000   0.00000   0.00000   0.00000   0.00000   0.00000   0.00000   0.00000   0.00000   0.00000  -0.00019   0.00000   0.00000   0.00000   0.00011  -0.00048
        0.50000   0.00000   0.00000   0.00000   0.00000   0.00000   0.00000   0.00000   0.00000   0.00000   0.00000   0.00000   0.00000   0.00000   0.00000   0.00528
        0.90000   0.00000   0.00000   0.00000   0.00000  -0.00030   0.00053   0.00000   0.00000  -0.00023   0.00000   0.00039   0.00000   0.00000   0.00000   0.00000
      </tableData>

    </table>
  </function>

  <function name="aero/CMz_elevator">
    <interpolate1d>
      <property>fcs/surfaces/elevator-pos-deg</property>
      <value>-24</value> <property>aero/CMz_elevator_-24</property>
      <value>-9.5</value> <property>aero/CMz_elevator_-9.5</property>
      <value>0</value> <value>0</value>
      <value>1.5</value> <property>aero/CMz_elevator_1.5</property>
    </interpolate1d>
  </function>

  <!-- flaps -->
  <function name="aero/CMz_flaps_30">
    <table>
      <independentVar lookup="row">velocities/mach</independentVar>
      <independentVar lookup="column">aero/alpha-deg</independentVar>
      <independentVar lookup="table">aero/beta-deg</independentVar>
      <tableData breakPoint="-10.00000">
                -10.00     -5.00      0.00      5.00     10.00     12.00     13.00     14.00     15.00     20.00     25.00     30.00     40.00     50.00     60.00
        0.20000  -0.00690  -0.01028   0.00505  -0.07386  -0.00422   0.00845   0.01828   0.00224  -0.00574  -0.00387   0.00530   0.00975   0.00320   0.00486  -0.00466
        0.50000  -0.00693  -0.01162  -0.01450  -0.08201  -0.07360  -0.09121  -0.00807  -0.04029  -0.01535  -0.02760   0.00553   0.00711   0.00376  -0.00769  -0.03928
        0.90000  -0.00365  -0.01608   0.02836  -0.02883  -0.04442  -0.04668  -0.05207  -0.01870  -0.00758  -0.02051   0.01582   0.00196   0.00324   0.00574  -0.00141
      </tableData>

      <tableData breakPoint="0.00000">
                -10.00     -5.00      0.00      5.00     10.00     12.00     13.00     14.00     15.00     20.00     25.00     30.00     40.00     50.00     60.00
        0.20000   0.00000  -0.00019   0.00000   0.00078   0.00026   0.00023   0.00025   0.00022   0.00021   0.00030   0.00026   0.00023   0.00019   0.00012   0.00000
        0.50000   0.00000  -0.00022   0.00000   0.00047   0.00036   0.00034   0.00035   0.00025   0.00022   0.00000   0.00029   0.00013   0.00039  -0.00041   0.00000
        0.90000   0.00000   0.00000  -0.00032  -0.00044  -0.00018   0.00000   0.00000   0.00000   0.00000   0.00000  -0.00000  -0.00027   0.00000   0.00000   0.00000
      </tableData>

      <tableData breakPoint="10.00000">
                -10.00     -5.00      0.00      5.00     10.00     12.00     13.00     14.00     15.00     20.00     25.00     30.00     40.00     50.00     60.00
        0.20000   0.00694   0.01015  -0.00559   0.08138   0.01466  -0.00823  -0.01728  -0.00150   0.00604   0.00452  -0.00516  -0.00885  -0.00299  -0.00480   0.00393
        0.50000   0.00722   0.01164   0.01153   0.06191   0.07374   0.09009   0.00901   0.04269   0.01556   0.02765  -0.00627  -0.00670  -0.00375   0.00667   0.05183
        0.90000   0.00380   0.01649  -0.04588   0.01797   0.03578   0.04568   0.05098   0.01758   0.00587   0.02056  -0.01508  -0.00254  -0.00312  -0.00500   0.00102
      </tableData>

    </table>
  </function>
  <function name="aero/CMz_flaps_40">
    <table>
      <independentVar lookup="row">velocities/mach</independentVar>
      <independentVar lookup="column">aero/alpha-deg</independentVar>
      <independentVar lookup="table">aero/beta-deg</independentVar>
      <tableData breakPoint="-10.00000">
                -10.00     -5.00      0.00      5.00     10.00     12.00     13.00     14.00     15.00     20.00     25.00     30.00     40.00     50.00     60.00
        0.20000   0.00000   0.00000   0.00000   0.00000   0.00240   0.00155   0.00144   0.00380   0.00454   0.00463   0.00575   0.00267   0.00245   0.00069  -0.00498
        0.50000   0.00000   0.00000   0.00000   0.00362   0.00204   0.00307   0.00319   0.00616   0.00697   0.00477   0.00688   0.00366   0.00281   0.00184   0.00738
        0.90000   0.00000   0.00000  -0.00015   0.00089   0.00406   0.00357   0.00362   0.00461   0.00788   0.00657   0.00676   0.00486   0.00302  -0.00311  -0.00363
      </tableData>

      <tableData breakPoint="0.00000">
                -10.00     -5.00      0.00      5.00     10.00     12.00     13.00     14.00     15.00     20.00     25.00     30.00     40.00     50.00     60.00
        0.20000   0.00000   0.00000   0.00000   0.00000   0.00000   0.00000   0.00000   0.00000   0.00000   0.00000   0.00000   0.00000   0.00000   0.00000   0.00000
        0.50000   0.00000   0.00000   0.00000   0.00000   0.00000   0.00000   0.00000   0.00000   0.00000   0.00000   0.00000   0.00000   0.00000  -0.00056   0.00000
        0.90000   0.00000   0.00000   0.00000   0.00000   0.00000   0.00000   0.00000   0.00000   0.00000   0.00000   0.00000   0.00000   0.00000   0.00000   0.00000
      </tableData>

      <tableData breakPoint="10.00000">
                -10.00     -5.00      0.00      5.00     10.00     12.00     13.00     14.00     15.00     20.00     25.00     30.00     40.00     50.00     60.00
        0.20000   0.00000   0.00000   0.00000   0.00000  -0.00230  -0.00152  -0.00144  -0.00373  -0.00452  -0.00492  -0.00575  -0.00263  -0.00245  -0.00037   0.00468
        0.50000   0.00000   0.00000   0.00000   0.00000  -0.00203  -0.00304  -0.00309  -0.00639  -0.00714  -0.00470  -0.00680  -0.00381  -0.00282  -0.00187   0.01544
        0.90000   0.00000   0.00000   0.00014  -0.00092  -0.00423  -0.00296  -0.00341  -0.00451  -0.00757  -0.00656  -0.00668  -0.00481  -0.00300   0.00312   0.00367
      </tableData>

    </table>
  </function>

  <function name="aero/CMz_flaps">
    <interpolate1d>
      <property>fcs/surfaces/flaps-pos-deg</property>
      <value>0</value> <value>0</value>
      <value>30</value> <property>aero/CMz_flaps_30</property>
      <value>40</value> <property>aero/CMz_flaps_40</property>
    </interpolate1d>
  </function>

  <!-- left-flaperon -->
  <function name="aero/CMz_left-flaperon_-51">
    <table>
      <independentVar lookup="row">velocities/mach</independentVar>
      <independentVar lookup="column">aero/alpha-deg</independentVar>
      <independentVar lookup="table">aero/beta-deg</independentVar>
      <tableData breakPoint="-10.00000">
                -10.00     -5.00      0.00      5.00     10.00     12.00     13.00     14.00     15.00     20.00     25.00     30.00     40.00     50.00     60.00
        0.20000  -0.00129   0.00172   0.00288  -0.02146  -0.00070   0.00065   0.02075  -0.00652  -0.00696  -0.01051  -0.01907  -0.01867  -0.00681  -0.01034  -0.00134
        0.50000  -0.00142  -0.00044   0.00459   0.00955  -0.00074   0.00335   0.02123  -0.00790  -0.00386   0.00523  -0.01563  -0.01855  -0.00788  -0.00846   0.05153
        0.90000  -0.00659   0.00102   0.01242   0.03815   0.01468   0.04556   0.04475   0.02464   0.01997   0.00851   0.01188  -0.02228   0.00422   0.02916  -0.00793
      </tableData>

      <tableData breakPoint="0.00000">
                -10.00     -5.00      0.00      5.00     10.00     12.00     13.00     14.00     15.00     20.00     25.00     30.00     40.00     50.00     60.00
        0.20000   0.00000   0.00372   0.00747   0.01068   0.00835   0.00642   0.00491   0.00300   0.00094  -0.00883  -0.01847  -0.02107  -0.01751  -0.01491  -0.00508
        0.50000   0.00036   0.00382   0.00756   0.01169   0.00905   0.00648   0.00468   0.00239   0.00041  -0.01026  -0.02054  -0.02375  -0.01903  -0.01704  -0.00582
        0.90000   0.00196   0.00305   0.00382   0.01743   0.01070   0.00585   0.00350   0.00133  -0.00120  -0.01375  -0.02307  -0.02872  -0.02519  -0.01665  -0.00309
      </tableData>

      <tableData breakPoint="10.00000">
                -10.00     -5.00      0.00      5.00     10.00     12.00     13.00     14.00     15.00     20.00     25.00     30.00     40.00     50.00     60.00
        0.20000   0.00211   0.00693   0.00426   0.00342   0.05402   0.01320  -0.00387   0.03148   0.00535   0.01421  -0.00255  -0.01068  -0.00696  -0.00186   0.00148
        0.50000   0.00248   0.00789   0.00601   0.01273   0.05693   0.01274  -0.00468   0.03475   0.00529  -0.01072  -0.00082  -0.01067  -0.00619  -0.00708  -0.00374
        0.90000   0.00565   0.01565   0.01315   0.01960  -0.00102  -0.01270  -0.01761   0.01890   0.00239   0.00165  -0.01232  -0.00923  -0.00161  -0.02033   0.00828
      </tableData>

    </table>
  </function>

  <function name="aero/CMz_left-flaperon">
    <interpolate1d>
      <property>fcs/surfaces/left-flaperon-pos-deg</property>
      <value>-51</value> <property>aero/CMz_left-flaperon_-51</property>
      <value>0</value> <value>0</value>
    </interpolate1d>
  </function>

  <!-- right-flaperon -->
  <function name="aero/CMz_right-flaperon_-51">
    <table>
      <independentVar lookup="row">velocities/mach</independentVar>
      <independentVar lookup="column">aero/alpha-deg</independentVar>
      <independentVar lookup="table">aero/beta-deg</independentVar>
      <tableData breakPoint="-10.00000">
                -10.00     -5.00      0.00      5.00     10.00     12.00     13.00     14.00     15.00     20.00     25.00     30.00     40.00     50.00     60.00
        0.20000  -0.00204  -0.00697  -0.00348  -0.01108  -0.05484  -0.01301   0.00415  -0.03093  -0.00548  -0.01401   0.00258   0.01064   0.00688   0.00260  -0.00279
        0.50000  -0.00218  -0.00794  -0.00625  -0.02543  -0.05828  -0.01251   0.00496  -0.03451  -0.00508   0.01163  -0.00216   0.01069   0.00664   0.00710   0.01362
        0.90000  -0.00572  -0.01582  -0.01190  -0.02010   0.00096   0.01402   0.01683  -0.01864  -0.00302  -0.00150   0.01420   0.00998   0.00210   0.02050  -0.00799
      </tableData>

      <tableData breakPoint="0.00000">
                -10.00     -5.00      0.00      5.00     10.00     12.00     13.00     14.00     15.00     20.00     25.00     30.00     40.00     50.00     60.00
        0.20000   0.00010  -0.00369  -0.00744  -0.01067  -0.00863  -0.00669  -0.00512  -0.00319  -0.00114   0.00851   0.01815   0.02083   0.01732   0.01468   0.00484
        0.50000  -0.00019  -0.00381  -0.00772  -0.01168  -0.00918  -0.00658  -0.00472  -0.00265  -0.00060   0.00994   0.02011   0.02308   0.01874   0.01555   0.00557
        0.90000  -0.00202  -0.00313  -0.00369  -0.01744  -0.01073  -0.00590  -0.00355  -0.00131   0.00113   0.01365   0.02290   0.02876   0.02515   0.01598   0.00272
      </tableData>

      <tableData breakPoint="10.00000">
                -10.00     -5.00      0.00      5.00     10.00     12.00     13.00     14.00     15.00     20.00     25.00     30.00     40.00     50.00     60.00
        0.20000   0.00146  -0.00180  -0.00233  -0.05266   0.00034  -0.00100  -0.02067   0.00701   0.00688   0.01027   0.01892   0.01843   0.00687   0.01080   0.00195
        0.50000   0.00177   0.00031  -0.00585  -0.02390   0.00053  -0.00352  -0.02118   0.00827   0.00400  -0.00551   0.01472   0.01850   0.00770   0.00860  -0.02003
        0.90000   0.00625  -0.00110  -0.01090  -0.03816  -0.01446  -0.04518  -0.04467  -0.02509  -0.02072  -0.00752  -0.01031   0.02259  -0.00432  -0.02870   0.00832
      </tableData>

    </table>
  </function>

  <function name="aero/CMz_right-flaperon">
    <interpolate1d>
      <property>fcs/surfaces/right-flaperon-pos-deg</property>
      <value>-51</value> <property>aero/CMz_right-flaperon_-51</property>
      <value>0</value> <value>0</value>
    </interpolate1d>
  </function>

  <!-- rudder -->
  <function name="aero/CMz_rudder_-35">
    <table>
      <independentVar lookup="row">velocities/mach</independentVar>
      <independentVar lookup="column">aero/alpha-deg</independentVar>
      <independentVar lookup="table">aero/beta-deg</independentVar>
      <tableData breakPoint="-10.00000">
                -10.00     -5.00      0.00      5.00     10.00     12.00     13.00     14.00     15.00     20.00     25.00     30.00     40.00     50.00     60.00
        0.20000  -0.05876  -0.06155  -0.06832  -0.06715  -0.09755  -0.07041  -0.05345  -0.08634  -0.07989  -0.07088  -0.07800  -0.05802  -0.06840  -0.05575  -0.01162
        0.50000  -0.06269  -0.06532  -0.07164  -0.10887  -0.09811  -0.07360  -0.05254  -0.09395  -0.07338  -0.06414  -0.07012  -0.05858  -0.07412  -0.05781   0.03195
        0.90000  -0.06691  -0.07860  -0.09574  -0.10541  -0.07592  -0.05541  -0.05711  -0.09376  -0.05969  -0.05206  -0.04641  -0.05645  -0.09861  -0.01222  -0.01907
      </tableData>

      <tableData breakPoint="0.00000">
                -10.00     -5.00      0.00      5.00     10.00     12.00     13.00     14.00     15.00     20.00     25.00     30.00     40.00     50.00     60.00
        0.20000  -0.05191  -0.06020  -0.07513  -0.08201  -0.08036  -0.07856  -0.07737  -0.07619  -0.07535  -0.08051  -0.08411  -0.08658  -0.08268  -0.08364  -0.08225
        0.50000  -0.05407  -0.06300  -0.07926  -0.08641  -0.08360  -0.08135  -0.07979  -0.07847  -0.07729  -0.08106  -0.08525  -0.08882  -0.08602  -0.08548  -0.08385
        0.90000  -0.06425  -0.07602  -0.09679  -0.10523  -0.10058  -0.09705  -0.09464  -0.09196  -0.08930  -0.08093  -0.08400  -0.09255  -0.09842  -0.09440  -0.08632
      </tableData>

      <tableData breakPoint="10.00000">
                -10.00     -5.00      0.00      5.00     10.00     12.00     13.00     14.00     15.00     20.00     25.00     30.00     40.00     50.00     60.00
        0.20000  -0.03512  -0.04551  -0.05745  -0.00166  -0.01552  -0.03552  -0.05287  -0.02086  -0.01807  -0.02149  -0.02469  -0.04519  -0.04534  -0.03768  -0.00984
        0.50000  -0.03578  -0.04581  -0.05915  -0.05195  -0.00830  -0.03150  -0.05513  -0.01762  -0.01492  -0.03076  -0.02507  -0.05064  -0.04689  -0.03636  -0.02748
        0.90000  -0.04096  -0.04573  -0.05746  -0.06514  -0.03586  -0.06680  -0.06099  -0.03072  -0.03892  -0.01169  -0.02824  -0.03757  -0.07466  -0.06812  -0.03758
      </tableData>

    </table>
  </function>

  <function name="aero/CMz_rudder_4">
    <table>
      <independentVar lookup="row">velocities/mach</independentVar>
      <independentVar lookup="column">aero/alpha-deg</independentVar>
      <independentVar lookup="table">aero/beta-deg</independentVar>
      <tableData breakPoint="-10.00000">
                -10.00     -5.00      0.00      5.00     10.00     12.00     13.00     14.00     15.00     20.00     25.00     30.00     40.00     50.00     60.00
        0.20000   0.00575   0.00809   0.01002   0.00453   0.00708   0.00689   0.01046   0.00763   0.00436   0.00845   0.00617   0.00752   0.00906   0.00528  -0.00161
        0.50000   0.00651   0.00848   0.01077  -0.00979   0.01056   0.00675   0.01006   0.00482   0.00222   0.01062   0.00779   0.00932   0.00911  -0.00707   0.00844
        0.90000   0.00840   0.01022   0.01435   0.01273   0.00594   0.01732   0.01018   0.01145   0.01687   0.00305   0.01105   0.01057   0.01465   0.00815   0.00429
      </tableData>

      <tableData breakPoint="0.00000">
                -10.00     -5.00      0.00      5.00     10.00     12.00     13.00     14.00     15.00     20.00     25.00     30.00     40.00     50.00     60.00
        0.20000   0.00756   0.00874   0.01093   0.01188   0.01177   0.01168   0.01168   0.01173   0.01179   0.01289   0.01475   0.01675   0.01387   0.01379   0.01401
        0.50000   0.00790   0.00914   0.01153   0.01264   0.01245   0.01235   0.01230   0.01228   0.01229   0.01326   0.01512   0.01713   0.01488   0.01366   0.01474
        0.90000   0.00940   0.01117   0.01426   0.01616   0.01582   0.01544   0.01521   0.01503   0.01479   0.01410   0.01552   0.01908   0.01785   0.01554   0.01258
      </tableData>

      <tableData breakPoint="10.00000">
                -10.00     -5.00      0.00      5.00     10.00     12.00     13.00     14.00     15.00     20.00     25.00     30.00     40.00     50.00     60.00
        0.20000   0.00716   0.00824   0.01106   0.00369   0.00843   0.00852  -0.00641   0.02983   0.00680   0.01347   0.00680   0.00725   0.01069   0.00800   0.00210
        0.50000   0.00767   0.00869   0.01181   0.00437   0.01054   0.00789  -0.00273   0.02445   0.00647   0.00781   0.00912   0.00672   0.00855  -0.00699  -0.00126
        0.90000   0.00865   0.01048   0.01598   0.01381   0.00780   0.01670   0.01086   0.01146  -0.00091   0.00517   0.02130   0.01239   0.01672  -0.00193   0.00565
      </tableData>

    </table>
  </function>

  <function name="aero/CMz_rudder_-4">
    <table>
      <independentVar lookup="row">velocities/mach</independentVar>
      <independentVar lookup="column">aero/alpha-deg</independentVar>
      <independentVar lookup="table">aero/beta-deg</independentVar>
      <tableData breakPoint="-10.00000">
                -10.00     -5.00      0.00      5.00     10.00     12.00     13.00     14.00     15.00     20.00     25.00     30.00     40.00     50.00     60.00
        0.20000  -0.00704  -0.00825  -0.01093  -0.00698  -0.00830  -0.00861   0.00331  -0.03184  -0.00686  -0.01410  -0.00721  -0.00726  -0.01156  -0.00729  -0.00188
        0.50000  -0.00743  -0.00869  -0.01143  -0.01279  -0.01050  -0.00790   0.00423  -0.02605  -0.00645  -0.00745  -0.00731  -0.00682  -0.00841   0.00664   0.01365
        0.90000  -0.00865  -0.01048  -0.01511  -0.01381  -0.00827  -0.01429  -0.01045  -0.01153   0.00032  -0.00505  -0.02170  -0.01225  -0.01655   0.00245  -0.00527
      </tableData>

      <tableData breakPoint="0.00000">
                -10.00     -5.00      0.00      5.00     10.00     12.00     13.00     14.00     15.00     20.00     25.00     30.00     40.00     50.00     60.00
        0.20000  -0.00750  -0.00873  -0.01084  -0.01177  -0.01185  -0.01177  -0.01177  -0.01181  -0.01180  -0.01300  -0.01476  -0.01674  -0.01388  -0.01377  -0.01401
        0.50000  -0.00784  -0.00913  -0.01143  -0.01249  -0.01246  -0.01236  -0.01230  -0.01229  -0.01230  -0.01327  -0.01500  -0.01713  -0.01489  -0.01417  -0.01463
        0.90000  -0.00940  -0.01117  -0.01425  -0.01616  -0.01582  -0.01544  -0.01519  -0.01499  -0.01476  -0.01404  -0.01550  -0.01906  -0.01780  -0.01584  -0.01264
      </tableData>

      <tableData breakPoint="10.00000">
                -10.00     -5.00      0.00      5.00     10.00     12.00     13.00     14.00     15.00     20.00     25.00     30.00     40.00     50.00     60.00
        0.20000  -0.00578  -0.00808  -0.01011  -0.00394  -0.00731  -0.00685  -0.01049  -0.00708  -0.00420  -0.00804  -0.00641  -0.00738  -0.00886  -0.00503   0.00172
        0.50000  -0.00637  -0.00847  -0.01087  -0.00688  -0.00993  -0.00679  -0.01021  -0.00462  -0.00298  -0.01055  -0.00730  -0.00925  -0.00892   0.00624   0.00400
        0.90000  -0.00835  -0.01021  -0.01337  -0.01261  -0.00815  -0.01784  -0.00981  -0.01135  -0.01768  -0.00295  -0.00998  -0.01043  -0.01474  -0.00698  -0.00500
      </tableData>

    </table>
  </function>

  <function name="aero/CMz_rudder_35">
    <table>
      <independentVar lookup="row">velocities/mach</independentVar>
      <independentVar lookup="column">aero/alpha-deg</independentVar>
      <independentVar lookup="table">aero/beta-deg</independentVar>
      <tableData breakPoint="-10.00000">
                -10.00     -5.00      0.00      5.00     10.00     12.00     13.00     14.00     15.00     20.00     25.00     30.00     40.00     50.00     60.00
        0.20000   0.03545   0.04558   0.05720  -0.00618   0.01182   0.03607   0.05300   0.02153   0.01807   0.02182   0.02482   0.04530   0.04593   0.03961   0.00944
        0.50000   0.03628   0.04586   0.05888   0.03528   0.00828   0.03234   0.05515   0.01786   0.01513   0.03093   0.02452   0.05083   0.04725   0.03825   0.03896
        0.90000   0.04099   0.04577   0.05802   0.06500   0.03698   0.06765   0.06086   0.03129   0.03786   0.01178   0.02992   0.03767   0.07504   0.07094   0.03854
      </tableData>

      <tableData breakPoint="0.00000">
                -10.00     -5.00      0.00      5.00     10.00     12.00     13.00     14.00     15.00     20.00     25.00     30.00     40.00     50.00     60.00
        0.20000   0.05197   0.06020   0.07517   0.08213   0.08027   0.07843   0.07725   0.07608   0.07531   0.08044   0.08367   0.08634   0.08228   0.08323   0.08158
        0.50000   0.05414   0.06299   0.07929   0.08651   0.08358   0.08137   0.07986   0.07835   0.07716   0.08092   0.08485   0.08837   0.08546   0.08394   0.08269
        0.90000   0.06424   0.07600   0.09684   0.10521   0.10053   0.09701   0.09460   0.09194   0.08929   0.08086   0.08402   0.09247   0.09803   0.09365   0.08546
      </tableData>

      <tableData breakPoint="10.00000">
                -10.00     -5.00      0.00      5.00     10.00     12.00     13.00     14.00     15.00     20.00     25.00     30.00     40.00     50.00     60.00
        0.20000   0.05884   0.06160   0.06832   0.05791   0.09765   0.07017   0.05349   0.08691   0.07981   0.07053   0.07730   0.05828   0.05377   0.05822   0.01103
        0.50000   0.06293   0.06535   0.07137   0.10252   0.09806   0.07349   0.05230   0.09339   0.07355   0.06436   0.06885   0.05876   0.07718   0.06040  -0.02049
        0.90000   0.06687   0.07860   0.09767   0.10420   0.07466   0.05550   0.05667   0.08140   0.05910   0.05238   0.04753   0.05655   0.09908   0.01029   0.01922
      </tableData>

    </table>
  </function>

  <function name="aero/CMz_rudder">
    <interpolate1d>
      <property>fcs/surfaces/rudder-pos-deg</property>
      <value>-35</value> <property>aero/CMz_rudder_-35</property>
      <value>-4</value> <property>aero/CMz_rudder_-4</property>
      <value>0</value> <value>0</value>
      <value>4</value> <property>aero/CMz_rudder_4</property>
      <value>35</value> <property>aero/CMz_rudder_35</property>
    </interpolate1d>
  </function>

  <!-- slats -->
  <function name="aero/CMz_slats_27.5">
    <table>
      <independentVar lookup="row">velocities/mach</independentVar>
      <independentVar lookup="column">aero/alpha-deg</independentVar>
      <independentVar lookup="table">aero/beta-deg</independentVar>
      <tableData breakPoint="-10.00000">
                -10.00     -5.00      0.00      5.00     10.00     12.00     13.00     14.00     15.00     20.00     25.00     30.00     40.00     50.00     60.00
        0.20000   0.00000   0.00000   0.00000   0.00000   0.00000   0.00000   0.00000   0.00000   0.00000   0.00022   0.00000   0.00000   0.00000   0.00025  -0.00060
        0.50000   0.00000   0.00000   0.00000   0.00000   0.00000   0.00000   0.00000   0.00000   0.00000   0.00000   0.00000   0.00000   0.00000   0.00000  -0.00017
        0.90000   0.00000   0.00000   0.00000   0.00000  -0.00010   0.00017   0.00000   0.00000   0.00044   0.00000  -0.00036   0.00000   0.00000   0.00017   0.00000
      </tableData>

      <tableData breakPoint="0.00000">
                -10.00     -5.00      0.00      5.00     10.00     12.00     13.00     14.00     15.00     20.00     25.00     30.00     40.00     50.00     60.00
        0.20000   0.00000   0.00000   0.00000   0.00000   0.00000   0.00000   0.00000   0.00000   0.00000   0.00000   0.00000   0.00000   0.00000   0.00000   0.00000
        0.50000   0.00000   0.00000   0.00000   0.00000   0.00000   0.00000   0.00000   0.00000   0.00000   0.00000   0.00000   0.00000   0.00000  -0.00058   0.00000
        0.90000   0.00000   0.00000   0.00000   0.00000   0.00000   0.00000   0.00000   0.00000   0.00000   0.00000   0.00000   0.00000   0.00000   0.00000   0.00000
      </tableData>

      <tableData breakPoint="10.00000">
                -10.00     -5.00      0.00      5.00     10.00     12.00     13.00     14.00     15.00     20.00     25.00     30.00     40.00     50.00     60.00
        0.20000   0.00000   0.00000   0.00000   0.00000   0.00000   0.00000   0.00000   0.00000   0.00000  -0.00039   0.00000   0.00000   0.00000   0.00000  -0.00045
        0.50000   0.00000   0.00000   0.00000   0.00000   0.00000   0.00000   0.00000   0.00000   0.00000   0.00000   0.00000   0.00000   0.00000   0.00000   0.00641
        0.90000   0.00000   0.00000   0.00000   0.00000  -0.00024   0.00066   0.00000   0.00000   0.00000   0.00000   0.00028   0.00000   0.00000   0.00000   0.00000
      </tableData>

    </table>
  </function>

  <function name="aero/CMz_slats">
    <interpolate1d>
      <property>fcs/surfaces/slats-pos-deg</property>
      <value>0</value> <value>0</value>
      <value>27.5</value> <property>aero/CMz_slats_27.5</property>
    </interpolate1d>
  </function>

  <!-- speedbrake -->
  <function name="aero/CMz_speedbrake_60">
    <table>
      <independentVar lookup="row">velocities/mach</independentVar>
      <independentVar lookup="column">aero/alpha-deg</independentVar>
      <independentVar lookup="table">aero/beta-deg</independentVar>
      <tableData breakPoint="-10.00000">
                -10.00     -5.00      0.00      5.00     10.00     12.00     13.00     14.00     15.00     20.00     25.00     30.00     40.00     50.00     60.00
        0.20000   0.00000   0.00000   0.00000   0.00000   0.00000   0.00000   0.00000   0.00000   0.00000   0.00000   0.00000   0.00000   0.00000  -0.00010  -0.00019
        0.50000   0.00000   0.00000   0.00000  -0.00028   0.00000   0.00000   0.00000   0.00000   0.00000   0.00000   0.00000   0.00000   0.00000   0.00000   0.00196
        0.90000   0.00000   0.00000   0.00000   0.00000  -0.00023   0.00012   0.00000   0.00000   0.00051   0.00000   0.00000   0.00000   0.00000   0.00000   0.00000
      </tableData>

      <tableData breakPoint="0.00000">
                -10.00     -5.00      0.00      5.00     10.00     12.00     13.00     14.00     15.00     20.00     25.00     30.00     40.00     50.00     60.00
        0.20000   0.00000   0.00000   0.00000   0.00000   0.00000   0.00000   0.00000   0.00000   0.00000   0.00000   0.00000   0.00000   0.00000   0.00000   0.00000
        0.50000   0.00000   0.00000   0.00000   0.00000   0.00000   0.00000   0.00000   0.00000   0.00000   0.00000   0.00000   0.00000   0.00000   0.00000   0.00000
        0.90000   0.00000   0.00000   0.00000   0.00000   0.00000   0.00000   0.00000   0.00000   0.00000   0.00000   0.00000   0.00000   0.00000  -0.00083   0.00000
      </tableData>

      <tableData breakPoint="10.00000">
                -10.00     -5.00      0.00      5.00     10.00     12.00     13.00     14.00     15.00     20.00     25.00     30.00     40.00     50.00     60.00
        0.20000   0.00000   0.00000   0.00000   0.00000   0.00000   0.00000   0.00000   0.00000   0.00000  -0.00038   0.00000   0.00000   0.00000   0.00000   0.00026
        0.50000   0.00000   0.00000   0.00000   0.00000   0.00000   0.00000   0.00000   0.00000   0.00000   0.00000   0.00000  -0.00010   0.00000   0.00000  -0.00016
        0.90000   0.00000   0.00000   0.00000   0.00000  -0.00031   0.00000   0.00000   0.00000   0.00000   0.00000   0.00050   0.00000   0.00000   0.00000   0.00000
      </tableData>

    </table>
  </function>

  <function name="aero/CMz_speedbrake">
    <interpolate1d>
      <property>fcs/surfaces/speedbrake-pos-deg</property>
      <value>0</value> <value>0</value>
      <value>60</value> <property>aero/CMz_speedbrake_60</property>
    </interpolate1d>
  </function>

  <function name="aero/s/cmlp">
    <description>Roll damping derivative</description>
    <product>
      <property>aero/pb</property>
      <table>
        <independentVar lookup="row">velocities/mach</independentVar>
        <independentVar lookup="column">aero/alpha-deg</independentVar>
        <independentVar lookup="table">aero/beta-deg</independentVar>
        <tableData breakPoint="-10.0">
                   -10.0        -5.0         0.001         5.0        10.0        12.0        13.0        14.0        15.0        20.0        25.0        30.0        40.0        50.0        60.0
            0.2      0.4977348   0.5181778   0.5122362   0.4920336   0.3972759   0.1924759   0.1259511   0.0922446   0.0867335   0.1571300   0.0994120   0.1137577   0.1502373   0.2165215   0.2853604
            0.5      0.5262598   0.5445812   0.5386829   0.5204147   0.3189181   0.1360273   0.0982423   0.0799459   0.0637160   0.0615739   0.0799607   0.1132867   0.1513312   0.2251855   0.3274471
            0.9      0.6539586   0.6702772   0.6525309   0.6302919   0.1271170   0.0323402   0.0445527   0.0423145   0.0335149   0.0754964   0.0021942   0.1187110   0.1302010   0.1815493   0.3325839
        </tableData>
        <tableData breakPoint="0.0">
                   -10.0        -5.0         0.001         5.0        10.0        12.0        13.0        14.0        15.0        20.0        25.0        30.0        40.0        50.0        60.0
            0.2      0.5077407   0.5278141   0.5144534   0.5034681   0.3312192   0.1793046   0.1218428   0.0922716   0.0780416   0.0750806   0.0926064   0.1109260   0.1531512   0.2174567   0.3231759
            0.5      0.5363340   0.5545673   0.5406593   0.5302061   0.2782290   0.1273904   0.0938786   0.0770451   0.0707842   0.0721547   0.0905262   0.1096528   0.1521036   0.2175065   0.3424616
            0.9      0.7114375   0.6811716   0.6532963   0.5500565   0.0977740   0.0663935   0.0625304   0.0601555   0.0596002   0.0560383   0.0687569   0.0924001   0.1336142   0.1922865   0.3335484
        </tableData>
        <tableData breakPoint="10.0">
                   -10.0        -5.0         0.001         5.0        10.0        12.0        13.0        14.0        15.0        20.0        25.0        30.0        40.0        50.0        60.0
            0.2      0.4976135   0.5179390   0.5160139   0.4755898   0.3161345   0.2478193   0.1948877   0.1075909   0.1048381   0.1088264   0.0845159   0.1077168   0.1502841   0.2163077   0.3138726
            0.5      0.5266178   0.5447406   0.5417267   0.5172600   0.2976471   0.2128989   0.1726612   0.0868834   0.0833286   0.0722458   0.1077021   0.1097049   0.1519557   0.2228249   0.3157154
            0.9      0.7052107   0.6706392   0.6634420   0.4873851   0.1827100   0.1061271   0.0387660   0.0433783   0.1026665   0.0631540   0.1481660   0.1075152   0.1282321   0.1946364   0.3318135
        </tableData>
      </table>
    </product>
  </function>

  <function name="aero/s/cmlr">
    <description>Roll moment due to yaw rate</description>
    <product>
      <property>aero/rb</property>
      <table>
        <independentVar lookup="row">velocities/mach</independentVar>
        <independentVar lookup="column">aero/alpha-deg</independentVar>
        <independentVar lookup="table">aero/beta-deg</independentVar>
        <tableData breakPoint="-10.0">
                   -10.0        -5.0         0.001         5.0        10.0        12.0        13.0        14.0        15.0        20.0        25.0        30.0        40.0        50.0        60.0
            0.2      0.0286353  -0.0389279  -0.0999614  -0.1590204  -0.1901900  -0.2826961  -0.3434102  -0.3126700  -0.1722264  -0.3402037  -0.2546915  -0.3262484  -0.3173451  -0.2649586  -0.1797699
            0.5      0.0542953  -0.0338669  -0.1207282  -0.1744739  -0.2481364  -0.3083738  -0.3558942  -0.3108034  -0.2668261  -0.3924659  -0.3034000  -0.3168901  -0.3115492  -0.2396551  -0.1974931
            0.9      0.5499788   0.1007193  -0.4385517  -0.5955174  -0.4570634  -0.5084787  -0.3933519  -0.3653557  -0.3333020  -0.4221268  -0.3715434  -0.3465182  -0.2605050  -0.3205963  -0.2875762
        </tableData>
        <tableData breakPoint="0.0">
                   -10.0        -5.0         0.001         5.0        10.0        12.0        13.0        14.0        15.0        20.0        25.0        30.0        40.0        50.0        60.0
            0.2      0.0180560  -0.0430164  -0.1045355  -0.1539092  -0.2274248  -0.2857548  -0.2924029  -0.2919304  -0.2911776  -0.2946075  -0.3190695  -0.3173638  -0.2885783  -0.2118804  -0.0937567
            0.5      0.0448481  -0.0379164  -0.1248679  -0.1925926  -0.2843124  -0.3021458  -0.3009539  -0.2976154  -0.2934613  -0.2909247  -0.3199749  -0.3205323  -0.2928077  -0.2171082  -0.0763452
            0.9      0.5779111   0.0853574  -0.4475096  -0.6397796  -0.3676254  -0.3419164  -0.3331704  -0.3235234  -0.3172052  -0.2834317  -0.2721153  -0.2921777  -0.2942906  -0.2445552  -0.1027828
        </tableData>
        <tableData breakPoint="10.0">
                   -10.0        -5.0         0.001         5.0        10.0        12.0        13.0        14.0        15.0        20.0        25.0        30.0        40.0        50.0        60.0
            0.2      0.0184518  -0.0401679  -0.0714078  -0.1659460  -0.2804353  -0.3146865  -0.4141471  -0.4705758  -0.4036382  -0.3337195  -0.3098549  -0.3268122  -0.2788456  -0.2232849  -0.1454172
            0.5      0.0446384  -0.0357318  -0.0833878  -0.2153344  -0.3490459  -0.4321590  -0.3346398  -0.5093289  -0.5066089  -0.2773999  -0.3797025  -0.3248583  -0.2829868  -0.2379829  -0.1193635
            0.9      0.5151525   0.0670270  -0.3283616  -0.7272827  -0.4214042  -0.2875830  -0.3048736  -0.4167180  -0.4285171  -0.3351335  -0.4131116  -0.3614614  -0.2723343  -0.2141972  -0.1124092
        </tableData>
      </table>
    </product>
  </function>

  <function name="aero/s/cmmq">
    <description>Pitch damping derivative</description>
    <product>
      <property>aero/qb</property>
      <table>
        <independentVar lookup="row">velocities/mach</independentVar>
        <independentVar lookup="column">aero/alpha-deg</independentVar>
        <independentVar lookup="table">aero/beta-deg</independentVar>
        <tableData breakPoint="-10.0">
                   -10.0        -5.0         0.001         5.0        10.0        12.0        13.0        14.0        15.0        20.0        25.0        30.0        40.0        50.0        60.0
            0.2     -5.8654088  -6.4017395  -4.6059031  -2.0767926  -6.2544785  -9.1923004  -4.4996164  -3.7422947  -5.4498448  -4.8399757  -2.3191101  -1.0115833  -1.6937446   2.4012309  -4.3066946
            0.5     -6.1520684  -6.8804820  -5.5105983  -9.8781491  -6.4940072  -8.9783255  -5.1867366  -6.1625887  -3.1644284  -4.8427005  -0.8250679  -2.2459392  -1.8574280  -3.5095512  -1.9066881
            0.9     -8.1698709  -9.0960783  -5.7007796  -9.1884439  -9.4973154  -10.3227179  -8.5968973  -6.3532297  -6.2280465  -9.6456856  -3.6673436  -5.4877725  -6.1048988  -0.9534771  -7.9717419
        </tableData>
        <tableData breakPoint="0.0">
                   -10.0        -5.0         0.001         5.0        10.0        12.0        13.0        14.0        15.0        20.0        25.0        30.0        40.0        50.0        60.0
            0.2     -6.5010109  -6.6162676  -7.8269496  -6.8219295  -6.2097161  -5.7941416  -5.6283276  -5.5177997  -5.5611358  -4.0865767  -2.4477176  -1.8196657  -1.9067711  -2.3766906  -2.6620940
            0.5     -6.8829116  -6.9919008  -8.4667344  -7.2572196  -6.5424707  -6.1587458  -6.0660527  -6.0117483  -5.9150965  -3.8781501  -2.1477680  -2.0683073  -2.1733011  -2.7806428  -3.3544850
            0.9     -9.1853476  -8.8858470  -12.6396917  -9.8580223  -9.6280871  -8.1647926  -7.4034825  -6.5190714  -5.4765852  -4.1240859  -3.9083340  -3.4276594  -4.6829994  -5.7196363  -8.3980680
        </tableData>
        <tableData breakPoint="10.0">
                   -10.0        -5.0         0.001         5.0        10.0        12.0        13.0        14.0        15.0        20.0        25.0        30.0        40.0        50.0        60.0
            0.2     -5.9856699  -6.4345274  -4.5654082  -1.1662577  -6.6187798  -9.2319860  -4.4702426  -3.9218977  -5.3237221  -4.6140531  -1.1033988   0.0220871  -1.6962985   2.5697304  -4.2420056
            0.5     -6.2104631  -6.8969247  -6.1120774  -9.0062457  -6.6377110  -9.0330972  -5.2970105  -6.3445860  -3.0791111  -5.2512692  -0.5773081  -2.2505361  -1.8535533  -3.4555986  -2.3239520
            0.9     -8.2440197  -9.0962034  -5.4053961  -8.9135403  -9.2573502  -10.7180581  -8.3751489  -6.2624551  -6.3275133  -9.6105770  -3.7767111  -5.4649977  -6.0856071  -0.9174190  -7.9859664
        </tableData>
      </table>
    </product>
  </function>

  <function name="aero/s/cmnp">
    <description>Yaw moment due to roll rate</description>
    <product>
      <property>aero/pb</property>
      <table>
        <independentVar lookup="row">velocities/mach</independentVar>
        <independentVar lookup="column">aero/alpha-deg</independentVar>
        <independentVar lookup="table">aero/beta-deg</independentVar>
        <tableData breakPoint="-10.0">
                   -10.0        -5.0         0.001         5.0        10.0        12.0        13.0        14.0        15.0        20.0        25.0        30.0        40.0        50.0        60.0
            0.2      0.1391578   0.2075261   0.2282241   0.3027044  -0.1008750   0.1447618   0.3740972   0.0961402  -0.7305439   0.1570957  -0.0908610   0.1937008   0.3402154   0.6598441   0.0203404
            0.5      0.1402978   0.2212164   0.2419809   0.0221964  -0.0488336   0.1073713   0.3462577   0.0412446  -0.1636999   0.3469879   0.0480689   0.1907999   0.2968444   0.1605685   0.4398126
            0.9      0.1914154   0.3124664   0.3611537   0.3763525   0.4841055   0.8834228   0.2513503   0.1755794  -0.0264259   0.3980228   0.1701491   0.1920381  -0.3295311   0.8102215   0.2658374
        </tableData>
        <tableData breakPoint="0.0">
                   -10.0        -5.0         0.001         5.0        10.0        12.0        13.0        14.0        15.0        20.0        25.0        30.0        40.0        50.0        60.0
            0.2      0.1773942   0.2141855   0.2025218   0.3013306   0.2935380   0.2771324   0.2719019   0.2666738   0.2641137   0.3124464   0.3437602   0.2609069   0.2290962   0.0859749  -0.1343833
            0.5      0.1745484   0.2184257   0.2019140   0.3148728   0.3006693   0.2852011   0.2792451   0.2722091   0.2677387   0.3101955   0.3643871   0.3015505   0.2598744   0.1323329  -0.1611265
            0.9      0.0823074   0.2242452   0.1285520   0.3580249   0.3738029   0.3492684   0.3311888   0.3219293   0.3053343   0.2185518   0.2347056   0.2590099   0.2406509   0.2190360  -0.1331237
        </tableData>
        <tableData breakPoint="10.0">
                   -10.0        -5.0         0.001         5.0        10.0        12.0        13.0        14.0        15.0        20.0        25.0        30.0        40.0        50.0        60.0
            0.2      0.2047078   0.1963677   0.2140742   0.2922368   0.5687351   0.4582397   0.5873599   0.8522750   0.5904761   0.1606985   0.0757194   0.2011374   0.0206652   0.0738810   0.0657443
            0.5      0.2023988   0.1990381   0.2059048   0.4791232   0.7266289   0.7713224   0.3059161   1.0227197   0.9389403  -0.0581215   0.2482232   0.1513744   0.0143563   0.2309964  -0.0512619
            0.9      0.1217481   0.1985391   0.2563374   0.4907088   0.3083049  -0.2423208  -0.1372349   0.4958068   0.3935618   0.0368738   0.3165825   0.1516689  -0.1982341  -0.2022331  -0.1790982
        </tableData>
      </table>
    </product>
  </function>

  <function name="aero/s/cmnr">
    <description>Yaw damping derivative</description>
    <product>
      <property>aero/rb</property>
      <table>
        <independentVar lookup="row">velocities/mach</independentVar>
        <independentVar lookup="column">aero/alpha-deg</independentVar>
        <independentVar lookup="table">aero/beta-deg</independentVar>
        <tableData breakPoint="-10.0">
                   -10.0        -5.0         0.001         5.0        10.0        12.0        13.0        14.0        15.0        20.0        25.0        30.0        40.0        50.0        60.0
            0.2     -0.1178529  -0.0419560   0.0572068   0.1696798   0.1519404   0.1377046   0.1741840   0.1776260   0.1137237  -0.1675763   0.0891323   0.0693159   0.1154911   0.0964080  -0.0148679
            0.5     -0.1419938  -0.0446764   0.0649374   0.1285632   0.1737502   0.1449313   0.1486429   0.1545488   0.1961894   0.1651691   0.1470534   0.0826162   0.1056116   0.0055850  -0.3466048
            0.9     -0.1860210  -0.0555690   0.1302141   0.2344973  -0.0615214   0.2959436   0.2225951   0.2478626   0.2807036   0.1250216   0.4207138   0.0753997   0.1827555   0.1673988   0.1136093
        </tableData>
        <tableData breakPoint="0.0">
                   -10.0        -5.0         0.001         5.0        10.0        12.0        13.0        14.0        15.0        20.0        25.0        30.0        40.0        50.0        60.0
            0.2     -0.1424587  -0.0461383   0.0595704   0.1254441   0.1498657   0.1314445   0.1198270   0.1115475   0.1048087   0.0708971   0.0437559   0.0486560   0.0625796   0.0844912   0.0814338
            0.5     -0.1503267  -0.0475031   0.0665920   0.1359327   0.1470869   0.1259564   0.1187477   0.1113286   0.1060727   0.0734287   0.0434272   0.0504914   0.0599807   0.0742854   0.0994665
            0.9     -0.2051863  -0.0574868   0.0998724   0.1834860   0.1387422   0.1251748   0.1197900   0.1144807   0.1092169   0.0910189   0.0593966   0.0294482   0.0710266   0.0863314   0.1420547
        </tableData>
        <tableData breakPoint="10.0">
                   -10.0        -5.0         0.001         5.0        10.0        12.0        13.0        14.0        15.0        20.0        25.0        30.0        40.0        50.0        60.0
            0.2     -0.1071442  -0.0381025   0.0518117   0.3992518   0.1442975   0.1493991   0.1853058   0.3627189   0.1321510   0.0020579   0.1378183   0.0812247   0.1195871   0.0818997   0.0062913
            0.5     -0.1183143  -0.0394745   0.0611818   0.1756533   0.1669865   0.1506686   0.0126038   0.2482722   0.1410282   0.1297388   0.0609371   0.0887138   0.0880729  -0.0033445   0.0300108
            0.9     -0.1959457  -0.0502061   0.0203397   0.2284932  -0.0002763   0.0407389   0.2116533   0.2439976  -0.0334155   0.1702514  -0.0599077   0.1027380   0.1967077  -0.0011747   0.1222160
        </tableData>
      </table>
    </product>
  </function>

  <function name="aero/s/cfyp">
    <description>Side force due to roll rate</description>
    <product>
      <property>aero/pb</property>
      <table>
        <independentVar lookup="row">velocities/mach</independentVar>
        <independentVar lookup="column">aero/alpha-deg</independentVar>
        <independentVar lookup="table">aero/beta-deg</independentVar>
        <tableData breakPoint="-10.0">
                   -10.0        -5.0         0.001         5.0        10.0        12.0        13.0        14.0        15.0        20.0        25.0        30.0        40.0        50.0        60.0
            0.2      0.0921604   0.0755612   0.0924002   0.1434303  -0.0162790  -0.0487268   0.0167558   0.0379064  -0.0796318  -0.6311307  -0.1359859  -0.1564812  -0.0558616  -0.0537380  -0.0763119
            0.5      0.0899194   0.0791949   0.1038650   0.0890120   0.0251938  -0.0242056  -0.0378823  -0.0027607   0.0880410   0.0139997   0.0086830  -0.1392857  -0.0556127  -0.1828771  -0.7841291
            0.9      0.0899811   0.1013203   0.2372407   0.1885311  -0.3872701   0.2833117   0.1481305   0.1738619   0.1243091  -0.0601175   0.4025770  -0.1827165   0.0117431   0.0192928  -0.0187925
        </tableData>
        <tableData breakPoint="0.0">
                   -10.0        -5.0         0.001         5.0        10.0        12.0        13.0        14.0        15.0        20.0        25.0        30.0        40.0        50.0        60.0
            0.2      0.0612231   0.0688213   0.0810303   0.0282233  -0.0324166  -0.0602411  -0.0749101  -0.0857868  -0.0956119  -0.1563129  -0.2037160  -0.1937608  -0.1556091  -0.0749214   0.0315750
            0.5      0.0675250   0.0756052   0.0911885   0.0347085  -0.0354460  -0.0650395  -0.0743605  -0.0858342  -0.0947241  -0.1524793  -0.2067798  -0.1946617  -0.1632066  -0.0977189   0.0553914
            0.9      0.0895523   0.1039668   0.1364144   0.0767624  -0.0494118  -0.0758260  -0.0864748  -0.0961407  -0.1056950  -0.1349175  -0.1987736  -0.2614943  -0.1973148  -0.1341979   0.0354969
        </tableData>
        <tableData breakPoint="10.0">
                   -10.0        -5.0         0.001         5.0        10.0        12.0        13.0        14.0        15.0        20.0        25.0        30.0        40.0        50.0        60.0
            0.2      0.1005590   0.0754070   0.0801714   0.5697681  -0.0243071  -0.0515318   0.0150668   0.3595125  -0.0510323  -0.2487785  -0.0214761  -0.1237942  -0.0479248  -0.0678138  -0.0671522
            0.5      0.1048927   0.0815806   0.0977609   0.1172342   0.0055185  -0.0427002  -0.2240044   0.1512353  -0.0230101  -0.0603508  -0.1980137  -0.1259148  -0.0769314  -0.1713238  -0.1044802
            0.9      0.0854301   0.1005628   0.0433320   0.1794887  -0.2884260  -0.1621862   0.1009772   0.1729974  -0.1723695   0.0301856  -0.3567776  -0.1206183   0.0443378  -0.2248723   0.0225253
        </tableData>
      </table>
    </product>
  </function>

  <function name="aero/s/cfyr">
    <description>Side force due to yaw rate</description>
    <product>
      <property>aero/rb</property>
      <table>
        <independentVar lookup="row">velocities/mach</independentVar>
        <independentVar lookup="column">aero/alpha-deg</independentVar>
        <independentVar lookup="table">aero/beta-deg</independentVar>
        <tableData breakPoint="-10.0">
                   -10.0        -5.0         0.001         5.0        10.0        12.0        13.0        14.0        15.0        20.0        25.0        30.0        40.0        50.0        60.0
            0.2      0.3799220   0.4974387   0.5389101   0.6577675  -0.1599197   0.4031017   0.7553045   0.2732332  -1.4135541   0.3841575  -0.0323427   0.5570338   0.7299005   0.3838768   0.5413065
            0.5      0.3877165   0.5253701   0.5693908   0.1809224  -0.0258660   0.3422307   0.6982337   0.1630436  -0.1546382   0.7822330   0.2826634   0.5387103   0.6792680   0.6274087   1.3466884
            0.9      0.6296033   0.7144462   0.7784433   0.8546751   1.0794248   1.9230005   0.4735492   0.4604015  -0.1360912   1.0734029   0.4075579   0.5326431  -0.3164979   1.4894010   1.0673973
        </tableData>
        <tableData breakPoint="0.0">
                   -10.0        -5.0         0.001         5.0        10.0        12.0        13.0        14.0        15.0        20.0        25.0        30.0        40.0        50.0        60.0
            0.2      0.4393844   0.4977563   0.4523195   0.6308874   0.6118839   0.5977181   0.5925457   0.5863732   0.5848744   0.7014212   0.7958658   0.6926867   0.6913266   0.5080138   0.2862836
            0.5      0.4458423   0.5092215   0.4506105   0.6586118   0.6355909   0.6162250   0.6081457   0.5979796   0.5923612   0.6958734   0.8345250   0.7683012   0.7525154   0.5955562   0.2329950
            0.9      0.4787453   0.5563453   0.3113161   0.7679409   0.7938910   0.7549304   0.7218292   0.7046531   0.6768731   0.5314911   0.5893962   0.6928453   0.7404792   0.7618153   0.3025413
        </tableData>
        <tableData breakPoint="10.0">
                   -10.0        -5.0         0.001         5.0        10.0        12.0        13.0        14.0        15.0        20.0        25.0        30.0        40.0        50.0        60.0
            0.2      0.5001607   0.4867460   0.5200799   0.5796756   1.0517573   1.0037799   1.3041055   1.7610817   1.1968366   0.5004148   0.3379251   0.5993774   0.3228093   0.4759245   0.6039344
            0.5      0.5107398   0.4934639   0.5014093   0.9138229   1.3232023   1.5840254   0.8172902   2.0789560   1.9158251   0.0378987   0.6415087   0.5211912   0.2866722   0.7393904   0.2893857
            0.9      0.5249250   0.4923611   0.5641174   1.0431263   0.5828327  -0.4755571  -0.2550757   0.5595492   0.9236255   0.2867341   0.9770171   0.5337515  -0.0176680   0.0796326   0.1348129
        </tableData>
      </table>
    </product>
  </function>


    <function name="aero/force/CL">
	<sum>
	    <property>aero/CL_base</property>
	    <property>aero/CL_elevator</property>
	    <property>aero/CL_right-flaperon</property>
	    <property>aero/CL_left-flaperon</property>
	    <property>aero/CL_slats</property>
	    <property>aero/CL_flaps</property>
	</sum>
    </function>

    <axis name="LIFT">

	<function name="aero/force/Lift_combined">
	    <description>Lift due to alpha</description>
	    <product>
		<property>aero/qbar-psf</property>
		<property>metrics/Sw-sqft</property>
		<product>
		    <property>aero/force/CL</property>
		    <difference>
			<value>1</value>
			<product>
			    <property>fcs/wing-fold/wing-fold-pos</property>
			    <value>0.9</value>
			</product>
		    </difference>
		</product>
	    </product>
	</function>

	<function name="aero/force/Lift_pitch_rate">
	    <description>Lift due to pitch rate</description>
	    <product>
		<property>aero/qbar-psf</property>
		<property>metrics/Sw-sqft</property>
		<property>velocities/q-aero-rad_sec</property>
		<property>aero/ci2vel</property>
		<value> 4.2695 </value>
	    </product>
	</function>

	<function name="aero/force/Lift_alpha_rate">
	    <description>Lift due to alpha rate</description>
	    <product>
		<property>aero/qbar-psf</property>
		<property>metrics/Sw-sqft</property>
		<property>aero/alphadot-rad_sec</property>
		<property>aero/ci2vel</property>
		<value> 2.3362 </value>
	    </product>
	</function>

    </axis>

    <function name="aero/force/CDtot">
	<sum>
	    <property>aero/CDtot_base</property>
	    <property>aero/CDtot_elevator</property>
	    <property>aero/CDtot_right-flaperon</property>
	    <property>aero/CDtot_left-flaperon</property>
	    <property>aero/CDtot_slats</property>
	    <property>aero/CDtot_flaps</property>
	</sum>
    </function>

    <axis name="DRAG">

	<function name="aero/force/Drag_combined">
	    <description>Drag at zero lift</description>
	    <product>
		<property>aero/qbar-psf</property>
		<property>metrics/Sw-sqft</property>
		<property>aero/force/CDtot</property>
	    </product>
	</function>

	<function name="aero/force/CD_stores">
	    <product>
		<property>aero/qbar-psf</property>
		<sum>
		    <product>
			<property>aero/cd_p1</property>
			<property>aero/eda_p1</property>
		    </product>
		    <product>
			<property>aero/cd_p2</property>
			<property>aero/eda_p2</property>
		    </product>
		    <product>
			<property>aero/cd_p3</property>
			<property>aero/eda_p3</property>
		    </product>
		    <product>
			<property>aero/cd_p4</property>
			<property>aero/eda_p4</property>
		    </product>
		    <product>
			<property>aero/cd_p5</property>
			<property>aero/eda_p5</property>
		    </product>
		</sum>
	    </product>
	</function>

	<function name="aero/force/Drag_gear">
	    <description>Drag due to gear</description>
	    <product>
		<property>aero/qbar-psf</property>
		<property>metrics/Sw-sqft</property>
		<property>gear/gear-pos-norm</property>
		<value> 0.0200 </value>
	    </product>
	</function>

	<function name="aero/force/Drag_speedbrake">
	    <description>Drag due to speedbrakes</description>
	    <product>
		<property>aero/qbar-psf</property>
		<property>metrics/Sw-sqft</property>
		<property>fcs/speedbrake-pos-norm</property>
		<value> 0.0800 </value>
	    </product>
	</function>

    </axis>

    <function name="aero/force/CS">
	<sum>
	    <property>aero/CS_base</property>
	    <property>aero/CS_rudder</property>
	    <property>aero/CS_flaps</property>
	    <property>aero/s/cfyp</property>
	    <property>aero/s/cfyr</property>
	</sum>
    </function>

    <axis name="SIDE">

	<function name="aero/force/Side_combined">
	    <description>Side force</description>
	    <product>
		<property>aero/qbar-psf</property>
		<property>metrics/Sw-sqft</property>
		<property>aero/force/CS</property>
	    </product>
	</function>

	<function name="aero/force/Side_rudder">
	    <description>Side force due to rudder</description>
	    <product>
		<property>aero/qbar-psf</property>
		<property>metrics/Sw-sqft</property>
		<property>fcs/rudder-pos-rad</property>
		<value> 0.2108 </value>
	    </product>
	</function>

    </axis>

    <function name="aero/moment/CMy">
	<sum>
	    <property>aero/CMy_flaps</property>
	    <property>aero/CMy_slats</property>
	    <property>aero/s/cmmq</property>
	</sum>
    </function>

    <axis name="PITCH">

	<function name="aero/moment/Pitch_combined">
	    <description>Pitch moment due to alpha</description>
	    <product>
		<property>aero/qbar-psf</property>
		<property>metrics/Sw-sqft</property>
		<property>metrics/cbarw-ft</property>
		<property>aero/moment/CMy</property>
	    </product>
	</function>

	<function name="aero/moment/Pitch_alpha">
	    <description>Pitch moment due to alpha</description>
	    <product>
		<property>aero/qbar-psf</property>
		<property>metrics/Sw-sqft</property>
		<property>metrics/cbarw-ft</property>
		<property>aero/alpha-rad</property>
		<value> -0.1 </value>
	    </product>
	</function>

	<function name="aero/moment/Pitch_elevator">
	    <description>Pitch moment due to elevator</description>
	    <product>
		<property>aero/qbar-psf</property>
		<property>metrics/Sw-sqft</property>
		<property>metrics/cbarw-ft</property>
		<property>fcs/surfaces/elevator-pos-rad</property>
		<table>
		    <independentVar lookup="row">velocities/mach</independentVar>
		    <tableData>
			0.0    -1.2
			2.0    -0.3
		    </tableData>
		</table>
	    </product>
	</function>

	<function name="aero/moment/Pitch_damp">
	    <description>Pitch moment due to pitch rate</description>
	    <product>
		<property>aero/qbar-psf</property>
		<property>metrics/Sw-sqft</property>
		<property>metrics/cbarw-ft</property>
		<property>aero/ci2vel</property>
		<property>velocities/q-aero-rad_sec</property>
		<value> -9.7532 </value>
	    </product>
	</function>

	<function name="aero/moment/Pitch_alphadot">
	    <description>Pitch moment due to alpha rate</description>
	    <product>
		<property>aero/qbar-psf</property>
		<property>metrics/Sw-sqft</property>
		<property>metrics/cbarw-ft</property>
		<property>aero/ci2vel</property>
		<property>aero/alphadot-rad_sec</property>
		<value> -5.3369 </value>
	    </product>
	</function>

    </axis>

    <function name="aero/moment/CMx">
	<sum>
	    <!-- <property>aero/CMx_base</property> -->
	    <property>aero/CMx_rudder</property>
	    <property>aero/s/cmlr</property>
	    <product>
		<sum>
		    <property>aero/CMx_left-flaperon</property>
		    <property>aero/CMx_right-flaperon</property>
		    <property>aero/s/cmlp</property>
		</sum>
		<value>-1</value>
	    </product>
	</sum>
    </function>

    <axis name="ROLL">

	<function name="aero/moment/Roll_combined">
	    <description>Roll moment</description>
	    <product>
		<property>aero/qbar-psf</property>
		<property>metrics/Sw-sqft</property>
		<property>metrics/bw-ft</property>
		<property>aero/moment/CMx</property>
	    </product>
	</function>
    </axis>

    <function name="aero/moment/CMz">
	<sum>
	    <property>aero/CMz_base</property>
	    <property>aero/CMz_left-flaperon</property>
	    <property>aero/CMz_right-flaperon</property>
	    <property>aero/s/cmnr</property>
	    <property>aero/s/cmnp</property>
	    <product>
		<property>aero/CMz_rudder</property>
		<value>-1</value>
	    </product>
	</sum>
    </function>

    <axis name="YAW">

	<function name="aero/moment/Yaw_combined">
	    <description>Yaw moment</description>
	    <product>
		<property>aero/qbar-psf</property>
		<property>metrics/Sw-sqft</property>
		<property>metrics/bw-ft</property>
		<property>aero/moment/CMz</property>
	    </product>
	</function>

	<function name="aero/moment/Yaw_beta">
	    <description>Yaw moment due to beta</description>
	    <product>
		<property>aero/qbar-psf</property>
		<property>metrics/Sw-sqft</property>
		<property>metrics/bw-ft</property>
		<property>aero/beta-rad</property>
		<value> 0.1926 </value> <!-- 0.1626 -->
	    </product>
	</function>

	<function name="aero/moment/Yaw_stores">
	    <product>
		<property>aero/qbar-psf</property>
		<sum>
		    <product>
			<property>aero/cd_p1</property>
			<property>aero/eda_p1</property>
			<property>inertia/pointmass-location-Y-inches</property>
		    </product>
		    <product>
			<property>aero/cd_p2</property>
			<property>aero/eda_p2</property>
			<property>inertia/pointmass-location-Y-inches[1]</property>
		    </product>
		    <product>
			<property>aero/cd_p3</property>
			<property>aero/eda_p3</property>
			<property>inertia/pointmass-location-Y-inches[2]</property>
		    </product>
		    <product>
			<property>aero/cd_p4</property>
			<property>aero/eda_p4</property>
			<property>inertia/pointmass-location-Y-inches[3]</property>
		    </product>
		    <product>
			<property>aero/cd_p5</property>
			<property>aero/eda_p5</property>
			<property>inertia/pointmass-location-Y-inches[4]</property>
		    </product>
		</sum>
	    </product>
	</function>

	<function name="aero/moment/Yaw_roll_rate">
	    <description>Yaw moment due to roll rate</description>
	    <product>
		<property>aero/qbar-psf</property>
		<property>metrics/Sw-sqft</property>
		<property>metrics/bw-ft</property>
		<property>aero/bi2vel</property>
		<property>velocities/r-aero-rad_sec</property>
		<value>-1.1</value>
	    </product>
	</function>

    </axis>
</aerodynamics>
