<?xml version="1.0"?>

<!--
File:     J52-P8.xml
Author:   AeromatiC++ v 3.3.0

See: http://wiki.flightgear.org/JSBSim_Engines#FGTurbine

Inputs:
name:                    J52-P8
type:                    Turbine Engine
thrust:                  8700.0 lbf
bypass ratio:            1.000:1
overall pressure ratio:  14.6:1
augmented?               no
injected?                no

Outputs
tsfc:                    0.8
engine weight:           1794.4 lbs
engine length:           6.8 ft
engine diameter:         3.8 ft
-->

<turbine_engine name="J52-P8">
    <!-- <milthrust>7982</milthrust> -->
    <milthrust>8700</milthrust>
    <bypassratio>     1.000 </bypassratio>
    <tsfc>            0.760 </tsfc>
    <bleed>           0.03</bleed>
    <idlen1>         30.0 </idlen1>
    <idlen2>         60.0 </idlen2>
    <maxn1>         100.0 </maxn1>
    <maxn2>         100.0 </maxn2>
    <augmented>         0 </augmented>
    <injected>          0 </injected>

    <function name="IdleThrust">
	<table>
	    <independentVar lookup="row">velocities/mach</independentVar>
	    <independentVar lookup="column">atmosphere/density-altitude</independentVar>
	    <tableData>
		-10000     0     10000   20000   30000   40000   50000   60000
		0.0  0.0430  0.0488  0.0528  0.0694  0.0899  0.1183  0.1467  0
		0.2  0.0500  0.0501  0.0335  0.0544  0.0797  0.1049  0.1342  0
		0.4  0.0040  0.0047  0.0020  0.0272  0.0595  0.0891  0.1203  0
		0.6 -0.0804 -0.0804 -0.0560 -0.0237  0.0276  0.0718  0.1073  0
		0.8 -0.2129 -0.2129 -0.1498 -0.1025  0.0474  0.0868  0.0900  0
		1.0 -0.2839 -0.2839 -0.1104 -0.0469 -0.0270  0.0552  0.0800  0
	    </tableData>
	</table>
    </function>

    <function name="MilThrust">
	<table>
	    <independentVar lookup="row">velocities/vc-kts</independentVar>
	    <independentVar
		lookup="column">atmosphere/density-altitude</independentVar>
	    <!--
	    <tableData>
		-10000       0   10000   20000   30000   40000   50000   60000
		0.0  1.2600  1.0000  1.0000  0.5340  0.3720  0.2410  0.1490  0.0000
		0.2  1.1491  0.9965  0.9965  0.4965  0.3484  0.2267  0.1403  0.0000
		0.4  1.1070  0.9850  0.9850  0.4871  0.3436  0.2243  0.1396  0.0000
		0.6  1.1147  0.9676  0.9676  0.5022  0.3568  0.2341  0.1454  0.0000
		0.8  1.1639  0.7900  0.7900  0.5385  0.3858  0.2544  0.1573  0.0000
		1.0  1.2410  0.6513  0.6513  0.5901  0.4306  0.2855  0.1768  0.0000
		1.1  0.0000  0.0000  0.0000  0.0000  0.0000  0.0000  0.0000  0.0000
	    </tableData>
	    -->
	    <tableData>
                	0	15000	25000	35000	45000	55000	65000	70000
                0	1.000000	0.633905	0.447112	0.263755	0.151059	0.065945	0.037980	0.0001
                100	0.926444	0.602410	0.431274	0.272207	0.161349	0.079272	0.046857	0.0001
                200	0.889776	0.584541	0.415436	0.280660	0.171638	0.092598	0.055735	0.0001
                300	0.880517	0.594750	0.420903	0.292084	0.181929	0.105925	0.064613	0.0001
                400	0.885174	0.629968	0.451498	0.319092	0.195235	0.119252	0.073490	0.0001
                500	0.887999	0.673786	0.492594	0.355994	0.219454	0.132579	0.082368	0.0001
                600	0.861516	0.702717	0.540342	0.392896	0.243746	0.145905	0.091246	0.0001
                700	0.818681	0.708104	0.585028	0.427888	0.269910	0.159231	0.100123	0.0001
                800	0.775847	0.679272	0.580904	0.458944	0.296074	0.172558	0.109001	0.0001
                900 	0.733013	0.648931	0.523762	0.490002	0.322237	0.185884	0.117879	0.0001
	    </tableData>
	</table>
    </function>

</turbine_engine>
